// SBML level 2 version 4

model BIOMD0000000009()
  // Huang1996 - Ultrasensitivity in MAPK cascade
  // The temporal sequence of kinase activation, from MAPKKK (activated RAF) to the final effector MAPK (activated ERK), is described here. It is observed from the model that there is an increase in sensitivity along the levels of the cascade, where the activity of MAPK reaches its maximal before MAPKKK.
  // This model is described in the article:
  // Ultrasensitivity in the mitogen-activated protein kinase cascade.
  // Huang CY, Ferrell JE Jr
  // Proc. Natl. Acad. Sci. U.S.A. 1996:93(19):10078-83
  // Abstract:
  // The mitogen-activated protein kinase (MAPK) cascade is a highly conserved series of three protein kinases implicated in diverse biological processes. Here we demonstrate that the cascade arrangement has unexpected consequences for the dynamics of MAPK signaling. We solved the rate equations for the cascade numerically and found that MAPK is predicted to behave like a highly cooperative enzyme, even though it was not assumed that any of the enzymes in the cascade were regulated cooperatively. Measurements of MAPK activation in Xenopus oocyte extracts confirmed this prediction. The stimulus/response curve of the MAPK was found to be as steep as that of a cooperative enzyme with a Hill coefficient of 4-5, well in excess of that of the classical allosteric protein hemoglobin. The shape of the MAPK stimulus/ response curve may make the cascade particularly appropriate for mediating processes like mitogenesis, cell fate induction, and oocyte maturation, where a cell switches from one discrete state to another.
  // The species K_PP_norm, KKK_P_norm and KK_PP_norm are the relative concentrations of the active MAPK, MAPKK and MAPKKK, that is the double, or single resp. phophorylated forms divided by the total concentrations of each kinase. For MAPK additionally the also active MAPK divided by the maximal concentration of active MAPK is given by rel_K_PP_max. The parameter K_PP_norm_max, the maximal ratio of active MapK, has to be calculated for each change of parameters.
  // This model is hosted on BioModels Database and identified by: BIOMD0000000009 .
  // To cite BioModels Database, please use: BioModels Database: An enhanced, curated and annotated resource for published quantitative kinetic models .
  // To the extent possible under law, all copyright and related or neighbouring rights to this encoded model have been dedicated to the public domain worldwide. Please refer to CC0 Public Domain Dedication for more information.
  // biomodels.db:MODEL6615048798
  // biomodels.db:BIOMD0000000009
  // isDescribedBy pubmed:8816754
  // isHomologTo reactome:REACT_634
  // isVersionOf GO:0000165
  // hasTaxon taxonomy:8355

  // Compartments:
  compartment compartment = 4e-12;

  // Species:
  species E1 in compartment = 3e-5; E1 is "MAPKKK activator (Ras)";  // isVersionOf interpro:IPR003577
  species E2 in compartment = 0.0003; E2 is "MAPKKK inactivator";
  species KKK in compartment = 0.003; KKK is "Mos";  // isVersionOf uniprot:P12965
  species P_KKK in compartment = 0; P_KKK is "Mos-P";  // isVersionOf uniprot:P12965
  species KK in compartment = 1.2; KK is "Mek1";  // isVersionOf uniprot:Q05116
  species P_KK in compartment = 0; P_KK is "Mek1-P";  // isVersionOf uniprot:Q05116
  species PP_KK in compartment = 0; PP_KK is "Mek1-PP";  // isVersionOf uniprot:Q05116
  species K in compartment = 1.2; K is "Erk2";  // isVersionOf uniprot:P26696
  species P_K in compartment = 0; P_K is "Erk2-P";  // isVersionOf uniprot:P26696
  species PP_K in compartment = 0; PP_K is "Erk2-PP";  // isVersionOf uniprot:P26696
  species KPase in compartment = 0.12; KPase is "MAPK-Pase";  // uniprot:Q90W58
  species KKPase in compartment = 0.0003; KKPase is "MAPKK-Pase";
  species E1_KKK in compartment = 0; E1_KKK is "E1_Mos";  // hasPart uniprot:P12965 interpro:IPR003577
  species E2_P_KKK in compartment = 0; E2_P_KKK is "E2_Mos-P";  // hasPart uniprot:P12965
  species P_KKK_KK in compartment = 0; P_KKK_KK is "P-Mos_Mek1";  // hasPart uniprot:P12965 uniprot:Q05116
  species P_KKK_P_KK in compartment = 0; P_KKK_P_KK is "P-Mos_P-Mek1";  // hasPart uniprot:P12965 uniprot:Q05116
  species PP_KK_K in compartment = 0; PP_KK_K is "PP-Mek1_Erk2";  // hasPart uniprot:Q05116 uniprot:P26696
  species PP_KK_P_K in compartment = 0; PP_KK_P_K is "PP-Mek1_P-Erk2";  // hasPart uniprot:Q05116 uniprot:P26696
  species KKPase_PP_KK in compartment = 0; KKPase_PP_KK is "MAPKK-Pase_PP-Mek1";  // hasPart uniprot:Q05116
  species KKPase_P_KK in compartment = 0; KKPase_P_KK is "MAPKK-Pase_P-Mek1";  // hasPart uniprot:Q05116
  species KPase_PP_K in compartment = 0; KPase_PP_K is "MAPK-Pase_PP-Erk2";  // hasPart uniprot:Q90W58 uniprot:P26696
  species KPase_P_K in compartment = 0; KPase_P_K is "MAPK-Pase_P-Erk2";  // hasPart uniprot:P26696 uniprot:Q90W58
  species K_PP_norm in compartment;
  species KK_PP_norm in compartment;
  species KKK_P_norm in compartment;
  species rel_K_PP_max in compartment; rel_K_PP_max is "relative maximal K_PP";

  // Parameters:
  // the maximal value of K_PP_norm at a stimulation conc. of 10.
  K_PP_norm_max = 0.900049;

  // Assignment rules:
  K_PP_norm := (PP_K + KPase_PP_K)/(PP_K + P_K + K + PP_KK_K + PP_KK_P_K + KPase_PP_K + KPase_P_K);
  rel_K_PP_max := K_PP_norm/K_PP_norm_max;
  KK_PP_norm := (PP_KK + PP_KK_K + PP_KK_P_K + KKPase_PP_KK)/(PP_KK + P_KK + KK + PP_KK_K + PP_KK_P_K + P_KKK_KK + P_KKK_P_KK + KKPase_PP_KK + KKPase_P_KK);
  KKK_P_norm := (P_KKK + P_KKK_KK + P_KKK_P_KK)/(KKK + P_KKK + P_KKK_KK + P_KKK_P_KK);

  // Reactions:
  r1a: KKK + E1 -> E1_KKK; compartment*(a1*E1*KKK - d1*E1_KKK); r1a is "binding of MAPKKK activator";  // isHomologTo reactome:REACT_996; isVersionOf GO:0031435
    a1 = 1000; d1 = 150;
  r1b: E1_KKK => E1 + P_KKK; compartment*r1b_k2*E1_KKK; r1b is "MAPKKK activation";  // isHomologTo reactome:REACT_525; isVersionOf ec-code:2.7.11.1 GO:0008349 GO:0000185
    r1b_k2 = 150;
  r2a: P_KKK + E2 -> E2_P_KKK; compartment*(a2*E2*P_KKK - d2*E2_P_KKK); r2a is "binding of MAPKKK inactivator";  // isVersionOf GO:0031435
    a2 = 1000; d2 = 150;
  r2b: E2_P_KKK => E2 + KKK; compartment*r2b_k2*E2_P_KKK; r2b is "MAPKKK inactivation";  // isVersionOf ec-code:3.1.3.16 GO:0051390 GO:0006470
    r2b_k2 = 150;
  r3a: KK + P_KKK -> P_KKK_KK; compartment*(a3*KK*P_KKK - d3*P_KKK_KK); r3a is "binding P-MAPKKK and MAPKK";  // isHomologTo reactome:REACT_143; isVersionOf GO:0031434 GO:0031435
    a3 = 1000; d3 = 150;
  r3b: P_KKK_KK => P_KK + P_KKK; compartment*k3*P_KKK_KK; r3b is "phosphorylation of MAPKK";  // isHomologTo reactome:REACT_614; isVersionOf ec-code:2.7.11.25 GO:0006468 GO:0004709
    k3 = 150;
  r4a: P_KK + KKPase -> KKPase_P_KK; compartment*(a4*P_KK*KKPase - d4*KKPase_P_KK); r4a is "binding MAPKK-Pase and P-MAPKK";  // isVersionOf GO:0031434
    a4 = 1000; d4 = 150;
  r4b: KKPase_P_KK => KK + KKPase; compartment*k4*KKPase_P_KK; r4b is "dephosphorylation of P-MAPKK";  // isVersionOf ec-code:3.1.3.16 GO:0006470
    k4 = 150;
  r5a: P_KK + P_KKK -> P_KKK_P_KK; compartment*(a5*P_KK*P_KKK - d5*P_KKK_P_KK); r5a is "binding P-MAPKKK and P-MAPKK";  // isHomologTo reactome:REACT_143; isVersionOf GO:0031435 GO:0031434
    a5 = 1000; d5 = 150;
  r5b: P_KKK_P_KK => PP_KK + P_KKK; compartment*k5*P_KKK_P_KK; r5b is "phosphorylation of P-MAPKK";  // isHomologTo reactome:REACT_614; isVersionOf ec-code:2.7.11.25 GO:0006468 GO:0004709 GO:0000186
    k5 = 150;
  r6a: PP_KK + KKPase -> KKPase_PP_KK; compartment*(a6*PP_KK*KKPase - d6*KKPase_PP_KK); r6a is "binding MAPKK-Pase and PP-MAPKK";  // isVersionOf GO:0031434
    a6 = 1000; d6 = 150;
  r6b: KKPase_PP_KK => P_KK + KKPase; compartment*k6*KKPase_PP_KK; r6b is "dephosphorylation of PP-MAPKK";  // isVersionOf ec-code:3.1.3.16 GO:0006470 GO:0051389
    k6 = 150;
  r7a: K + PP_KK -> PP_KK_K; compartment*(a7*K*PP_KK - d7*PP_KK_K); r7a is "binding MAPK and PP-MAPKK";  // hasVersion reactome:REACT_1780 reactome:REACT_495; isVersionOf GO:0031434 GO:0051019
    a7 = 1000; d7 = 150;
  r7b: PP_KK_K => P_K + PP_KK; compartment*k7*PP_KK_K; r7b is "phosphorylation of MAPK";  // hasVersion reactome:REACT_136 reactome:REACT_2247; isVersionOf ec-code:2.7.12.2 GO:0006468 GO:0004708
    k7 = 150;
  r8a: P_K + KPase -> KPase_P_K; compartment*(a8*P_K*KPase - d8*KPase_P_K); r8a is "binding MAPK-Pase and P-MAPK";  // isVersionOf GO:0051019
    a8 = 1000; d8 = 150;
  r8b: KPase_P_K => K + KPase; compartment*k8*KPase_P_K; r8b is "dephosphorylation of P-MAPK";  // isVersionOf ec-code:3.1.3.16 GO:0006470
    k8 = 150;
  r9a: P_K + PP_KK -> PP_KK_P_K; compartment*(a9*P_K*PP_KK - d9*PP_KK_P_K); r9a is "binding PP-MAPKK and P-MAPK";  // hasVersion reactome:REACT_1780 reactome:REACT_495; isVersionOf GO:0051019 GO:0031434
    a9 = 1000; d9 = 150;
  r9b: PP_KK_P_K => PP_KK + PP_K; compartment*k9*PP_KK_P_K; r9b is "phosphorylation of P-MAPK";  // isVersionOf ec-code:2.7.12.2 GO:0006468 GO:0004708 GO:0000187; hasVersion reactome:REACT_136 reactome:REACT_2247
    k9 = 150;
  r10a: PP_K + KPase -> KPase_PP_K; compartment*(a10*PP_K*KPase - d10*KPase_PP_K); r10a is "binding MAPK-Pase and PP-MAPK";  // isVersionOf GO:0051019
    a10 = 1000; d10 = 150;
  r10b: KPase_PP_K => P_K + KPase; compartment*k10*KPase_PP_K; r10b is "dephosphorylation of PP-MAPK";  // isVersionOf ec-code:3.1.3.16 GO:0006470 GO:0000188
    k10 = 150;

  // Unit definitions:
  unit substance = 1e-6 mole; substance is "micromole";
end
