// SBML level 2 version 1

model model_0000001()
  // Smolen2004_CircClock
  // No inititial conditions are specified in the paper. Because there is a basal rate of transcription for each gene, it doesn't matter much. With the agreement of Paul Smolen, I put all the initial concentration at 0.001 nanomoles. N Le Novère.
  // To the extent possible under law, all copyright and related or neighbouring rights to this encoded model have been dedicated to the public domain worldwide. Please refer to CC0 Public Domain Dedication for more information.
  // In summary, you are entitled to use this encoded model in absolutely any manner you deem suitable, verbatim, or with modification, alone or embedded it in a larger context, redistribute it, commercially or not, in a restricted way or not.
  // To cite BioModels Database, please use: Li C, Donizelli M, Rodriguez N, Dharuri H, Endler L, Chelliah V, Li L, He E, Henry A, Stefan MI, Snoep JL, Hucka M, Le Novère N, Laibe C (2010) BioModels Database: An enhanced, curated and annotated resource for published quantitative kinetic models. BMC Syst Biol., 4:92.
  // biomodels.db:MODEL6619579403
  // biomodels.db:BIOMD0000000034
  // isDescribedBy pubmed:15111397
  // hasTaxon taxonomy:7227
  // kegg.pathway:dme04710
  // isVersionOf GO:0042752

  // Compartments:
  compartment cytoplasm = 1;  // GO:0005737
  compartment nucleus in cytoplasm = 1;  // GO:0005634

  // Species:
  species P0nuc in nucleus = 0.001;  // isVersionOf uniprot:P07663
  species P1nuc in nucleus = 0.001;  // isVersionOf uniprot:P07663
  species P2nuc in nucleus = 0.001;  // isVersionOf uniprot:P07663
  species P0cyt in cytoplasm = 0.001;  // isVersionOf uniprot:P07663
  species P1cyt in cytoplasm = 0.001;  // isVersionOf uniprot:P07663
  species P2cyt in cytoplasm = 0.001;  // isVersionOf uniprot:P07663
  species VRI in nucleus = 0.001;  // uniprot:O18660
  species CLK in nucleus = 0.001;  // hasPart uniprot:O61735 uniprot:P07663
  species PDP in nucleus = 0.001;  // uniprot:Q9TVS7

  // Parameters:
  ACvri = 0;
  ACper = 0;
  ACpdp = 0;
  Kpv = 0.2;
  Kpp = 0.24;
  Kppd = 0.1;
  Kvc = 0.54;
  Kpdc = 0.54;
  Kcv = 0.083;
  Kcp = 0.134;
  Kcpd = 0.248;
  Kvdeac = 0.2124;
  Kpdeac = 0.2124;
  Kpddeac = 0.2124;
  Fv = 1.062;
  Fp = 1.062;
  Fpd = 1.062;
  OPvri = 0;
  OPper = 0;
  OPpdp = 0;
  Tvriop = 2.8249;
  Tperop = 2.8249;
  Tpdpop = 2.8249;
  N = 5;
  Vper = 10.62;
  Vvri = 76.464;
  Vpdp = 344.09;
  Vclk = 1.062;
  Rpbas = 0.02124;
  Rvbas = 0.19116;
  Rcbas = 0.001062;
  Rpdbas = 0.38232;
  Vdclk = 0.2124;
  vdvri = 0.7434;
  vdpdp = 0.6903;
  Tdelay = 2.8249;
  Vpcyt = 1.6992;
  Kpcyt = 0.25;
  Vpnuc = 0.3186;
  Kpnuc = 0.001;
  Vtrans = 1.6992;
  Ktrans = 0.25;
  Vdegp = 5.31;
  Kdegp = 0.01;
  kd = 0.00531;

  // Rate rules:
  ACvri' = Fv*(CLK/(CLK + Kcv))*(Kpv/(Kpv + P0nuc + P1nuc + P2nuc))*(1 - ACvri) - Kvdeac*ACvri;
  ACper' = Fp*(CLK/(CLK + Kcp))*(Kpp/(Kpp + P0nuc + P1nuc + P2nuc))*(1 - ACper) - Kpdeac*ACper;
  ACpdp' = Fpd*(CLK/(CLK + Kcpd))*(Kppd/(Kppd + P0nuc + P1nuc + P2nuc))*(1 - ACpdp) - Kpddeac*ACpdp;
  OPvri' = (ACvri^N - OPvri)/Tvriop;
  OPper' = (ACper^N - OPper)/Tperop;
  OPpdp' = (ACpdp^N - OPpdp)/Tpdpop;

  // Reactions:
  Per_production: => P0cyt; cytoplasm*(Vper*OPper + Rpbas);  // hasPart GO:0006412 GO:0006351
  Vri_production: => VRI; nucleus*(Vvri*OPvri + Rvbas);  // hasPart GO:0006412 GO:0006351
  Pdp_production: => PDP; nucleus*delay(Vpdp*OPpdp + Rpdbas, Tdelay);  // hasPart GO:0006412 GO:0006351
  Clk_production: => CLK; nucleus*(Vclk*(PDP^2/(PDP^2 + Kpdc^2))*(Kvc^2/(VRI^2 + Kvc^2)) + Rcbas);  // modifiers: PDP, VRI; hasPart GO:0006412 GO:0006351
  Clk_specific_degradation: CLK => ; nucleus*Vdclk*CLK;  // isVersionOf GO:0030163
  Pdp_specific_degradation: PDP => ; nucleus*vdpdp*PDP;  // isVersionOf GO:0030163
  Vri_specific_degradation: VRI => ; nucleus*vdvri*VRI;  // isVersionOf GO:0030163
  reaction_0000008: P0cyt => P1cyt; cytoplasm*(Vpcyt*P0cyt/(Kpcyt + P0cyt)); reaction_0000008 is "first cytoplasmic Per phosphorylation";  // isVersionOf ec-code:2.7.1.37 GO:0006468
  reaction_0000009: P1cyt => P2cyt; cytoplasm*(Vpcyt*P1cyt/(Kpcyt + P1cyt)); reaction_0000009 is "second cytoplasmic Per phosphorylation";  // isVersionOf ec-code:2.7.1.37 GO:0006468
  Per_nuclear_transport: P2cyt => P0nuc; cytoplasm*(Vtrans*P2cyt/(Ktrans + P2cyt));  // isVersionOf GO:0006606
  reaction_0000011: P0nuc => P1nuc; nucleus*(Vpnuc*P0nuc/(Kpnuc + P0nuc)); reaction_0000011 is "first nuclear Per phosphorylation";  // isVersionOf ec-code:2.7.1.37 GO:0006468
  reaction_0000012: P1nuc => P2nuc; nucleus*(Vpnuc*P1nuc/(Kpnuc + P1nuc)); reaction_0000012 is "second nuclear Rer phosphorylation";  // isVersionOf ec-code:2.7.1.37 GO:0006468
  Per_specific_degradation: P2nuc => ; nucleus*(Vdegp*P2nuc/(Kdegp + P2nuc));  // isVersionOf GO:0030163
  Clk_aspecific_degradation: CLK => ; nucleus*kd*CLK;  // isVersionOf GO:0030163
  Pdp_aspecific_degradation: PDP => ; nucleus*kd*PDP;  // isVersionOf GO:0030163
  Vri_aspecific_degradation: VRI => ; nucleus*kd*VRI;  // isVersionOf GO:0030163
  Per_cyt_aspecific_degradation: P0cyt => ; cytoplasm*kd*P0cyt;  // isVersionOf GO:0030163
  Per_P_cyt_aspecific_degradation: P1cyt => ; cytoplasm*kd*P1cyt; Per_P_cyt_aspecific_degradation is "Per-P_cyt aspecific degradation";  // isVersionOf GO:0030163
  Per_PP_cyt_aspecific_degradation: P2cyt => ; cytoplasm*kd*P2cyt; Per_PP_cyt_aspecific_degradation is "Per-PP_cyt aspecific degradation";  // isVersionOf GO:0030163
  Per_nuc_aspecific_degradation: P0nuc => ; nucleus*kd*P0nuc;  // isVersionOf GO:0030163
  Per_P_nuc_aspecific_degradation: P1nuc => ; nucleus*kd*P1nuc; Per_P_nuc_aspecific_degradation is "Per-P_nuc aspecific degradation";  // isVersionOf GO:0030163
  Per_PP_nuc_aspecific_degradation: P2nuc => ; nucleus*kd*P2nuc; Per_PP_nuc_aspecific_degradation is "Per-PP_nuc aspecific degradation";  // isVersionOf GO:0030163

  // Unit definitions:
  unit time = 3600 second; time is "hour";
  unit substance = 1e-9 mole; substance is "nanomole";
end
