// SBML level 2 version 3

model Goldbeter2008_Somite_Segmentation_Clock_Notch_Wnt_FGF()
  // This is a model of the coupled Natch, Wnt and FGF modules as described in:
  // A. Goldbeter and O. Pourquié , Modeling the segmentation clock as a network of coupled oscillations in the Notch, Wnt and FGF signaling pathways. J Theor Biol. 2008 Jun 7;252(3):574-85, pubmed ID: 18308339
  // To uncouple the modules remove the reaction MAx_trans_Xa and set vsFK=vsF .
  // The SBML version of the model was converted from the CellML version by Catherine Lloyd for the CellML repository .
  // To the extent possible under law, all copyright and related or neighbouring rights to this encoded model have been dedicated to the public domain worldwide. Please refer to CC0 Public Domain Dedication for more information.
  // In summary, you are entitled to use this encoded model in absolutely any manner you deem suitable, verbatim, or with modification, alone or embedded it in a larger context, redistribute it, commercially or not, in a restricted way or not.
  // To cite BioModels Database, please use: Li C, Donizelli M, Rodriguez N, Dharuri H, Endler L, Chelliah V, Li L, He E, Henry A, Stefan MI, Snoep JL, Hucka M, Le Novère N, Laibe C (2010) BioModels Database: An enhanced, curated and annotated resource for published quantitative kinetic models. BMC Syst Biol., 4:92.
  // biomodels.db:MODEL6415057828
  // biomodels.db:BIOMD0000000201
  // isDescribedBy pubmed:18308339
  // hasVersion GO:0007219 GO:0008543 GO:0016055
  // isPartOf GO:0001756
  // hasVersion kegg.pathway:ko04010 kegg.pathway:ko04330 kegg.pathway:ko04310

  // Compartments:
  compartment cytosol = 1 litre;  // GO:0005829

  // Species:
  species N in cytosol = 0.5; N is "Notch protein";  // isHomologTo uniprot:P46531; isVersionOf interpro:IPR008297
  species Na in cytosol = 0.2; Na is "cytosolic NicD";  // isPartOf interpro:IPR008297
  species Nan in cytosol = 0; Nan is "nuclear NicD";  // isPartOf interpro:IPR008297
  species MF in cytosol = 0.1; MF is "Lunatic fringe mRNA";  // isVersionOf CHEBI:33699; encodes uniprot:Q8NES3 interpro:IPR017374
  species F in cytosol = 0.001; F is "Lunatic Fringe protein";  // isVersionOf interpro:IPR017374; isHomologTo uniprot:Q8NES3
  species Bp in cytosol = 0.1; Bp is "phosph. beta-catenin";  // isHomologTo uniprot:P35222; isVersionOf interpro:IPR013284 kegg.compound:C00562
  species BN in cytosol = 0.001; BN is "nuclear beta-catenin";  // isHomologTo uniprot:P35222; isVersionOf interpro:IPR013284
  species A in cytosol = 0.1; A is "Axin2 protein";  // isHomologTo uniprot:Q9Y2T1
  species K in cytosol = 3; K is "Gsk3";  // isHomologTo uniprot:P49841
  species B in cytosol = 0.1; B is "beta-catenin";  // isVersionOf interpro:IPR013284
  species MAx in cytosol = 0.1; MAx is "Axin2 mRNA";  // isVersionOf CHEBI:33699; isHomologTo ensembl:ENSG00000168646; encodes uniprot:Q9Y2T1
  species Rasa in cytosol = 0.5; Rasa is "active Ras";  // hasVersion CHEBI:15996 interpro:IPR001806
  species ERKa in cytosol = 0.2; ERKa is "active ERK";  // isVersionOf interpro:IPR008349
  species Xa in cytosol = 0.1; Xa is "active TF X";  // isVersionOf interpro:IPR006715
  species MDusp in cytosol = 0.1; MDusp is "Dusp6 mRNA";  // encodes uniprot:Q16828; isHomologTo ensembl:ENSG00000139318
  species Dusp in cytosol = 0.1; Dusp is "Dusp6 protein";  // isHomologTo uniprot:Q16828
  species $Rasi in cytosol; Rasi is "inactive Ras";  // hasVersion CHEBI:17552 interpro:IPR001806
  species $ERKi in cytosol; ERKi is "inactive ERK";  // isVersionOf interpro:IPR008349
  species $Xi in cytosol; Xi is "inactive TF X";  // isVersionOf interpro:IPR006715
  species Rast in cytosol = 2; Rast is "Ras total";  // isVersionOf interpro:IPR001806
  species ERKt in cytosol = 2; ERKt is "ERK total";  // isVersionOf interpro:IPR008349
  species Xt in cytosol = 2; Xt is "X total";  // isVersionOf interpro:IPR006715
  species D in cytosol = 2; D is "Dsh protein";  // isVersionOf interpro:IPR003351; isHomologTo uniprot:O14640
  species $AK in cytosol; AK is "Axin2/Gsk3 destruction complex";  // hasPart uniprot:Q9Y2T1 uniprot:P49841
  species $Kt in cytosol = 3;  // isHomologTo uniprot:P49841
  species $Fgf in cytosol = 1;  // isVersionOf interpro:IPR017338

  // Parameters:
  KdN = 1.4 nanomolar;
  vsN = 0.23 flux;
  vdN = 2.82 flux;
  KdNa = 0.001 nanomolar;
  VdNa = 0.01 flux;
  kt1 = 0.1 first_order_rate_constant;
  kt2 = 0.1 first_order_rate_constant;
  KdNan = 0.001 nanomolar;
  VdNan = 0.1 flux;
  KdMF = 0.768 nanomolar;
  KIG1 = 2.5 nanomolar;
  vsFK has flux;
  vsF = 3 flux;
  vmF = 1.92 flux;
  KA = 0.05 nanomolar;
  KdF = 0.37 nanomolar;
  vdF = 0.39 flux;
  ksF = 0.3 first_order_rate_constant;
  kd1 = 0 first_order_rate_constant;
  vsB = 0.087 flux;
  kd2 = 7.062 first_order_rate_constant;
  v0 = 0.06 flux;
  vMB = 1.64 flux;
  vmd = 0.8 flux;
  KaB = 0.7 nanomolar;
  KaXa = 0.05 nanomolar;
  Kmd = 0.48 nanomolar;
  n = 2 dimensionless;
  m = 2 dimensionless;
  vMXa = 0.5 flux;
  ksAx = 0.02 first_order_rate_constant;
  vdAx = 0.6 flux;
  KdAx = 0.63 nanomolar;
  d1 = 0.1 first_order_rate_constant;
  a1 = 1.8 second_order_rate_constant;
  K1 = 0.28 nanomolar;
  K2 = 0.03 nanomolar;
  kt3 = 0.7 first_order_rate_constant;
  kt4 = 1.5 first_order_rate_constant;
  ksDusp = 0.5 first_order_rate_constant;
  vdDusp = 2 flux;
  KdDusp = 0.5 nanomolar;
  kcDusp = 1.35 first_order_rate_constant;
  KaFgf = 0.5 nanomolar;
  KaRas = 0.103 nanomolar;
  KdRas = 0.1 nanomolar;
  KdErk = 0.05 nanomolar;
  KaErk = 0.05 nanomolar;
  KaX = 0.05 nanomolar;
  KIF = 0.5 nanomolar;
  KID = 0.5 nanomolar;
  KdX = 0.05 nanomolar;
  KaMDusp = 0.5 nanomolar;
  KdMDusp = 0.5 nanomolar;
  q = 2 dimensionless;
  r = 2 dimensionless;
  kc = 3.45 first_order_rate_constant;
  j = 2 dimensionless;
  p = 2 dimensionless;
  epsilon = 0.3 dimensionless;
  theta = 1.5 dimensionless;
  eta = 0.3 dimensionless;
  VMsMDusp = 0.9 flux;
  VMdMDusp = 0.5 flux;
  VMK = 5.08 flux;
  VMP = 1 flux;
  VMaRas = 4.968 flux;
  VMdRas = 0.41 flux;
  VMaErk = 3.3 flux;
  VMaX = 1.6 flux;
  VMdX = 0.5 flux;

  // Assignment rules:
  vsFK := vsF*(KIG1/(KIG1 + K));
  AK := Kt - K;
  Rasi := Rast - Rasa;
  ERKi := ERKt - ERKa;
  Xi := Xt - Xa;

  // Reactions:
  n_synth: => N; cytosol*epsilon*vsN; n_synth is "Notch_synthesis";  // isVersionOf GO:0010467
  N_degradation: N => ; epsilon*cytosol*vdN*N/(KdN + N);  // isVersionOf GO:0030163
  N_activation: N => Na; epsilon*cytosol*kc*N*KIF^j/(KIF^j + F^j); N_activation is "Notch_activation";  // modifiers: F; isVersionOf reactome:REACT_691.2 GO:0007220
  Na_degradation: Na => ; epsilon*cytosol*VdNa*Na/(KdNa + Na);  // isVersionOf GO:0030163
  Na_transport: Na -> Nan; epsilon*cytosol*(kt1*Na - kt2*Nan);  // isVersionOf reactome:REACT_2155.3 GO:0006913
  Nan_degradation: Nan => ; epsilon*cytosol*VdNan*Nan/(KdNan + Nan);  // isVersionOf GO:0030163
  MF_transkription: => MF; epsilon*cytosol*vsFK*Nan^p/(KA^p + Nan^p);  // modifiers: Nan; isVersionOf GO:0009299
  MF_degradation: MF => ; epsilon*cytosol*vmF*MF/(KdMF + MF);  // isVersionOf GO:0006402
  F_translation: => F; epsilon*cytosol*ksF*MF;  // modifiers: MF; isVersionOf GO:0006412
  F_degradation: F => ; epsilon*cytosol*vdF*F/(KdF + F);  // isVersionOf GO:0030163
  AK_dissoc: $AK -> A + K; theta*cytosol*(d1*AK - a1*A*K);  // isVersionOf GO:0043241
  B_synth: => B; theta*cytosol*vsB;  // isVersionOf GO:0010467
  B_degradation: B => ; theta*cytosol*kd1*B;  // isVersionOf GO:0030163
  B_phosphorylation: B => Bp; theta*cytosol*VMK*KID/(KID + D)*B/(K1 + B)*AK/Kt;  // modifiers: AK, D, Kt; isVersionOf reactome:REACT_11065.1 GO:0006468
  BP_dephosphorylation: Bp => B; theta*cytosol*VMP*Bp/(K2 + Bp);  // isVersionOf GO:0006470
  B_shuttling: BN -> B; theta*cytosol*(kt4*BN - kt3*B);  // isVersionOf GO:0006913
  Bp_degradation: Bp => ; theta*cytosol*kd2*Bp;  // isVersionOf reactome:REACT_11063.1 GO:0030163
  MAx_trans_basal: => MAx; theta*cytosol*v0;  // modifiers: BN; isVersionOf GO:0009299
  MAx_trans_BN: => MAx; theta*cytosol*(vMB*BN^n/(KaB^n + BN^n));  // modifiers: BN; isVersionOf GO:0009299
  MAx_trans_Xa: => MAx; theta*cytosol*(vMXa*Xa^m/(KaXa^m + Xa^m));  // modifiers: Xa; isVersionOf GO:0009299
  MAx_degradation: MAx => ; theta*cytosol*vmd*MAx/(Kmd + MAx);  // isVersionOf GO:0006402
  A_translation: => A; theta*cytosol*ksAx*MAx;  // modifiers: MAx; isVersionOf GO:0006412
  A_degradation: A => ; theta*cytosol*vdAx*A/(KdAx + A);  // isVersionOf GO:0030163
  Ras_activation: => Rasa; eta*cytosol*VMaRas*Fgf^r/(KaFgf^r + Fgf^r)*Rasi/(KaRas + Rasi);  // modifiers: Rasi, Fgf; isVersionOf reactome:REACT_2010.5 GO:0032856
  Ras_inactivation: Rasa => ; eta*cytosol*VMdRas*Rasa/(KdRas + Rasa);  // isVersionOf GO:0034261
  Erk_activation: => ERKa; eta*cytosol*VMaErk*Rasa/Rast*ERKi/(KaErk + ERKi);  // modifiers: ERKi, Rasa, Rast; isVersionOf reactome:REACT_1482.4
  Erk_inactivation: ERKa => ; eta*cytosol*kcDusp*Dusp*ERKa/(KdErk + ERKa);  // modifiers: Dusp; isVersionOf reactome:REACT_12436.1
  X_activation: => Xa; eta*cytosol*VMaX*ERKa/ERKt*Xi/(KaX + Xi);  // modifiers: ERKa, ERKt, Xi; isVersionOf GO:0051091
  X_inactivation: Xa => ; eta*cytosol*VMdX*Xa/(KdX + Xa);  // isVersionOf GO:0043433
  MDusp_transkription: => MDusp; eta*cytosol*VMsMDusp*Xa^q/(KaMDusp^q + Xa^q);  // modifiers: Xa; isVersionOf GO:0009299
  MDusp_degradation: MDusp => ; eta*cytosol*VMdMDusp*MDusp/(KdMDusp + MDusp);  // isVersionOf GO:0006402
  Dusp_translation: => Dusp; eta*cytosol*ksDusp*MDusp;  // modifiers: MDusp; isVersionOf GO:0006412
  Dusp_degradation: Dusp => ; eta*cytosol*vdDusp*Dusp/(KdDusp + Dusp);  // isVersionOf GO:0030163

  // Unit definitions:
  unit substance = 1e-9 mole; substance is "nanomole";
  unit time = 60 second; time is "minute";
  unit first_order_rate_constant = 1 / (60 second);
  unit second_order_rate_constant = litre / (1e-9 mole * 60 second);
  unit flux = 1e-9 mole / (litre * 60 second);
  unit nanomolar = 1e-9 mole / litre;
end
