// SBML level 2 version 3

function function_4_r1(Dex, system)
  Dex/system;
end

function function_4_r8(CP, CP2, IC, Jp, kp1, system)
  kp1*CP/(Jp + CP + 2*CP2 + 2*IC)/system;
end

function function_4_r2(J, TF, kms, n, system)
  kms*TF^n/(J^n + TF^n)/system;
end

function function_4_r17(CP, CP2, IC, Jp, kp2, system)
  kp2*IC/(Jp + CP + 2*CP2 + 2*IC)/system;
end

function function_4_r13(CP, CP2, IC, Jp, kp2, system)
  kp2*CP2/(Jp + CP + 2*CP2 + 2*IC)/system;
end

function Rate_Law_for_r4(kcps, M)
  kcps*M;
end

model Hong2009_CircadianClock()
  // This a model from the article:
  // Minimum criteria for DNA damage-induced phase advances in circadian rhythms.
  // Hong CI, Zámborszky J, Csikász-Nagy A. PLoS Comput Biol. 2009 May;5(5):e1000384. 19424508,
  // Abstract:
  // Robust oscillatory behaviors are common features of circadian and cell cycle rhythms. These cyclic processes, however, behave distinctively in terms of their periods and phases in response to external influences such as light, temperature, nutrients, etc. Nevertheless, several links have been found between these two oscillators. Cell division cycles gated by the circadian clock have been observed since the late 1950s. On the other hand, ionizing radiation (IR) treatments cause cells to undergo a DNA damage response, which leads to phase shifts (mostly advances) in circadian rhythms. Circadian gating of the cell cycle can be attributed to the cell cycle inhibitor kinase Wee1 (which is regulated by the heterodimeric circadian clock transcription factor, BMAL1/CLK), and possibly in conjunction with other cell cycle components that are known to be regulated by the circadian clock (i.e., c-Myc and cyclin D1). It has also been shown that DNA damage-induced activation of the cell cycle regulator, Chk2, leads to phosphorylation and destruction of a circadian clock component (i.e., PER1 in Mus or FRQ in Neurospora crassa). However, the molecular mechanism underlying how DNA damage causes predominantly phase advances in the circadian clock remains unknown. In order to address this question, we employ mathematical modeling to simulate different phase response curves (PRCs) from either dexamethasone (Dex) or IR treatment experiments. Dex is known to synchronize circadian rhythms in cell culture and may generate both phase advances and delays. We observe unique phase responses with minimum delays of the circadian clock upon DNA damage when two criteria are met: (1) existence of an autocatalytic positive feedback mechanism in addition to the time-delayed negative feedback loop in the clock system and (2) Chk2-dependent phosphorylation and degradation of PERs that are not bound to BMAL1/CLK.
  // The original xpp file of the model is available as a supplement of the article (Text S1).
  // This model originates from BioModels Database: A Database of Annotated Published Models. It is copyright (c) 2005-2010 The BioModels Team.
  // For more information see the terms of use.
  // To cite BioModels Database, please use Le Novère N., Bornstein B., Broicher A., Courtot M., Donizelli M., Dharuri H., Li L., Sauro H., Schilstra M., Shapiro B., Snoep J.L., Hucka M. (2006) BioModels Database: A Free, Centralized Database of Curated, Published, Quantitative Kinetic Models of Biochemical and Cellular Systems Nucleic Acids Res., 34: D689-D691.
  // biomodels.db:MODEL7984093336
  // biomodels.db:BIOMD0000000216
  // isDescribedBy pubmed:19424508
  // isDerivedFrom pubmed:18057329
  // hasTaxon taxonomy:40674
  // isVersionOf kegg.pathway:map04710 GO:0042752

  // Compartments:
  compartment system = 1;  // isVersionOf GO:0005623

  // Species:
  species M in system = 1.4;  // isVersionOf CHEBI:33699 kegg.compound:C00046
  species TF in system = 0.13;  // hasPart uniprot:P49759 uniprot:O00327
  species CP in system = 0.037;  // isHomologTo uniprot:O15516
  species CP2 in system = 0.046;  // hasPart uniprot:O15516
  // Inactive complex of clock dimers and transcription factor: IC= TFtot-TF
  species IC in system = 0.37;  // hasPart uniprot:P49759 uniprot:O00327 uniprot:O15516
  species $CPtot in system;

  // Parameters:
  Dex = 0;  // isVersionOf CHEBI:41879
  kms = 1;
  n = 2;
  J = 0.3;
  kmd = 0.1;
  kcps = 0.5;
  kcpd = 0.525;
  ka = 100;
  kd = 0.01;
  kp1 = 10;
  Jp = 0.05;
  chk2 = 0;
  kicd = 0.01;
  kcp2d = 0.0525;
  kica = 20;
  chk2c = 0;
  kp2 = 0.1;
  // Inactive complex of clock dimers and transcription factor: IC=TFtot-TF
  ICtot = 1; ICtot is "TFtot";

  // Assignment rules:
  CPtot := CP + 2*CP2 + 2*IC;

  // Reactions:
  r1: => M; system*function_4_r1(Dex, system);
  r2: => M; system*function_4_r2(J, TF, kms, n, system);  // modifiers: TF
  r3: M => ; system*kmd*M;
  r4: => CP; system*Rate_Law_for_r4(kcps, M);  // modifiers: M
  r5: CP => ; system*kcpd*CP;
  r6: 2 CP => CP2; system*ka*CP^2;
  r7: CP2 => 2 CP; system*kd*CP2;
  r8: CP => ; system*function_4_r8(CP, CP2, IC, Jp, kp1, system);  // modifiers: CP2, IC
  r9: CP => ; system*chk2*CP;
  r10: IC => CP2 + TF; system*kicd*IC;
  r11: CP2 => ; system*kcp2d*CP2;
  r12: CP2 + TF => IC; system*kica*CP2*TF;
  r13: CP2 => ; system*function_4_r13(CP, CP2, IC, Jp, kp2, system);  // modifiers: CP, IC
  r14: CP2 => ; system*chk2*CP2;
  r15: IC => TF; system*kcp2d*IC;
  r16: IC => TF; system*chk2c*IC;
  r17: IC => TF; system*function_4_r17(CP, CP2, IC, Jp, kp2, system);  // modifiers: CP2, CP
end
