// SBML level 2 version 4

model Schaber2006_Pheromone_Starvation_Crosstalk()
  // This a model from the article:
  // A modelling approach to quantify dynamic crosstalk between the pheromone and the starvation pathway in baker's yeast.
  // Schaber J, Kofahl B, Kowald A, Klipp E FEBS J.2006 Aug; 273(15):3520-33 16884493,
  // Abstract:
  // Cells must be able to process multiple information in parallel and, moreover, they must also be able to combine this information in order to trigger the appropriate response. This is achieved by wiring signalling pathways such that they can interact with each other, a phenomenon often called crosstalk. In this study, we employ mathematical modelling techniques to analyse dynamic mechanisms and measures of crosstalk. We present a dynamic mathematical model that compiles current knowledge about the wiring of the pheromone pathway and the filamentous growth pathway in yeast. We consider the main dynamic features and the interconnections between the two pathways in order to study dynamic crosstalk between these two pathways in haploid cells. We introduce two new measures of dynamic crosstalk, the intrinsic specificity and the extrinsic specificity. These two measures incorporate the combined signal of several stimuli being present simultaneously and seem to be more stable than previous measures. When both pathways are responsive and stimulated, the model predicts that (a) the filamentous growth pathway amplifies the response of the pheromone pathway, and (b) the pheromone pathway inhibits the response of filamentous growth pathway in terms of mitogen activated protein kinase activity and transcriptional activity, respectively. Among several mechanisms we identified leakage of activated Ste11 as the most influential source of crosstalk. Moreover, we propose new experiments and predict their outcomes in order to test hypotheses about the mechanisms of crosstalk between the two pathways. Studying signals that are transmitted in parallel gives us new insights about how pathways and signals interact in a dynamical way, e.g., whether they amplify, inhibit, delay or accelerate each other.
  // This model originates from BioModels Database: A Database of Annotated Published Models. It is copyright (c) 2005-2009 The BioModels Team.
  // For more information see the terms of use.
  // To cite BioModels Database, please use Le Novère N., Bornstein B., Broicher A., Courtot M., Donizelli M., Dharuri H., Li L., Sauro H., Schilstra M., Shapiro B., Snoep J.L., Hucka M. (2006) BioModels Database: A Free, Centralized Database of Curated, Published, Quantitative Kinetic Models of Biochemical and Cellular Systems Nucleic Acids Res., 34: D689-D691.
  // biomodels.db:MODEL5952001443
  // biomodels.db:BIOMD0000000237
  // isDescribedBy pubmed:16884493
  // hasTaxon taxonomy:4932
  // hasVersion GO:0042810 GO:0010570
  // isVersionOf GO:0009267

  // Compartments:
  compartment compartment = 1;  // GO:0005623

  // Species:
  species Ste5 in compartment = 42.3;  // isVersionOf uniprot:P32917; hasProperty GO:0005078
  species Ste11 in compartment = 13.3;  // isVersionOf uniprot:P23561; hasProperty GO:0004709
  species Ste5Ste11 in compartment = 5.6;  // hasPart uniprot:P23561 uniprot:P32917
  species Gbg in compartment = 53;  // hasPart uniprot:A6ZP55 uniprot:P53130
  species Ste5Ste11Gbg in compartment = 0;  // hasPart uniprot:P53130 uniprot:A6ZP55 uniprot:P32917 uniprot:P23561
  species Fus3 in compartment = 217;  // isVersionOf uniprot:P16892
  species Ste5Ste11GbgFus3 in compartment = 0;  // hasPart uniprot:P32917 uniprot:P23561 uniprot:A6ZP55 uniprot:P53130
  species Ste5Ste11GbgFus3P in compartment = 0;  // hasPart uniprot:P32917 uniprot:P23561 uniprot:A6ZP55 uniprot:P53130
  species Fus3PP in compartment = 0;  // isVersionOf uniprot:P16892; hasProperty GO:0004707
  species Ste5Ste11GbgP in compartment = 0;  // hasPart uniprot:P32917 uniprot:P23561 uniprot:A6ZP55 uniprot:P53130
  species Ste11Ubi in compartment = 0;  // hasPart uniprot:P23561 uniprot:P61864
  species $p in compartment = 0;
  species Kss1 in compartment = 54.4;  // isVersionOf uniprot:P14681
  species Ste5Ste11GbgKss1 in compartment = 0;  // hasPart uniprot:P32917 uniprot:P23561 uniprot:A6ZP55 uniprot:P53130
  species Ste5Ste11GbgKss1P in compartment = 0;  // hasPart uniprot:P32917 uniprot:P23561 uniprot:A6ZP55 uniprot:P53130
  species Kss1PP in compartment = 0;  // isVersionOf uniprot:P14681
  species Ste11P in compartment = 0;  // isVersionOf uniprot:P23561
  species Ste12Kss1 in compartment = 35.9;  // hasPart uniprot:P14681 uniprot:P13574
  species Ste12 in compartment = 0.07;  // isVersionOf uniprot:P13574
  species Ste12P in compartment = 0;  // isVersionOf uniprot:P13574
  species $s in compartment = 0;
  species PREP in compartment = 0;  // isPartOf GO:0019236
  species Ste12TeSte5Kss1 in compartment = 13.7;  // hasPart uniprot:P32917 uniprot:P14681 uniprot:P13574
  species Ste12TeSte5 in compartment = 0.25;  // hasPart uniprot:P32917 uniprot:P13574
  species Ste12TeSte5P in compartment = 0;  // hasPart uniprot:P32917 uniprot:P13574
  species FREP in compartment = 0;  // isPartOf GO:0045311

  // Parameters:
  alphaA = 1;
  betaA = 1;
  alphat = 0;
  betat = 0;
  alphas = 2;
  betas = 20;
  alphae = 10;
  betae = 360;
  k3 = 1;
  k4 = 1;
  k5 = 1;
  k6 = 1;
  k9 = 1;
  k10 = 1;
  k11 = 1;
  k12 = 1;
  k13 = 1;
  k17 = 1;
  k19 = 1;
  k20 = 1;
  k21 = 1;
  k22 = 1;
  k23 = 1;
  k25 = 1;
  k27 = 1;
  k31 = 1;
  k32 = 1;
  k33 = 1;
  k34 = 1;
  k8 = 0.1;
  k14 = 0.1;
  k15 = 0.1;
  k16 = 0.1;
  k26 = 0.1;
  k30 = 0.1;
  k7 = 10;
  k18 = 10;
  k1 = 0.01;
  k2 = 0.01;
  k24 = 0.01;
  k28 = 0.01;
  k29 = 0.01;
  alphastim = 1;
  betastim = 1;

  // Assignment rules:
  alpha := alphastim*piecewise(alphaA*(1 - exp(-(time - alphat)/alphas)), (time >= alphat) && (time <= alphae), piecewise(alphaA*exp(-(time - alphat)/alphas), time >= alphae, 0));
  beta := betastim*betaA*piecewise(1 - exp(-(time - betat)/betas), (time >= betat) && (time <= betae), piecewise(exp(-(time - betae)/betas), time > betae, 0));

  // Reactions:
  v1: Ste5 + Ste11 -> Ste5Ste11; compartment*k1*Ste5*Ste11;  // isVersionOf GO:0006461
  v2: Ste5Ste11 + Gbg -> Ste5Ste11Gbg; compartment*k2*Ste5Ste11*Gbg*alpha;  // isVersionOf GO:0006461
  v3: Ste5Ste11Gbg + Fus3 -> Ste5Ste11GbgFus3; compartment*k3*Ste5Ste11Gbg*Fus3;  // isVersionOf GO:0006461
  v4: Ste5Ste11GbgFus3 -> Ste5Ste11GbgFus3P; compartment*k4*Ste5Ste11GbgFus3;  // isVersionOf GO:0016310
  v5: Ste5Ste11GbgFus3P -> Fus3PP + Ste5Ste11GbgP; compartment*k5*Ste5Ste11GbgFus3P;  // isVersionOf GO:0016310 GO:0043241
  v6: Fus3 + Ste5Ste11GbgP -> Ste5Ste11GbgFus3P; compartment*k6*Fus3*Ste5Ste11GbgP;  // isVersionOf GO:0006461
  v7: Ste5 + Ste5Ste11GbgP -> Gbg + Ste11Ubi; compartment*k7*Ste5Ste11GbgP;  // isVersionOf GO:0043241
  v8: Ste11Ubi -> $p; compartment*k8*Ste11Ubi;  // isVersionOf GO:0030163
  v9: Ste5Ste11Gbg + Kss1 -> Ste5Ste11GbgKss1; compartment*k9*Ste5Ste11Gbg*Kss1;  // isVersionOf GO:0006461
  v10: Ste5Ste11GbgKss1 -> Ste5Ste11GbgKss1P; compartment*k10*Ste5Ste11GbgKss1;  // isVersionOf GO:0016310
  v11: Ste5Ste11GbgKss1P -> Ste5Ste11GbgP + Kss1PP; compartment*k11*Ste5Ste11GbgKss1P;  // isVersionOf GO:0016310 GO:0043241
  v12: Ste5Ste11GbgP + Kss1 -> Ste5Ste11GbgKss1P; compartment*k12*Ste5Ste11GbgP*Kss1;  // isVersionOf GO:0006461
  v13: Ste11 -> Ste11P; compartment*k13*Ste11*beta;  // isVersionOf GO:0016310
  v14: Ste11P -> Ste11; compartment*k14*Ste11P;  // isVersionOf GO:0016311
  v15: Kss1 -> Kss1PP; compartment*(k15*Kss1*Ste11P + k30*Kss1*Ste11Ubi);  // modifiers: Ste11P, Ste11Ubi; isVersionOf GO:0016310
  v16: Kss1PP -> Kss1; compartment*(k16*Kss1PP + k28*Kss1PP*Fus3PP);  // modifiers: Fus3PP; isVersionOf GO:0016311
  v17: Ste12Kss1 -> 2 Kss1 + Ste12; compartment*k17*Ste12Kss1;  // isVersionOf GO:0043241
  v18: 2 Kss1 + Ste12 -> Ste12Kss1; compartment*k18*Kss1*Ste12;  // isVersionOf GO:0006461
  v19: Ste12 -> Ste12P; compartment*(k19*Ste12*Fus3PP + k29*Ste12*Kss1PP);  // modifiers: Fus3PP, Kss1PP; isVersionOf GO:0016310
  v20: $s -> PREP; compartment*k20*Ste12P;  // modifiers: Ste12P; isVersionOf GO:0010467
  v21: Ste12TeSte5Kss1 -> Kss1 + Ste12TeSte5; compartment*k21*Ste12TeSte5Kss1;  // isVersionOf GO:0043241
  v22: Kss1 + Ste12TeSte5 -> Ste12TeSte5Kss1; compartment*k22*Kss1*Ste12TeSte5;  // isVersionOf GO:0006461
  v23: Ste12TeSte5 -> Ste12TeSte5P; compartment*k23*Ste12TeSte5*Kss1PP;  // modifiers: Kss1PP; isVersionOf GO:0016310
  v24: Ste12TeSte5 -> $p; compartment*k24*Ste12TeSte5*Fus3PP;  // modifiers: Fus3PP
  v25: $s -> FREP; compartment*k25*Ste12TeSte5P;  // modifiers: Ste12TeSte5P; isVersionOf GO:0010467
  v26: Fus3PP -> Fus3; compartment*k26*Fus3PP;  // isVersionOf GO:0016311
  v27: Ste5Ste11 -> Ste5 + Ste11; compartment*k27*Ste5Ste11;  // isVersionOf GO:0043241
  v28: Ste12P -> Ste12; compartment*k31*Ste12P;  // isVersionOf GO:0016311
  v29: PREP -> $p; compartment*k32*PREP;  // isVersionOf GO:0030163
  v30: Ste12TeSte5P -> Ste12TeSte5; compartment*k33*Ste12TeSte5P;  // isVersionOf GO:0016311
  v31: FREP -> $p; compartment*k34*FREP;  // isVersionOf GO:0030163
end
