// SBML level 2 version 4

model Rovers1995_Photsynthetic_Oscillations()
  // This is the model described in the article:
  // Photosynthetic oscillations and the interdependence of photophosphorylation and electron transport as studied by a mathematical model.
  // Rovers W, Giersch C. Biosystems. 1995;35(1):63-73. PMID: 7772723
  // Abstract:
  // A simple mathematical model of photosynthetic carbon metabolism as driven by ATP and NADPH has been formulated to analyse photosynthetic oscillations. Two essential assumptions of this model are: (i) reduction of 3-phosphoglycerate to triosephosphate in the Clavin cycle is limited by ATP, not by NADPH, and (ii) photophosphorylation is affected by the availability of both ADP and NADP, while electron transport is limited by NADP only. The model produces oscillations of observed damping and period in ATP and NADP concentrations which are about 180 degrees out of phase, while three alternative proposals regarding coupling of electron transport and photophosphorylation do not produce oscillatory model solutions. The phases of ATP and NADPH are in reasonable agreement with the available experimental data. The model (which assumes that redox control of photophosphorylation is part of the oscillatory mechanism) is compared with an alternative proposal (that oscillations are due to interdependence of turnover of adenylates and Calvin cycle intermediates). From the similarity of the mathematical structures of both models it is inviting to speculate that both models are partial aspects of the oscillatory mechanism.
  // To the extent possible under law, all copyright and related or neighbouring rights to this encoded model have been dedicated to the public domain worldwide. Please refer to CC0 Public Domain Dedication for more information.
  // In summary, you are entitled to use this encoded model in absolutely any manner you deem suitable, verbatim, or with modification, alone or embedded it in a larger context, redistribute it, commercially or not, in a restricted way or not.
  // To cite BioModels Database, please use: Li C, Donizelli M, Rodriguez N, Dharuri H, Endler L, Chelliah V, Li L, He E, Henry A, Stefan MI, Snoep JL, Hucka M, Le Novère N, Laibe C (2010) BioModels Database: An enhanced, curated and annotated resource for published quantitative kinetic models. BMC Syst Biol., 4:92.
  // biomodels.db:MODEL1101060001
  // biomodels.db:BIOMD0000000292
  // isDescribedBy pubmed:7772723
  // isVersionOf kegg.pathway:rn00710
  // isVersionOf GO:0019253
  // hasTaxon taxonomy:33090

  // Compartments:
  compartment c = 1 volume;  // GO:0009570

  // Species:
  species NADPH in c = 0.7;  // CHEBI:16474; kegg.compound:C00005
  species $ADP in c;  // kegg.compound:C00008; CHEBI:16761
  species ATP in c = 0.5;  // CHEBI:15422; kegg.compound:C00002
  species X in c = 2;  // hasPart CHEBI:16108 CHEBI:17797 CHEBI:17363 CHEBI:16905; hasPart kegg.compound:C00111 kegg.compound:C00117 kegg.compound:C00199 kegg.compound:C05382
  species $Y in c = 1;  // hasPart CHEBI:17794 CHEBI:16710; hasPart kegg.compound:C00197 kegg.compound:C01182
  species $NADP in c; NADP is "NADP_super_+";  // CHEBI:18009; kegg.compound:C00006

  // Parameters:
  k1 = 0.123 per_s;
  k2 = 0.625 per_s;
  k3 = 0.3 per_mM_per_s;
  k4 = 0.614 per_s;
  N0 = 1.2 mM;  // hasPart CHEBI:16474 CHEBI:18009; hasPart kegg.compound:C00005 kegg.compound:C00006
  A0 = 2.5 mM;  // CHEBI:16761 CHEBI:15422; hasPart kegg.compound:C00002 kegg.compound:C00008

  // Assignment rules:
  NADP := N0 - NADPH;
  ADP := A0 - ATP;

  // Reactions:
  v4: $NADP => NADPH; c*k4*NADP;  // isVersionOf GO:0009780
  v3: 2 $ADP => 2 ATP; c*k3*ADP*NADP;  // modifiers: NADP; isVersionOf GO:0009777
  v2: $Y + NADPH + ATP => X + $ADP + $NADP; c*k2*ATP;  // hasVersion kegg.reaction:R01512 kegg.reaction:R01063; hasVersion ec-code:2.7.2.3 ec-code:1.2.1.13 ec-code:1.2.1.59
  v1: X + ATP => $Y + $ADP; c*k1*X;  // isVersionOf ec-code:2.7.1.19; isVersionOf kegg.reaction:R01523

  // Unit definitions:
  unit substance = 1e-3 mole; substance is "mmole";
  unit mM = 1e-3 mole / litre;
  unit per_mM_per_s = litre / (second * 1e-3 mole);
  unit per_s = 1 / second;
  unit volume = litre;
  unit area = metre^2;
  unit length = metre;
  unit time = second;
end
