// SBML level 2 version 4

function F(X, T)
  piecewise(1, X >= T, 0);
end

model shenorr02()
  // Shen-Orr2002_FeedForward_AND_gate
  // This is the coherent feed forward loop with an AND-gate like control of the response operon described in the article:
  // Network motifs in the transcriptional regulation network of Escherichia coli
  // Shai S. Shen-Orr, Ron Milo, Shmoolik Mangan, Uri Alon, Nat Genet 2002 31:64-68; PMID: 11967538 ; DOI: 10.1038/ng881 ;
  // Abstract:
  // Little is known about the design principles of transcriptional regulation networks that control gene expression in cells. Recent advances in data collection and analysis, however, are generating unprecedented amounts of information about gene regulation networks. To understand these complex wiring diagrams, we sought to break down such networks into basic building blocks. We generalize the notion of motifs, widely used for sequence analysis, to the level of networks. We define 'network motifs' as patterns of interconnections that recur in many different parts of a network at frequencies much higher than those found in randomized networks. We applied new algorithms for systematically detecting network motifs to one of the best-characterized regulation networks, that of direct transcriptional interactions in Escherichia coli. We find that much of the network is composed of repeated appearances of three highly significant motifs. Each network motif has a specific function in determining gene expression, such as generating temporal expression programs and governing the responses to fluctuating external signals. The motif structure also allows an easily interpretable view of the entire known transcriptional network of the organism. This approach may help define the basic computational elements of other biological networks.
  // This model reproduces the timecourse presented in Figure 2a. All species and parameters in the model are dimensionless.
  // biomodels.db:MODEL1102140000
  // biomodels.db:BIOMD0000000316
  // isDescribedBy pubmed:11967538
  // hasTaxon taxonomy:562
  // hasVersion GO:0016563
  // isVersionOf GO:0010628

  // Compartments:
  compartment cell = 1;  // GO:0005622

  // Species:
  species $X in cell = 0;  // isVersionOf CHEBI:36080; hasProperty GO:0016563
  species Y in cell = 0;  // isVersionOf CHEBI:36080; hasProperty GO:0016563
  species Z in cell = 0;  // isVersionOf CHEBI:36080

  // Reactions:
  r1: -> Y; F(X, r1_Ty);  // modifiers: X; isVersionOf GO:0010467; hasProperty GO:0045893
    r1_Ty = 0.5 dimensionless;
  r2: Y -> ; r2_a*Y;  // isVersionOf GO:0030163
    r2_a = 1 dimensionless;
  r3: -> Z; F(X, r3_Ty)*F(Y, Tz);  // modifiers: X, Y; isVersionOf GO:0010467; hasVersion GO:0045893
    r3_Ty = 0.5 dimensionless; Tz = 0.5 dimensionless;
  r4: Z -> ; r4_a*Z;  // isVersionOf GO:0030163
    r4_a = 1 dimensionless;

  // Events:
  e1: at (time >= 3): X = 1;
  e2: at (time >= 3.5): X = 0;
  e3: at (time >= 10): X = 1;
  e4: at (time >= 15): X = 0;

  // Unit definitions:
  unit substance = dimensionless;
  unit time = dimensionless;
  unit volume = dimensionless;
end
