// SBML level 2 version 4

model yao08()
  // Yao2008_Rb_E2F_Switch
  // This is the model described in the article:
  // A bistable Rb-E2F switch underlies the restriction point
  // Guang Yao, Tae Jun Lee, Seiichi Mori, Joseph R. Nevins, Lingchong You, Nat Cell Biol 2008 10:476-482; PMID: 18364697 ; DOI: 10.1038/ncb1711 .
  // Abstract:
  // The restriction point (R-point) marks the critical event when a mammalian cell commits to proliferation and becomes independent of growth stimulation. It is fundamental for normal differentiation and tissue homeostasis, and seems to be dysregulated in virtually all cancers. Although the R-point has been linked to various activities involved in the regulation of G1-S transition of the mammalian cell cycle, the underlying mechanism remains unclear. Using single-cell measurements, we show here that the Rb-E2F pathway functions as a bistable switch to convert graded serum inputs into all-or-none E2F responses. Once turned ON by sufficient serum stimulation, E2F can memorize and maintain this ON state independently of continuous serum stimulation. We further show that, at critical concentrations and duration of serum stimulation, bistable E2F activation correlates directly with the ability of a cell to traverse the R-point.
  // This model reproduces the serum-pulse stimulation-protocol in Figure 3(b).
  // To the extent possible under law, all copyright and related or neighbouring rights to this encoded model have been dedicated to the public domain worldwide. Please refer to CC0 Public Domain Dedication for more information.
  // In summary, you are entitled to use this encoded model in absolutely any manner you deem suitable, verbatim, or with modification, alone or embedded it in a larger context, redistribute it, commercially or not, in a restricted way or not.
  // To cite BioModels Database, please use: Li C, Donizelli M, Rodriguez N, Dharuri H, Endler L, Chelliah V, Li L, He E, Henry A, Stefan MI, Snoep JL, Hucka M, Le Novere N, Laibe C (2010) BioModels Database: An enhanced, curated and annotated resource for published quantitative kinetic models. BMC Syst Biol., 4:92.
  // biomodels.db:MODEL1102090000
  // biomodels.db:BIOMD0000000318
  // isDescribedBy pubmed:18364697
  // hasProperty mamo:MAMO_0000046
  // isPartOf reactome:REACT_1783.2
  // isPartOf GO:2000045

  // Compartments:
  compartment cell = 1;  // GO:0005622

  // Species:
  species MC in cell = 0; MC is "Myc";  // isHomologTo uniprot:P01106
  species EF in cell = 0; EF is "E2F";  // isHomologTo uniprot:Q01094
  species CD in cell = 0; CD is "CycD";  // isVersionOf GO:0000307; hasVersion interpro:IPR015451; hasProperty GO:0004693
  species CE in cell = 0; CE is "CycE";  // isVersionOf GO:0000307; hasVersion uniprot:P24864 uniprot:O96020; hasProperty GO:0004693
  species RB in cell = 0; RB is "Rb";  // isHomologTo uniprot:P06400
  species RE in cell = 0.55; RE is "Rb-E2F complex";  // hasPart uniprot:P06400 uniprot:Q01094
  species RP in cell = 0; RP is "phosphorylated Rb";  // isVersionOf kegg.compound:C00562; isHomologTo uniprot:P06400; hasProperty MOD:00046

  // Parameters:
  // Serum concentration of the surrounding medium in percent, growth signal
  S = 1 dimensionless;  // hasProperty GO:0008083

  // Reactions:
  // Myc synthesis driven by growth signals (S)
  r1: => MC; cell*(kM*S/(r1_KS + S));  // isVersionOf GO:0010467
    r1_KS = 0.5 dimensionless; kM = 1 uM_per_hr;
  // CycD synthesis driven by growth signals
  r2: => CD; cell*(kkCDS*S/(r2_KS + S));  // isVersionOf GO:0010467
    r2_KS = 0.5 dimensionless; kkCDS = 0.45 uM_per_hr;
  // E2F synthesis by a synergy between Myc and E2F autocatalysis. Since neither Myc nor E2F forms a homodimer, we assumed no cooperativity in gene activation mediated by these factors, and used the Hill coefficient of 1.0. Using Hill coefficient greater than 1.0 will not change the qualitative behavior of system dynamics
  r3: => EF; cell*(kkEF*MC*EF/((r3_KMC + MC)*(r3_KEF + EF)) + kkb*MC/(r3_KMC + MC));  // modifiers: MC; isVersionOf GO:0010467
    r3_KEF = 0.15 uM; r3_KMC = 0.15 uM; kkEF = 0.4 uM_per_hr; kkb = 0.003 uM_per_hr;
  // CycE synthesis driven by E2F
  r4: => CE; cell*(kkCE*EF/(r4_KEF + EF));  // modifiers: EF; isVersionOf GO:0031659
    r4_KEF = 0.15 uM; kkCE = 0.35 uM_per_hr;
  // CycD synthesis driven by Myc
  r5: => CD; cell*(kkCD*MC/(r5_KMC + MC));  // modifiers: MC; isVersionOf GO:0031659
    r5_KMC = 0.15 uM; kkCD = 0.03 uM_per_hr;
  // Constitutive Rb synthesis
  r6: => RB; cell*kkRB;  // isVersionOf GO:0010467
    kkRB = 0.18 uM_per_hr;
  // E2F dissociation from Rb-E2F complex by CycD- and CycE-mediated phosphorylation
  r7: RE => EF + RP; cell*(kkRBPP*CD*RE/(r7_KD + RE) + kkRBPP*CE*RE/(r7_KE + RE));  // modifiers: CD, CE; hasVersion GO:0004693 GO:0043241; hasVersion ec-code:2.7.11.22
    r7_KD = 0.92 uM; r7_KE = 0.92 uM; kkRBPP = 18 per_hr;
  // E2F titration by Rb via E2F-Rb complex formation
  r8: EF + RB => RE; cell*kkRE*RB*EF;  // isVersionOf GO:0006461
    kkRE = 180 per_uM_per_hr;
  // Rb phosphorylation by CycD and CycE
  r9: RB => RP; cell*(kkRBP*CD*RB/(r9_KD + RB) + kkRBP2*CE*RB/(r9_KE + RB));  // modifiers: CD, CE; isVersionOf ec-code:2.7.11.22; isVersionOf GO:0006468
    r9_KD = 0.92 uM; r9_KE = 0.92 uM; kkRBP = 18 per_hr; kkRBP2 = 18 per_hr;
  // Rb dephosphorylation
  r10: RP => RB; cell*(kkRBUP*RP/(Kp + RP));  // isVersionOf GO:0006470
    Kp = 0.01 uM; kkRBUP = 3.6 uM_per_hr;
  // Myc decay
  r11: MC => ; cell*dMC*MC;  // isVersionOf GO:0030163
    dMC = 0.7 per_hr;
  // E2F decay
  r12: EF => ; cell*dEF*EF;  // isVersionOf GO:0030163
    dEF = 0.25 per_hr;
  // CycE decay
  r13: CE => ; cell*dCE*CE;  // isVersionOf GO:0030163
    dCE = 1.5 per_hr;
  // CycD decay
  r14: CD => ; cell*dCD*CD;  // isVersionOf GO:0030163
    dCD = 1.5 per_hr;
  // Rb decay
  r15: RB => ; cell*dRB*RB;  // isVersionOf GO:0030163
    dRB = 0.06 per_hr;
  // Phosphorylated Rb decay
  r16: RP => ; cell*dRP*RP;  // isVersionOf GO:0030163
    dRP = 0.06 per_hr;
  // Rb-E2F complex decay
  r17: RE => ; cell*dRE*RE;  // isVersionOf GO:0030163
    dRE = 0.03 per_hr;

  // Events:
  e1: at (time > 0): S = 20;
  e2: at (time > 5): S = 1;

  // Unit definitions:
  unit substance = 1e-6 mole; substance is "micromole";
  unit time = 3600 second; time is "hour";
  unit uM_per_hr = 1e-6 mole / (litre * 3600 second);
  unit uM = 1e-6 mole / litre;
  unit per_hr = 1 / (3600 second);
  unit per_uM_per_hr = litre / (1e-6 mole * 3600 second);
end
