// SBML level 2 version 4

model Tolic2000_InsulinGlucoseFeedback()
  // This a model from the article:
  // Modeling the insulin-glucose feedback system: the significance of pulsatile insulin secretion.
  // Tolic IM, Mosekilde E, Sturis J. J Theor Biol2000 Dec 7;207(3):361-75 11082306,
  // Abstract:
  // A mathematical model of the insulin-glucose feedback regulation in man is used to examine the effects of an oscillatory supply of insulin compared to a constant supply at the same average rate. We show that interactions between the oscillatory insulin supply and the receptor dynamics can be of minute significance only. It is possible, however, to interpret seemingly conflicting results of clinical studies in terms of their different experimental conditions with respect to the hepatic glucose release. If this release is operating near an upper limit, an oscillatory insulin supply will be more efficient in lowering the blood glucose level than a constant supply. If the insulin level is high enough for the hepatic release of glucose to nearly vanish, the opposite effect is observed. For insulin concentrations close to the point of inflection of the insulin-glucose dose-response curve an oscillatory and a constant insulin infusion produce similar effects. Copyright 2000 Academic Press.
  // This model was taken from the CellML repository and automatically converted to SBML.
  // The original model was: Tolic IM, Mosekilde E, Sturis J. (2000) - version=1.0
  // This model originates from BioModels Database: A Database of Annotated Published Models (http://www.ebi.ac.uk/biomodels/). It is copyright (c) 2005-2011 The BioModels.net Team.
  // For more information see the terms of use.
  // To cite BioModels Database, please use: Li C, Donizelli M, Rodriguez N, Dharuri H, Endler L, Chelliah V, Li L, He E, Henry A, Stefan MI, Snoep JL, Hucka M, Le Novère N, Laibe C (2010) BioModels Database: An enhanced, curated and annotated resource for published quantitative kinetic models. BMC Syst Biol., 4:92.
  // biomodels.db:MODEL1006230109
  // biomodels.db:BIOMD0000000372
  // isDescribedBy pubmed:11082306
  // isDerivedFrom biomodels.db:BIOMD0000000382
  // hasTaxon taxonomy:9606
  // isVersionOf GO:0061178

  // Compartments:
  compartment COMpartment = 1;

  // Species:
  species x1 in COMpartment = 110.420253/COMpartment;
  species x2 in COMpartment = 112.7601/COMpartment;
  species x3 in COMpartment = 104.5879/COMpartment;
  species G in COMpartment = 12342.62/COMpartment;  // isVersionOf CHEBI:17234
  species Ii in COMpartment = 243.2865/COMpartment;  // isVersionOf uniprot:P01308
  species Ip in COMpartment = 93.36442/COMpartment;  // isVersionOf uniprot:P01308

  // Parameters:
  Vp = 3;
  Vi = 11;
  Vg = 10;
  E = 0.2;
  tp = 6;
  td = 36;
  Rm = 210;
  C1 = 2000;
  a1 = 300;
  ti = 100;
  Gin = 216;
  C2 = 144;
  C3 = 1000;
  C4 = 80;
  C5 = 26;
  U0 = 40;
  Um = 940;
  Ub = 72;
  beta = 1.77;
  Rg = 180;
  alpha = 0.29;

  // Assignment rules:
  f1_G := Rm/(1 + exp((C1 - G/Vg)/a1));
  Ip_conc := Ip/Vp;
  Ii_conc := Ii/Vi;
  G_conc := G/(Vg*10);
  f2_G := Ub*(1 - exp(-G/(C2*Vg)));
  f3_G := G/(C3*Vg);
  f4_Ii := U0 + (Um - U0)/(1 + exp(-beta*ln(Ii/C4*(1/Vi + 1/(E*ti)))));
  f5_x3 := Rg/(1 + exp(alpha*(x3*1/Vp - C5)));

  // Rate rules:
  Ip' = f1_G - (E*(Ip/Vp - Ii/Vi) + Ip/tp);
  Ii' = E*(Ip/Vp - Ii/Vi) - Ii/ti;
  G' = Gin + f5_x3 + (-(f2_G + f3_G*f4_Ii));
  x3' = 3/td*(x2 - x3);
  x1' = 3/td*(Ip/1 - x1);
  x2' = 3/td*(x1 - x2);
end
