// SBML level 3 version 1

model BIOMD0000000641()
  // Jaiswal2017 - Cell cycle arrest
  // This model is described in the article:
  // ATM/Wip1 activities at chromatin control Plk1 re-activation to determine G2 checkpoint duration.
  // Jaiswal H, Benada J, Müllers E, Akopyan K, Burdova K, Koolmeister T, Helleday T, Medema RH, Macurek L, Lindqvist A.
  // EMBO J. 2017 Jul; 36(14): 2161-2176
  // Abstract:
  // After DNA damage, the cell cycle is arrested to avoid propagation of mutations. Arrest in G2 phase is initiated by ATM-/ATR-dependent signaling that inhibits mitosis-promoting kinases such as Plk1. At the same time, Plk1 can counteract ATR-dependent signaling and is required for eventual resumption of the cell cycle. However, what determines when Plk1 activity can resume remains unclear. Here, we use FRET-based reporters to show that a global spread of ATM activity on chromatin and phosphorylation of ATM targets including KAP1 control Plk1 re-activation. These phosphorylations are rapidly counteracted by the chromatin-bound phosphatase Wip1, allowing cell cycle restart despite persistent ATM activity present at DNA lesions. Combining experimental data and mathematical modeling, we propose a model for how the minimal duration of cell cycle arrest is controlled. Our model shows how cell cycle restart can occur before completion of DNA repair and suggests a mechanism for checkpoint adaptation in human cells.
  // This model is hosted on BioModels Database and identified by: BIOMD0000000641.
  // To cite BioModels Database, please use: BioModels Database: An enhanced, curated and annotated resource for published quantitative kinetic models.
  // To the extent possible under law, all copyright and related or neighbouring rights to this encoded model have been dedicated to the public domain worldwide. Please refer to CC0 Public Domain Dedication for more information.
  // biomodels.db:MODEL1704030000
  // biomodels.db:BIOMD0000000641
  // isDescribedBy pubmed:28607002
  // isVersionOf GO:0007095 +PW:0001362
  // occursIn BTO:0004910
  // hasProperty MAMO:0000046
  // model units - substance: substance, time: time, volume: volume, area: area, length: length, extent: substance

  // Compartments:
  compartment nucleus = 1 volume;  // isVersionOf GO:0005634

  // Species:
  // Timearact is ATM^act in the ODE model.
  // Timearact (active Timer) is active ATM in the model.
  species $Timeract in nucleus = 0;  // isVersionOf uniprot:Q13315
  // Timearinact is ATM^inact in the ODE model.
  // Timearinact (inactive Timer) is inactive ATM in the model.
  species $Timerinact in nucleus;  // isVersionOf uniprot:Q13315
  // CellCact -> CellCycle^act in the ODE model.
  // CellCact represents active Plk1 in the simulation figures.
  species $CellCact in nucleus = 1;  // isVersionOf uniprot:P53350
  // CellCina -> CellCycle^inact in the ODE model.
  // CellCina represents inactive Plk1.
  species $CellCina in nucleus;  // isVersionOf uniprot:P53350
  // Effectoract is ATR^act in the ODE model.
  // Effectoract (active Effector) is active ATR in the model.
  species $Effectoract in nucleus = 0;  // isVersionOf uniprot:Q13535
  // Effectorina is ATR^inact in the ODE model.
  // Effectorina (inactive Effector) is inactive ATR in the model.
  species $Effectorina in nucleus;  // isVersionOf uniprot:Q13535
  // DNA damage
  species $Damage in nucleus;  // hasProperty GO:0042769
  // Homologous recombination
  species $HR in nucleus = 3;  // isVersionOf GO:0000724
  // non-homologous end joining
  species $NHEJ in nucleus = 7;  // isVersionOf GO:0006303
  // CellCtot -> CellCycle^tot in the ODE model.
  // CellCtot represents total Plk1.
  species $CellCycletot in nucleus = 10;  // isVersionOf uniprot:P53350
  // Effectortot is ATR^tot in the ODE model.
  // Effectortot (total Effector) is total amount of ATR in the model.
  species $Effectortot in nucleus = 10;  // isVersionOf uniprot:Q13535
  // Timeartot is ATM^tot in the ODE model.
  // Timeartot (total Timer) is total ATM in the model.
  species $Timertot in nucleus = 10;  // isVersionOf uniprot:Q13315

  // Parameters:
  Kd2t = 2;
  Kti2t = 10;
  // Kcc2ch is Kcc2e in the model.
  Kcc2ch = 1;
  Kt2cc = 10;
  // All parameters in this model are derived from this publication (PMID:28607002).
  Kcc2a = 1;
  // Kd2ch is Kd2e in the model
  Kd2ch = 1;
  // Kch2cc is Ke2cc in the model
  Kch2cc = 1;
  Km1 = 1;
  Km10 = 10;

  // Assignment rules:
  Effectorina := Effectortot - Effectoract;
  Damage := HR + NHEJ;
  Timerinact := Timertot - Timeract;
  CellCina := CellCycletot - CellCact;

  // Rate rules:
  Timeract' = Kd2t*Damage*Timerinact/(Km1 + Timerinact) - Kti2t*Timeract/(Km1 + Timeract);
  CellCact' = (Kcc2a + CellCact)*CellCina/(Km10 + CellCina) - Kt2cc*Timeract*CellCact/(Km10 + CellCact) - Kch2cc*CellCact*Effectoract/(Km10 + CellCact);
  Effectoract' = Kd2ch*Damage*Effectorina/(Km10 + Effectorina) - Kcc2ch*CellCact*Effectoract/(Km10 + Effectoract);
  HR' = -HR*0.2;
  NHEJ' = -NHEJ*0.5;

  // Unit definitions:
  unit length = metre;
  unit area = metre^2;
  unit volume = 1e-3 litre;
  unit time = 3600 second;
  unit substance = 1e-3 mole;
end
