// SBML level 2 version 4
// dcterms:bibliographicCitation: http://identifiers.org/pubmed/27015094

function Constant_flux__irreversible(v)
  v;
end
Constant_flux__irreversible is "Constant flux (irreversible)";

function HMM_Modified_9(Kcat, km, ErkActive, PP2AActive)
  Kcat*PP2AActive*ErkActive/(km + ErkActive);
end

function HMM_Modified_4(Kcat, km, RasActive, Raf1Inactive)
  Kcat*RasActive*Raf1Inactive/(km + Raf1Inactive);
end

function HMM_Modified_34(Kcat, km, mTORC1Inactive, AktActive)
  Kcat*AktActive*mTORC1Inactive/(km + mTORC1Inactive);
end

function HMM_Modified_7(Kcat, km, PP2AActive, MekActive)
  Kcat*PP2AActive*MekActive/(km + MekActive);
end

function HMM_Modified_23(IRS1Inactive, Kcat, km, boundRTK)
  Kcat*boundRTK*IRS1Inactive/(km + IRS1Inactive);
end

function HMM_Modified_31(Kcat, km, AktActive, PP2AActive)
  Kcat*PP2AActive*AktActive/(km + AktActive);
end

function HMM_Modified_8(Kcat, km, ErkInactive, MekActive)
  Kcat*MekActive*ErkInactive/(km + ErkInactive);
end

function HMM_Modified_20(Kcat, PIP3Active, PTENActive, km)
  Kcat*PTENActive*PIP3Active/(km + PIP3Active);
end

function HMM_Modified_2(Kcat, km, SosActive, RasInactive)
  Kcat*SosActive*RasInactive/(km + RasInactive);
end

function HMM_Modified_5(Kcat, km, Raf1PPtase, Raf1Active)
  Kcat*Raf1PPtase*Raf1Active/(km + Raf1Active);
end

function HMM_Modified_6(Kcat, km, Raf1Active, MekInactive)
  Kcat*Raf1Active*MekInactive/(km + MekInactive);
end

function HMM_Modified_10(Kcat, km, ErkActive, P90RskInactive)
  Kcat*ErkActive*P90RskInactive/(km + P90RskInactive);
end

function HMM_Modified_11(Kcat, km, P90RskActive, SosActive)
  Kcat*P90RskActive*SosActive/(km + SosActive);
end

function HMM_Modified_12(Kcat, km, boundRTK, PI3KInactive)
  Kcat*boundRTK*PI3KInactive/(km + PI3KInactive);
end

function HMM_Modified_28(Kcat, km, mTORC2Active, AktInactive)
  Kcat*mTORC2Active*AktInactive/(km + AktInactive);
end

function HMM_Modified_13(Kcat, km, PI3KInactive, RasActive)
  Kcat*RasActive*PI3KInactive/(km + PI3KInactive);
end

function HMM_Modified_26(HSP90_Cdc37Active, Kcat, km, AktInactive)
  Kcat*HSP90_Cdc37Active*AktInactive/(km + AktInactive);
end

function HMM_Modified(Kcat, km, PI3KActive, AktInactive)
  Kcat*PI3KActive*AktInactive/(km + AktInactive);
end

function HMM_Modified_30(CTMPActive, Kcat, km, AktActive)
  Kcat*CTMPActive*AktActive/(km + AktActive);
end

function HMM_Modified_14(Kcat, km, AktActive, Raf1Active)
  Kcat*AktActive*Raf1Active/(km + Raf1Active);
end

function HMM_Modified_15(Kcat, km, boundRTK, C3GInactive)
  Kcat*boundRTK*C3GInactive/(km + C3GInactive);
end

function HMM_Modified_32(Kcat, km, ErkActive, Raf1Active)
  Kcat*Raf1Active*ErkActive/(km + ErkActive);
end

function HMM_Modified_21(Kcat, PIP3Active, km, AktInactive)
  Kcat*PIP3Active*AktInactive/(km + AktInactive);
end

function HMM_Modified_3(Kcat, km, RasGapActive, RasActive)
  Kcat*RasGapActive*RasActive/(km + RasActive);
end

function HMM_Modified_1(Kcat, km, boundRTK, SosInactive)
  Kcat*boundRTK*SosInactive/(km + SosInactive);
end

function HMM_Modified_16(Kcat, km, C3GActive, Rap1Inactive)
  Kcat*C3GActive*Rap1Inactive/(km + Rap1Inactive);
end

function HMM_Modified_18(Kcat, bRafMutated, km, MekInactive)
  Kcat*bRafMutated*MekInactive/(km + MekInactive);
end

function HMM_Modified_22(IRS1Active, Kcat, km, PI3KInactive)
  Kcat*IRS1Active*PI3KInactive/(km + PI3KInactive);
end

function HMM_Modified_19(Kcat, PIP3Inactive, km, PI3KActive)
  Kcat*PI3KActive*PIP3Inactive/(km + PIP3Inactive);
end

function HMM_Modified_17(Kcat, km, Rap1Active, Rap1Gap)
  Kcat*Rap1Gap*Rap1Active/(km + Rap1Active);
end

function HMM_Modified_24(Kcat, PDK1Inactive, PIP3Active, km)
  Kcat*PIP3Active*PDK1Inactive/(km + PDK1Inactive);
end

function HMM_Modified_25(Kcat, PDK1Active, km, AktInactive)
  Kcat*PDK1Active*AktInactive/(km + AktInactive);
end

function HMM_Modified_27(Kcat, PHLPPActive, km, AktActive)
  Kcat*PHLPPActive*AktActive/(km + AktActive);
end

function HMM_Modified_33(Kcat, km, ErkActive, SosActive)
  Kcat*ErkActive*SosActive/(km + SosActive);
end

function HMM_Modified_29(Kcat, TCL1Active, km, AktInactive)
  Kcat*TCL1Active*AktInactive/(km + AktInactive);
end

function HMM_Modified_35(Kcat, S6K1Inactive, km, mTORC1Active)
  Kcat*mTORC1Active*S6K1Inactive/(km + S6K1Inactive);
end

function HMM_Modified_36(IRS1Active, Kcat, S6K1Active, km)
  Kcat*S6K1Active*IRS1Active/(km + IRS1Active);
end

function HMM_Modified_37(Dabrafenib, Kcat, bRafMutated, km)
  Kcat*Dabrafenib*bRafMutated/(km + bRafMutated);
end

model Pappalardo2016___PI3K_AKT_and_MAPK_Signaling_Pathways_in_Melanoma_Cancer()
  // Pappalardo2016 - PI3K/AKT and MAPK Signaling Pathways in Melanoma Cancer
  // This model is described in the article:
  // Computational Modeling of PI3K/AKT and MAPK Signaling Pathways in Melanoma Cancer.
  // Pappalardo F, Russo G, Candido S, Pennisi M, Cavalieri S, Motta S, McCubrey JA, Nicoletti F, Libra M.
  // PLoS ONE 2016; 11(3): e0152104
  // Abstract:
  // Malignant melanoma is an aggressive tumor of the skin and seems to be resistant to current therapeutic approaches. Melanocytic transformation is thought to occur by sequential accumulation of genetic and molecular alterations able to activate the Ras/Raf/MEK/ERK (MAPK) and/or the PI3K/AKT (AKT) signalling pathways. Specifically, mutations of B-RAF activate MAPK pathway resulting in cell cycle progression and apoptosis prevention. According to these findings, MAPK and AKT pathways may represent promising therapeutic targets for an otherwise devastating disease.Here we show a computational model able to simulate the main biochemical and metabolic interactions in the PI3K/AKT and MAPK pathways potentially involved in melanoma development. Overall, this computational approach may accelerate the drug discovery process and encourages the identification of novel pathway activators with consequent development of novel antioncogenic compounds to overcome tumor cell resistance to conventional therapeutic agents. The source code of the various versions of the model are available as S1 Archive.
  // This model is hosted on BioModels Database and identified by: MODEL1609190000.
  // To cite BioModels Database, please use: BioModels Database: An enhanced, curated and annotated resource for published quantitative kinetic models.
  // To the extent possible under law, all copyright and related or neighbouring rights to this encoded model have been dedicated to the public domain worldwide. Please refer to CC0 Public Domain Dedication for more information.
  // hasPart kegg.pathway:map04010
  // hasPart reactome:R-HSA-2219528
  // hasPart efo:0007815
  // hasPart kegg.pathway:map04151
  // hasPart reactome:R-HSA-5683057
  // biomodels.db:BIOMD0000000666

  // Compartments:
  compartment Melanoma_cell = 1;  // isVersionOf BTO:0000848

  // Species:
  species boundRTK in Melanoma_cell = 0;  // isVersionOf ncit:C17660; isVersionOf ec-code:2.7.10.1
  species freeRTK in Melanoma_cell = 80000;  // isVersionOf ncit:C17660; isVersionOf ec-code:2.7.10.1
  species SosActive in Melanoma_cell = 0;  // isVersionOf kegg.orthology:K03099; isVersionOf uniprot:Q07889
  species SosInactive in Melanoma_cell = 120000;  // isVersionOf uniprot:Q07889; isVersionOf kegg.orthology:K03099
  species RasActive in Melanoma_cell = 0;  // isVersionOf kegg.orthology:K07829; isVersionOf uniprot:P10301
  species RasInactive in Melanoma_cell = 120000;  // isVersionOf kegg.orthology:K07829; isVersionOf uniprot:P10301
  species Raf1Active in Melanoma_cell = 0;  // isVersionOf ec-code:2.7.11.1; isVersionOf uniprot:P04049; isVersionOf kegg.orthology:K04366
  species Raf1Inactive in Melanoma_cell = 120000;  // isVersionOf uniprot:P04049; isVersionOf kegg.orthology:K04366; isVersionOf ec-code:2.7.11.1
  species MekActive in Melanoma_cell = 0;  // isVersionOf uniprot:Q02750; isVersionOf ec-code:2.7.12.2; isVersionOf kegg.orthology:K04368
  species MekInactive in Melanoma_cell = 600000;  // isVersionOf uniprot:Q02750; isVersionOf kegg.orthology:K04368; isVersionOf ec-code:2.7.12.2
  species ErkActive in Melanoma_cell = 0;  // isVersionOf uniprot:P28482; isVersionOf kegg.orthology:K05111
  species ErkInactive in Melanoma_cell = 600000;  // isVersionOf uniprot:P28482; isVersionOf kegg.orthology:K05111
  species P90RskActive in Melanoma_cell = 0;  // isVersionOf PR:000029187; isVersionOf ec-code:2.7.11.1
  species P90RskInactive in Melanoma_cell = 120000;  // isVersionOf ec-code:2.7.11.1; isVersionOf PR:000029187
  species PI3KActive in Melanoma_cell = 0;  // isVersionOf ec-code:2.7.1.137; isVersionOf kegg.orthology:K00914
  species PI3KInactive in Melanoma_cell = 120000;  // isVersionOf kegg.orthology:K00914; isVersionOf ec-code:2.7.1.137
  species AktActive in Melanoma_cell = 0;  // isVersionOf PR:000029189; isVersionOf ec-code:2.7.11.1
  species AktInactive in Melanoma_cell = 120000;  // isVersionOf ec-code:2.7.11.1; isVersionOf PR:000029189
  species C3GActive in Melanoma_cell = 0;  // isVersionOf uniprot:Q13905; isVersionOf kegg.orthology:K06277
  species C3GInactive in Melanoma_cell = 120000;  // isVersionOf uniprot:Q13905; isVersionOf kegg.orthology:K06277
  species Rap1Active in Melanoma_cell = 0;  // isVersionOf uniprot:P62834; isVersionOf kegg.orthology:K04353
  species Rap1Inactive in Melanoma_cell = 120000;  // isVersionOf kegg.orthology:K04353; isVersionOf uniprot:P62834
  species $GF in Melanoma_cell = 10002000;  // isVersionOf ncit:C20424
  // http://link.springer.com/article/10.1007%2Fs10555-008-9119-x
  species $PP2AActive in Melanoma_cell = 120000;  // isVersionOf kegg.orthology:K01090; isVersionOf ec-code:3.1.3.16; isVersionOf uniprot:P67775
  species $Raf1PPtase in Melanoma_cell = 120000;  // hasPart uniprot:P04049; hasPart kegg.orthology:K01090
  species $RasGapActive in Melanoma_cell = 120000;  // isVersionOf uniprot:P20936; isVersionOf kegg.orthology:K04352
  species $Rap1Gap in Melanoma_cell = 120000;  // isVersionOf kegg.orthology:K17700; isVersionOf uniprot:P47736
  species $proRTK in Melanoma_cell = 1;
  species PIP3Active in Melanoma_cell = 0;  // isVersionOf kegg.compound:C05981
  species PIP3Inactive in Melanoma_cell = 120000;  // isVersionOf kegg.compound:C05981
  species $PTENActive in Melanoma_cell = 120000;  // isVersionOf uniprot:P60484; isVersionOf kegg.orthology:K01110
  species IRS1Active in Melanoma_cell = 0;  // isVersionOf kegg.orthology:K16172; isVersionOf uniprot:P35568
  species IRS1Inactive in Melanoma_cell = 120000;  // isVersionOf uniprot:P35568; isVersionOf kegg.orthology:K16172
  species PDK1Inactive in Melanoma_cell = 120000;  // isVersionOf uniprot:Q15118; isVersionOf ec-code:2.7.11.2; isVersionOf kegg.orthology:K12077
  species PDK1Active in Melanoma_cell = 0;  // isVersionOf kegg.orthology:K12077; isVersionOf uniprot:Q15118; isVersionOf ec-code:2.7.11.2
  species $HSP90_Cdc37Active in Melanoma_cell = 120000; HSP90_Cdc37Active is "HSP90-Cdc37Active";  // isVersionOf GO:1990565; isVersionOf PR:000005201
  species $PHLPPActive in Melanoma_cell = 120000;  // isVersionOf ec-code:3.1.3.16; isVersionOf kegg.orthology:K16340
  species $mTORC2Active in Melanoma_cell = 120000;  // hasPart uniprot:P42345; isVersionOf GO:0031932
  species $TCL1Active in Melanoma_cell = 120000;  // isVersionOf uniprot:P56279; isVersionOf kegg.orthology:K10167
  species $CTMPActive in Melanoma_cell = 120000;  // isVersionOf kegg.orthology:K16339; isVersionOf uniprot:Q5T1C6
  species mTORC1Active in Melanoma_cell = 0;  // hasPart uniprot:P42345; isVersionOf GO:0031931
  species mTORC1Inactive in Melanoma_cell = 120000;  // hasPart uniprot:P42345; isVersionOf GO:0031931
  species S6K1Active in Melanoma_cell = 0;  // isVersionOf uniprot:P23443; isVersionOf ec-code:2.7.11.1; isVersionOf kegg.orthology:K04688
  species S6K1Inactive in Melanoma_cell = 120000;  // isVersionOf uniprot:P23443; isVersionOf ec-code:2.7.11.1; isVersionOf kegg.orthology:K04688
  // We simulated the A375 cell lines having the bRaf mutation in this way:
  // 1) We introduced the new species bRafMutated; with the same initaila concentration of bRafInactive (120000)
  // 2) We deleted the bRaf activation by Rap1 as the new species bRafMutated is not affected by this signalling (the same applies for Ras)
  // 3) We inhibited the deactivation of Braf by Raf1PPtase (as Raf1PPtase does not anymore influence Braf)
  // 4) bRafMutated accomplish the Mek activation subsituting the not mutated species bRaf
  species bRafMutated in Melanoma_cell = 120000;  // isVersionOf kegg.orthology:K04365; isVersionOf uniprot:P15056; isVersionOf ec-code:2.7.11.1; hasProperty ncit:C40430
  species Dabrafenib in Melanoma_cell = 1.25e-10;  // isVersionOf kegg.drug:D10064; isVersionOf CHEBI:75045
  species bRafMutatedInactive in Melanoma_cell = 1;  // isVersionOf ec-code:2.7.11.1; isVersionOf kegg.orthology:K04365; isVersionOf uniprot:P15056; hasProperty ncit:C40430
  species $probRafMutated in Melanoma_cell = 1;

  // Reactions:
  GF_Binding_Unbinding: $GF + freeRTK -> boundRTK; Melanoma_cell*(GF_Binding_Unbinding_k1*GF*freeRTK - k2*boundRTK);  // isVersionOf GO:0030971
    GF_Binding_Unbinding_k1 = 2.18503e-5; k2 = 0.121008;
  Sos_Activation: SosInactive => SosActive; Melanoma_cell*HMM_Modified_1(Sos_Activation_Kcat, Sos_Activation_km, boundRTK, SosInactive);  // modifiers: boundRTK
    Sos_Activation_Kcat = 694.731; Sos_Activation_km = 6086070;
  Ras_Activation: RasInactive => RasActive; Melanoma_cell*HMM_Modified_2(Ras_Activation_Kcat, Ras_Activation_km, SosActive, RasInactive);  // modifiers: SosActive
    Ras_Activation_Kcat = 32.344; Ras_Activation_km = 35954.3;
  Ras_Feedback_Deactivation_RasGap: RasActive => RasInactive; Melanoma_cell*HMM_Modified_3(Ras_Feedback_Deactivation_RasGap_Kcat, Ras_Feedback_Deactivation_RasGap_km, RasGapActive, RasActive);  // modifiers: RasGapActive
    Ras_Feedback_Deactivation_RasGap_Kcat = 1509.36; Ras_Feedback_Deactivation_RasGap_km = 1432410;
  Raf1_Activation: Raf1Inactive => Raf1Active; Melanoma_cell*HMM_Modified_4(Raf1_Activation_Kcat, Raf1_Activation_km, RasActive, Raf1Inactive);  // modifiers: RasActive
    Raf1_Activation_Kcat = 0.884096; Raf1_Activation_km = 62464.6;
  reaction_6: Raf1Active => Raf1Inactive; Melanoma_cell*HMM_Modified_5(reaction_6_Kcat, reaction_6_km, Raf1PPtase, Raf1Active); reaction_6 is "Raf1_Feedback_Deactivation_Raf1PPtase";  // modifiers: Raf1PPtase
    reaction_6_Kcat = 0.126329; reaction_6_km = 1061.71;
  Mek_Activation_Raf1: MekInactive => MekActive; Melanoma_cell*HMM_Modified_6(Mek_Activation_Raf1_Kcat, Mek_Activation_Raf1_km, Raf1Active, MekInactive);  // modifiers: Raf1Active
    Mek_Activation_Raf1_Kcat = 185.759; Mek_Activation_Raf1_km = 4768350;
  Mek_Feedback_Deactivation_PP2A: MekActive => MekInactive; Melanoma_cell*HMM_Modified_7(Mek_Feedback_Deactivation_PP2A_Kcat, Mek_Feedback_Deactivation_PP2A_km, PP2AActive, MekActive);  // modifiers: PP2AActive
    Mek_Feedback_Deactivation_PP2A_Kcat = 2.83243; Mek_Feedback_Deactivation_PP2A_km = 518753;
  Erk_Activation: ErkInactive => ErkActive; Melanoma_cell*HMM_Modified_8(Erk_Activation_Kcat, Erk_Activation_km, ErkInactive, MekActive);  // modifiers: MekActive
    Erk_Activation_Kcat = 9.85367; Erk_Activation_km = 1007340;
  // http://link.springer.com/article/10.1007%2Fs10555-008-9119-x
  Erk_Feedback_Deactivation_PP2A: ErkActive => ErkInactive; Melanoma_cell*HMM_Modified_9(Erk_Feedback_Deactivation_PP2A_Kcat, Erk_Feedback_Deactivation_PP2A_km, ErkActive, PP2AActive);  // modifiers: PP2AActive
    Erk_Feedback_Deactivation_PP2A_Kcat = 8.8912; Erk_Feedback_Deactivation_PP2A_km = 3496490;
  P90Rsk_Activation: P90RskInactive => P90RskActive; Melanoma_cell*HMM_Modified_10(P90Rsk_Activation_Kcat, P90Rsk_Activation_km, ErkActive, P90RskInactive);  // modifiers: ErkActive
    P90Rsk_Activation_Kcat = 0.0213697; P90Rsk_Activation_km = 763523;
  P90Rsk_Deactivation: P90RskActive => P90RskInactive; Melanoma_cell*P90Rsk_Deactivation_k1*P90RskActive;
    P90Rsk_Deactivation_k1 = 0.005;
  // https://en.wikipedia.org/wiki/Ribosomal_s6_kinase#/media/File:P90Rsk.svg
  Sos_Feedback_Deactivation_P90Rsk: SosActive => SosInactive; Melanoma_cell*HMM_Modified_11(Sos_Feedback_Deactivation_P90Rsk_Kcat, Sos_Feedback_Deactivation_P90Rsk_km, P90RskActive, SosActive);  // modifiers: P90RskActive
    Sos_Feedback_Deactivation_P90Rsk_Kcat = 1611.97; Sos_Feedback_Deactivation_P90Rsk_km = 896896;
  PI3K_Activation_RTK: PI3KInactive => PI3KActive; Melanoma_cell*HMM_Modified_12(PI3K_Activation_RTK_Kcat, PI3K_Activation_RTK_km, boundRTK, PI3KInactive);  // modifiers: boundRTK
    PI3K_Activation_RTK_Kcat = 10.6737; PI3K_Activation_RTK_km = 184912;
  PI3K_Activation_Ras: PI3KInactive => PI3KActive; Melanoma_cell*HMM_Modified_13(PI3K_Activation_Ras_Kcat, PI3K_Activation_Ras_km, PI3KInactive, RasActive);  // modifiers: RasActive
    PI3K_Activation_Ras_Kcat = 0.0771067; PI3K_Activation_Ras_km = 272056;
  PI3K_Deactivation: PI3KActive => PI3KInactive; Melanoma_cell*PI3K_Deactivation_k1*PI3KActive;
    PI3K_Deactivation_k1 = 0.005;
  Akt_Activation_PI3K: AktInactive => AktActive; Melanoma_cell*HMM_Modified(Akt_Activation_PI3K_Kcat, Akt_Activation_PI3K_km, PI3KActive, AktInactive);  // modifiers: PI3KActive
    Akt_Activation_PI3K_Kcat = 0.0566279; Akt_Activation_PI3K_km = 653951;
  Raf1_Deactivation_Akt: Raf1Active => Raf1Inactive; Melanoma_cell*HMM_Modified_14(Raf1_Deactivation_Akt_Kcat, Raf1_Deactivation_Akt_km, AktActive, Raf1Active);  // modifiers: AktActive
    Raf1_Deactivation_Akt_Kcat = 15.1212; Raf1_Deactivation_Akt_km = 119355;
  RTK_Degradation: boundRTK => ; Melanoma_cell*RTK_Degradation_k1*boundRTK;
    RTK_Degradation_k1 = 0.2;
  C3G_Activation: C3GInactive => C3GActive; Melanoma_cell*HMM_Modified_15(C3G_Activation_Kcat, C3G_Activation_km, boundRTK, C3GInactive);  // modifiers: boundRTK
    C3G_Activation_Kcat = 694.731; C3G_Activation_km = 6086070;
  C3G_Deactivation: C3GActive => C3GInactive; Melanoma_cell*C3G_Deactivation_k1*C3GActive;
    C3G_Deactivation_k1 = 2.5;
  Rap1_Activation: Rap1Inactive => Rap1Active; Melanoma_cell*HMM_Modified_16(Rap1_Activation_Kcat, Rap1_Activation_km, C3GActive, Rap1Inactive);  // modifiers: C3GActive
    Rap1_Activation_Kcat = 32.344; Rap1_Activation_km = 35954.3;
  reaction_24: Rap1Active => Rap1Inactive; Melanoma_cell*HMM_Modified_17(reaction_24_Kcat, reaction_24_km, Rap1Active, Rap1Gap); reaction_24 is "Rap1_Feedback_Deactivation_Rap1Gap";  // modifiers: Rap1Gap
    reaction_24_Kcat = 1509.36; reaction_24_km = 1432410;
  Mek_Activation_bRaf: MekInactive => MekActive; Melanoma_cell*HMM_Modified_18(Mek_Activation_bRaf_Kcat, bRafMutated, Mek_Activation_bRaf_km, MekInactive);  // modifiers: bRafMutated
    Mek_Activation_bRaf_Kcat = 185.759; Mek_Activation_bRaf_km = 4768350;
  RTK_Production: $proRTK => freeRTK; Melanoma_cell*Constant_flux__irreversible(RTK_Production_v);
    RTK_Production_v = 100;
  RTK_Degradation_Free: freeRTK => ; Melanoma_cell*RTK_Degradation_Free_k1*freeRTK;
    RTK_Degradation_Free_k1 = 0.00125;
  PIP3_Activation: PIP3Inactive => PIP3Active; Melanoma_cell*HMM_Modified_19(PIP3_Activation_Kcat, PIP3Inactive, PIP3_Activation_km, PI3KActive);  // modifiers: PI3KActive
    PIP3_Activation_Kcat = 0.0566279; PIP3_Activation_km = 653951;
  PIP3_Feedback_Deactivation_PTEN: PIP3Active => PIP3Inactive; Melanoma_cell*HMM_Modified_20(PIP3_Feedback_Deactivation_PTEN_Kcat, PIP3Active, PTENActive, PIP3_Feedback_Deactivation_PTEN_km);  // modifiers: PTENActive
    PIP3_Feedback_Deactivation_PTEN_Kcat = 2.83243; PIP3_Feedback_Deactivation_PTEN_km = 518753;
  Akt_Activation_PIP3: AktInactive => AktActive; Melanoma_cell*HMM_Modified_21(Akt_Activation_PIP3_Kcat, PIP3Active, Akt_Activation_PIP3_km, AktInactive);  // modifiers: PIP3Active
    Akt_Activation_PIP3_Kcat = 0.0566279; Akt_Activation_PIP3_km = 653951;
  PI3K_Activation_IRS1: PI3KInactive => PI3KActive; Melanoma_cell*HMM_Modified_22(IRS1Active, PI3K_Activation_IRS1_Kcat, PI3K_Activation_IRS1_km, PI3KInactive);  // modifiers: IRS1Active
    PI3K_Activation_IRS1_Kcat = 0.0771067; PI3K_Activation_IRS1_km = 272056;
  IRS1_Activation: IRS1Inactive => IRS1Active; Melanoma_cell*HMM_Modified_23(IRS1Inactive, IRS1_Activation_Kcat, IRS1_Activation_km, boundRTK);  // modifiers: boundRTK
    IRS1_Activation_Kcat = 10.6737; IRS1_Activation_km = 184912;
  PDK1_Activation: PDK1Inactive => PDK1Active; Melanoma_cell*HMM_Modified_24(PDK1_Activation_Kcat, PDK1Inactive, PIP3Active, PDK1_Activation_km);  // modifiers: PIP3Active
    PDK1_Activation_Kcat = 9.85367; PDK1_Activation_km = 1007340;
  PDK1_Deactivation: PDK1Active => PDK1Inactive; Melanoma_cell*PDK1_Deactivation_k1*PDK1Active;
    PDK1_Deactivation_k1 = 2.5;
  Akt_Activation_PDK1: AktInactive => AktActive; Melanoma_cell*HMM_Modified_25(Akt_Activation_PDK1_Kcat, PDK1Active, Akt_Activation_PDK1_km, AktInactive);  // modifiers: PDK1Active
    Akt_Activation_PDK1_Kcat = 0.0566279; Akt_Activation_PDK1_km = 653951;
  Akt_Feedback_Activation_HSP90_Cdc37: AktInactive => AktActive; Melanoma_cell*HMM_Modified_26(HSP90_Cdc37Active, Akt_Feedback_Activation_HSP90_Cdc37_Kcat, Akt_Feedback_Activation_HSP90_Cdc37_km, AktInactive); Akt_Feedback_Activation_HSP90_Cdc37 is "Akt_Feedback_Activation_HSP90-Cdc37";  // modifiers: HSP90_Cdc37Active
    Akt_Feedback_Activation_HSP90_Cdc37_Kcat = 0.0566279; Akt_Feedback_Activation_HSP90_Cdc37_km = 653951;
  Akt_Feedback_Deactivation_PHLPP: AktActive => AktInactive; Melanoma_cell*HMM_Modified_27(Akt_Feedback_Deactivation_PHLPP_Kcat, PHLPPActive, Akt_Feedback_Deactivation_PHLPP_km, AktActive);  // modifiers: PHLPPActive
    Akt_Feedback_Deactivation_PHLPP_Kcat = 0.126329; Akt_Feedback_Deactivation_PHLPP_km = 1061.71;
  Akt_Feedback_Activation_mTORC2: AktInactive => AktActive; Melanoma_cell*HMM_Modified_28(Akt_Feedback_Activation_mTORC2_Kcat, Akt_Feedback_Activation_mTORC2_km, mTORC2Active, AktInactive);  // modifiers: mTORC2Active
    Akt_Feedback_Activation_mTORC2_Kcat = 0.0566279; Akt_Feedback_Activation_mTORC2_km = 653951;
  Akt_Feedback_Activation_TCL1: AktInactive => AktActive; Melanoma_cell*HMM_Modified_29(Akt_Feedback_Activation_TCL1_Kcat, TCL1Active, Akt_Feedback_Activation_TCL1_km, AktInactive);  // modifiers: TCL1Active
    Akt_Feedback_Activation_TCL1_Kcat = 0.0566279; Akt_Feedback_Activation_TCL1_km = 653951;
  Akt_Feedback_Deactivation_CTMP: AktActive => AktInactive; Melanoma_cell*HMM_Modified_30(CTMPActive, Akt_Feedback_Deactivation_CTMP_Kcat, Akt_Feedback_Deactivation_CTMP_km, AktActive);  // modifiers: CTMPActive
    Akt_Feedback_Deactivation_CTMP_Kcat = 0.0566279; Akt_Feedback_Deactivation_CTMP_km = 653951;
  Akt_Feedback_Deactivation_PP2A: AktActive => AktInactive; Melanoma_cell*HMM_Modified_31(Akt_Feedback_Deactivation_PP2A_Kcat, Akt_Feedback_Deactivation_PP2A_km, AktActive, PP2AActive);  // modifiers: PP2AActive
    Akt_Feedback_Deactivation_PP2A_Kcat = 0.126329; Akt_Feedback_Deactivation_PP2A_km = 1061.71;
  // http://link.springer.com/article/10.1007%2Fs10555-008-9119-x
  Erk_Feedback_Deactivation_Raf1: ErkActive => ErkInactive; Melanoma_cell*HMM_Modified_32(Erk_Feedback_Deactivation_Raf1_Kcat, Erk_Feedback_Deactivation_Raf1_km, ErkActive, Raf1Active);  // modifiers: Raf1Active
    Erk_Feedback_Deactivation_Raf1_Kcat = 8.8912; Erk_Feedback_Deactivation_Raf1_km = 3496490;
  // http://link.springer.com/article/10.1007%2Fs10555-008-9119-x
  Sos_Feedback_Deactivation_Erk: SosActive => SosInactive; Melanoma_cell*HMM_Modified_33(Sos_Feedback_Deactivation_Erk_Kcat, Sos_Feedback_Deactivation_Erk_km, ErkActive, SosActive);  // modifiers: ErkActive
    Sos_Feedback_Deactivation_Erk_Kcat = 0.0213697; Sos_Feedback_Deactivation_Erk_km = 763523;
  mTORC1_Activation_Akt: mTORC1Inactive => mTORC1Active; Melanoma_cell*HMM_Modified_34(mTORC1_Activation_Akt_Kcat, mTORC1_Activation_Akt_km, mTORC1Inactive, AktActive);  // modifiers: AktActive
    mTORC1_Activation_Akt_Kcat = 15.1212; mTORC1_Activation_Akt_km = 119355;
  S6K1_Activation_mTORC1: S6K1Inactive => S6K1Active; Melanoma_cell*HMM_Modified_35(S6K1_Activation_mTORC1_Kcat, S6K1Inactive, S6K1_Activation_mTORC1_km, mTORC1Active);  // modifiers: mTORC1Active
    S6K1_Activation_mTORC1_Kcat = 0.0213697; S6K1_Activation_mTORC1_km = 763523;
  IRS1_Feedback_Deactivation_S6K1: IRS1Active => IRS1Inactive; Melanoma_cell*HMM_Modified_36(IRS1Active, IRS1_Feedback_Deactivation_S6K1_Kcat, S6K1Active, IRS1_Feedback_Deactivation_S6K1_km);  // modifiers: S6K1Active
    IRS1_Feedback_Deactivation_S6K1_Kcat = 1611.97; IRS1_Feedback_Deactivation_S6K1_km = 896896;
  // The k1 parameter was set in a way that it reflects the half life of Dabrafenib drug i.e., 10hrs
  // C(t)=C0*e^(-ket) where ke is the half life constant.
  Dabrafenib_degradation: Dabrafenib => ; Melanoma_cell*Dabrafenib_degradation_k1*Dabrafenib;
    Dabrafenib_degradation_k1 = 1.92527e-5;
  bRaf_Deactivation_Dabrafenib: bRafMutated => bRafMutatedInactive; Melanoma_cell*HMM_Modified_37(Dabrafenib, bRaf_Deactivation_Dabrafenib_Kcat, bRafMutated, bRaf_Deactivation_Dabrafenib_km);  // modifiers: Dabrafenib
    bRaf_Deactivation_Dabrafenib_Kcat = 31900000000000; bRaf_Deactivation_Dabrafenib_km = 3200;
  bRafMutated_Production: $probRafMutated => bRafMutated; Melanoma_cell*Constant_flux__irreversible(bRafMutated_Production_v);
    bRafMutated_Production_v = 100;

  // Unit definitions:
  unit volume = 1e-3 litre;
  unit substance = 1e-3 mole;
end
