// SBML level 2 version 4
// dcterms:bibliographicCitation: http://identifiers.org/pubmed/15178199
// dcterms:bibliographicCitation: urn:miriam:pubmed:6305437
// dcterms:bibliographicCitation: urn:miriam:pubmed:4263005

model Wierschem2004_PancreaticIslets_ActionPotentials()
  // Wierschem2004 - Electrical bursting activity in Pancreatic Islets
  // This a model from the article:
  // Complex bursting in pancreatic islets: a potential glycolytic mechanism.
  // Wierschem K, Bertram R. J Theor Biol 2004 Jun 21;228(4):513-21 15178199 ,
  // Abstract:
  // The electrical activity of insulin-secreting pancreatic islets of Langerhans is characterized by bursts of action potentials. Most often this bursting is periodic, but in some cases it is modulated by an underlying slower rhythm. We suggest that the modulatory rhythm for this complex bursting pattern is due to oscillations in glycolysis, while the bursting itself is generated by some other slow process. To demonstrate this hypothesis, we couple a minimal model of glycolytic oscillations to a minimal model for activity-dependent bursting in islets. We show that the combined model can reproduce several complex bursting patterns from mouse islets published in the literature, and we illustrate how these complex oscillations are produced through the use of a fast/slow analysis.
  // This model was taken from the CellML repository and automatically converted to SBML.
  // The original model was: Wierschem K, Bertram R. () - version=1.0
  // The original CellML model was created by:
  // Ethan Choi
  // mcho099@aucklanduni.ac.nz
  // The University of Auckland
  // This model originates from BioModels Database: A Database of Annotated Published Models (http://www.ebi.ac.uk/biomodels/). It is copyright (c) 2005-2011 The BioModels.net Team.
  // To the extent possible under law, all copyright and related or neighbouring rights to this encoded model have been dedicated to the public domain worldwide. Please refer to CC0 Public Domain Dedication for more information.
  // In summary, you are entitled to use this encoded model in absolutely any manner you deem suitable, verbatim, or with modification, alone or embedded it in a larger context, redistribute it, commercially or not, in a restricted way or not..
  // To cite BioModels Database, please use: Li C, Donizelli M, Rodriguez N, Dharuri H, Endler L, Chelliah V, Li L, He E, Henry A, Stefan MI, Snoep JL, Hucka M, Le Novère N, Laibe C (2010) BioModels Database: An enhanced, curated and annotated resource for published quantitative kinetic models. BMC Syst Biol., 4:92.
  // biomodels.db:MODEL1006230006
  // biomodels.db:BIOMD0000000682
  // isDescribedBy pubmed:15178199
  // isDerivedFrom pubmed:6305437
  // isDerivedFrom pubmed:4263005
  // biomodels.db:MODEL1006230006

  // Compartments:
  compartment COMpartment = 1 litre; COMpartment is "Pancreatic Islet Cell";  // isVersionOf BTO:0000991

  // Parameters:
  tau_c = 1200;  // isPropertyOf GO:0008443
  eta = 185;
  v = 10;
  k = 20;
  ADP = 0.085817;  // isVersionOf kegg.compound:C00008; isVersionOf CHEBI:16761
  ATP = 2.1047;  // isVersionOf kegg.compound:C00002; isVersionOf CHEBI:15422
  C_m = 5300;
  V_membrane = -67.018;
  g_Ca_ = 1200;
  V_Ca = 25;
  v_m = -20;
  s_m = 12;
  g_K_ = 3000;
  V_K = -75;
  g_KCa_ = 300;
  k_D = 0.3;
  g_KATP_ = 350;
  tau_n = 16;  // isPropertyOf GO:0005267
  v_n = -16;
  s_n = 5.6;
  n = 0.00011;  // encodes GO:0005267
  c = 0.15666;  // isVersionOf CHEBI:22984; occursIn GO:0005829
  f = 0.001;
  // converts current to flux
  alpha = 2.25e-6;
  k_c = 0.1;  // encodes GO:1901660

  // Assignment rules:
  I_KATP := (V_membrane - V_K)*g_KATP_/ATP;
  n_infinity := 1/(1 + exp((v_n - V_membrane)/s_n));
  omega := 1/(1 + k_D/c);
  phi := ATP*(1 + k*ADP)^2;
  I_K := g_K_*n*(V_membrane - V_K);
  I_KCa := g_KCa_*omega*(V_membrane - V_K);
  m_infinity := 1/(1 + exp((v_m - V_membrane)/s_m));
  I_Ca := g_Ca_*m_infinity*(V_membrane - V_Ca);
  J_mem := -f*(alpha*I_Ca + k_c*c);

  // Rate rules:
  ADP' = (phi - eta*ADP)/(1000*tau_c);
  ATP' = (v - phi)/(1000*tau_c);
  V_membrane' = -(I_Ca + I_K + I_KCa + I_KATP)/C_m;
  n' = (n_infinity - n)/tau_n;
  c' = J_mem;

  // Unit definitions:
  unit millisecond = 1e-3 second;
  unit per_millisecond = 1 / (1e-3 second);
  unit millivolt = 1e-3 volt;
  unit picosiemens = 1e-12 siemens;
  unit per_litre = 1 / litre;
  unit micromolar = 1e-6 mole / litre;
  unit femtoampere = 1e-15 ampere;
  unit micromolar_per_fA_ms = 1e-6 mole / (litre * 1e-15 ampere * 1e-3 second);
  unit micromolar_per_ms = 1e-6 mole / (litre * 1e-3 second);
  unit femtofarad = 1e-15 farad;
  unit time = 1e-3 second;
end
