// SBML level 2 version 4
// dcterms:bibliographicCitation: http://identifiers.org/pubmed/10588728

model Wodarz1999_CTL_memory_response_HIV()
  // Wodarz1999 - Cytotoxic T lymphocyte memory response to HIV infection
  // This a model from the article:
  // Specific therapy regimes could lead to long-term immunological control of HIV.
  // Wodarz D, Nowak MA. Proc Natl Acad Sci U S A 1999 Dec 7;96(25):14464-9 10588728 ,
  // Abstract:
  // We use mathematical models to study the relationship between HIV and the immune system during the natural course of infection and in the context of different antiviral treatment regimes. The models suggest that an efficient cytotoxic T lymphocyte (CTL) memory response is required to control the virus. We define CTL memory as long-term persistence of CTL precursors in the absence of antigen. Infection and depletion of CD4(+) T helper cells interfere with CTL memory generation, resulting in persistent viral replication and disease progression. We find that antiviral drug therapy during primary infection can enable the development of CTL memory. In chronically infected patients, specific treatment schedules, either including deliberate drug holidays or antigenic boosts of the immune system, can lead to a re-establishment of CTL memory. Whether such treatment regimes would lead to long-term immunologic control deserves investigation under carefully controlled conditions.
  // This model was taken from the CellML repository and automatically converted to SBML.
  // The original model was: Wodarz D, Nowak MA. (1999) - version=1.0
  // The original CellML model was created by:
  // Catherine Lloyd
  // c.lloyd@auckland.ac.nz
  // The University of Auckland
  // This model originates from BioModels Database: A Database of Annotated Published Models (http://www.ebi.ac.uk/biomodels/). It is copyright (c) 2005-2011 The BioModels.net Team.
  // To the extent possible under law, all copyright and related or neighbouring rights to this encoded model have been dedicated to the public domain worldwide. Please refer to CC0 Public Domain Dedication for more information.
  // In summary, you are entitled to use this encoded model in absolutely any manner you deem suitable, verbatim, or with modification, alone or embedded it in a larger context, redistribute it, commercially or not, in a restricted way or not..
  // To cite BioModels Database, please use: Li C, Donizelli M, Rodriguez N, Dharuri H, Endler L, Chelliah V, Li L, He E, Henry A, Stefan MI, Snoep JL, Hucka M, Le Novère N, Laibe C (2010) BioModels Database: An enhanced, curated and annotated resource for published quantitative kinetic models. BMC Syst Biol., 4:92.
  // biomodels.db:MODEL1006230062
  // biomodels.db:BIOMD0000000683
  // isDescribedBy pubmed:10588728
  // biomodels.db:MODEL1006230062
  // isVersionOf efo:0000764
  // occursIn BTO:0002417

  // Compartments:
  compartment COMpartment = 1; COMpartment is "Patient";

  // Parameters:
  x = 10;  // isVersionOf ncit:C12537; hasProperty efo:0001460
  lamda = 1;
  d = 0.1;  // encodes GO:0008219
  y = 0.1;  // isVersionOf ncit:C12537; hasProperty efo:0000764
  a = 0.2;
  w = 0.001;  // isVersionOf BTO:0000289; hasProperty efo:0001651
  b = 0.01;  // encodes GO:0008219
  z = 0;  // isVersionOf BTO:0000289; isVersionOf CL:0000911
  h = 0.1;  // encodes GO:0008219
  beta = 1.5;  // encodes efo:0000544
  p = 1;  // encodes GO:0001909
  q = 0.5;  // encodes GO:0045065
  c = 0.1;  // encodes GO:0046651

  // Assignment rules:
  log_y := log10(y*1)/log10(10);
  log_w := log10(w*1)/log10(10);
  s := piecewise(1, time < 1, piecewise(1, time > 15, 0.0042));

  // Rate rules:
  x' = lamda - (d*x + s*beta*x*y);
  y' = s*beta*x*y - (a*y + p*y*z);
  w' = c*x*y*w - (c*q*y*w + b*w);
  z' = c*q*y*w - h*z;

  // Unit definitions:
  unit time = 86400 second;
end
