// SBML level 2 version 4
// dcterms:bibliographicCitation: urn:miriam:pubmed:27065985

function Constant_flux__irreversible(v)
  v;
end
Constant_flux__irreversible is "Constant flux (irreversible)";

function Henri_Michaelis_Menten__irreversible__1(Km, THF, V)
  V*THF/(Km + THF);
end
Henri_Michaelis_Menten__irreversible__1 is "Henri-Michaelis-Menten (irreversible)_1";

function Henri_Michaelis_Menten__irreversible__2(CH2_THF, Km, V)
  V*CH2_THF/(Km + CH2_THF);
end
Henri_Michaelis_Menten__irreversible__2 is "Henri-Michaelis-Menten (irreversible)_2";

model Thiaville2016___Folate_pathway_model_with_induced_PanB_reaction_and_folate_pathway()
  // Thiaville2016 - Folate pathway model (PanB overexpression and THF regulation)
  // Henry2016 Folate pathway model with induced PanB reaction
  // This model is described in the article:
  // Experimental and Metabolic Modeling Evidence for a Folate-Cleaving Side-Activity of Ketopantoate Hydroxymethyltransferase (PanB).
  // Thiaville JJ, Frelin O, García-Salinas C, Harrison K, Hasnain G, Horenstein NA, Díaz de la Garza RI, Henry CS, Hanson AD, de Crécy-Lagard V.
  // Front Microbiol 2016; 7: 431
  // Abstract:
  // Tetrahydrofolate (THF) and its one-carbon derivatives, collectively termed folates, are essential cofactors, but are inherently unstable. While it is clear that chemical oxidation can cleave folates or damage their pterin precursors, very little is known about enzymatic damage to these molecules or about whether the folate biosynthesis pathway responds adaptively to damage to its end-products. The presence of a duplication of the gene encoding the folate biosynthesis enzyme 6-hydroxymethyl-7,8-dihydropterin pyrophosphokinase (FolK) in many sequenced bacterial genomes combined with a strong chromosomal clustering of the folK gene with panB, encoding the 5,10-methylene-THF-dependent enzyme ketopantoate hydroxymethyltransferase, led us to infer that PanB has a side activity that cleaves 5,10-methylene-THF, yielding a pterin product that is recycled by FolK. Genetic and metabolic analyses of Escherichia coli strains showed that overexpression of PanB leads to accumulation of the likely folate cleavage product 6-hydroxymethylpterin and other pterins in cells and medium, and-unexpectedly-to a 46% increase in total folate content. In silico modeling of the folate biosynthesis pathway showed that these observations are consistent with the in vivo cleavage of 5,10-methylene-THF by a side-activity of PanB, with FolK-mediated recycling of the pterin cleavage product, and with regulation of folate biosynthesis by folates or their damage products.
  // This model is hosted on BioModels Database and identified by: MODEL1602280002.
  // To cite BioModels Database, please use: BioModels Database: An enhanced, curated and annotated resource for published quantitative kinetic models.
  // To the extent possible under law, all copyright and related or neighbouring rights to this encoded model have been dedicated to the public domain worldwide. Please refer to CC0 Public Domain Dedication for more information.
  // biomodels.db:MODEL1602280003
  // biomodels.db:BIOMD0000000690
  // isDescribedBy pubmed:27065985
  // biomodels.db:MODEL1602280003
  // hasPart CHEBI:67016
  // hasProperty GO:0046656

  // Compartments:
  compartment compartment = 1;

  // Species:
  // 6-hydroxymethyldihydropterin
  species H2_HMPt in compartment = 3.315e-6; H2_HMPt is "H2-HMPt";  // isVersionOf CHEBI:38797; isVersionOf kegg.compound:C01300
  species $ATP in compartment = 0.0096;  // isVersionOf kegg.compound:C00002; isVersionOf CHEBI:15422
  // 6-hydroxymethyldihydropterin
  species H2_HMPterinPP in compartment = 1e-5; H2_HMPterinPP is "H2-HMPterinPP";  // isVersionOf kegg.compound:C01300; hasProperty GO:0016310; isVersionOf CHEBI:38797
  species $AMP in compartment = 0.00028;  // isVersionOf CHEBI:16027; isVersionOf kegg.compound:C00020
  species p_ABA in compartment = 1e-5; p_ABA is "p-ABA";  // isVersionOf kegg.compound:C00568; isVersionOf CHEBI:17836
  species $PPi in compartment = 0.0005;  // isVersionOf kegg.compound:C00013
  species H2_Pteroate in compartment = 1e-5; H2_Pteroate is "H2-Pteroate";  // isVersionOf kegg.compound:C00921; isVersionOf CHEBI:38793
  species $L_Glutamate in compartment = 0.000846; L_Glutamate is "L-Glutamate";  // isVersionOf kegg.compound:C00025; isVersionOf CHEBI:29987
  species $Phosphate in compartment = 0.01;  // isVersionOf CHEBI:26020
  species $ADP in compartment = 0.00056;  // isVersionOf CHEBI:16761; isVersionOf kegg.compound:C00008
  species DHF in compartment = 1e-5;  // isVersionOf kegg.compound:C00415; isVersionOf CHEBI:57451
  species $L_serine in compartment = 6.8e-5; L_serine is "L-serine";  // isVersionOf CHEBI:17822; isVersionOf kegg.compound:C00065
  species $Glycine in compartment = 0.000277;  // isVersionOf CHEBI:15428; isVersionOf kegg.compound:C00037
  species $NADP in compartment = 9.4e-7;  // isVersionOf CHEBI:25523; isVersionOf kegg.compound:C00006
  species $NADPH in compartment = 9.4e-7;  // isVersionOf kegg.compound:C00005; isVersionOf CHEBI:16474
  species THF in compartment = 0.000169;  // isVersionOf CHEBI:67016; isVersionOf kegg.compound:C00101
  species CH2_THF in compartment = 8.47e-5; CH2_THF is "CH2-THF";  // isVersionOf CHEBI:12071; isVersionOf kegg.compound:C00143

  // Reactions:
  FolK: $ATP + H2_HMPt => $AMP + H2_HMPterinPP; compartment*FolK_k1*ATP*H2_HMPt;  // isEncodedBy uniprot:P26281; isVersionOf kegg.reaction:R03503
    FolK_k1 = 24.8;
  FolP: p_ABA + H2_HMPterinPP => $PPi + H2_Pteroate; compartment*FolP_k1*p_ABA*H2_HMPterinPP;  // isEncodedBy uniprot:P0AC13; isVersionOf kegg.reaction:R03067
    FolP_k1 = 8000;
  FolC: $L_Glutamate + $ATP + H2_Pteroate => DHF + $ADP + $Phosphate; compartment*FolC_k1*L_Glutamate*ATP*H2_Pteroate;  // isEncodedBy uniprot:P08192; isVersionOf kegg.reaction:R02237
    FolC_k1 = 10029;
  GlyA: THF + $L_serine -> CH2_THF + $Glycine; compartment*(GlyA_k1*THF*L_serine - k2*CH2_THF*Glycine);  // isEncodedBy uniprot:P0A825; isVersionOf kegg.reaction:R00945
    GlyA_k1 = 4080; k2 = 2000;
  FolA: DHF + $NADPH => $NADP + THF; compartment*FolA_k1*DHF*NADPH;  // isEncodedBy uniprot:P0ABQ4; isVersionOf kegg.reaction:R00939
    FolA_k1 = 86170;
  PanB: CH2_THF => H2_HMPt + p_ABA; compartment*PanB_k1*CH2_THF;  // isEncodedBy uniprot:P31057; isVersionOf kegg.reaction:R03066
    PanB_k1 = 0.008;
  p_ABA_production: => p_ABA; compartment*Constant_flux__irreversible(p_ABA_production_v); p_ABA_production is "p-ABA_production";
    p_ABA_production_v = 2.35e-7;
  H2_HMPt_production: => H2_HMPt; compartment*Constant_flux__irreversible(H2_HMPt_production_v); H2_HMPt_production is "H2-HMPt_production";
    H2_HMPt_production_v = 2.35e-7;
  THF_drain: THF => ; compartment*Henri_Michaelis_Menten__irreversible__1(THF_drain_Km, THF, THF_drain_V);
    THF_drain_Km = 0.0001571; THF_drain_V = 1.243e-7;
  CH2_THF_drain: CH2_THF => ; compartment*Henri_Michaelis_Menten__irreversible__2(CH2_THF, CH2_THF_drain_Km, CH2_THF_drain_V); CH2_THF_drain is "CH2-THF_drain";
    CH2_THF_drain_Km = 5.921e-5; CH2_THF_drain_V = 1.726e-7;

  // Unit definitions:
  unit volume = 1e-3 litre;
  unit substance = 1e-3 mole;
end
