// SBML level 2 version 4
// dcterms:bibliographicCitation: urn:miriam:pubmed:16584750

function Constant_flux__irreversible(v)
  v;
end
Constant_flux__irreversible is "Constant flux (irreversible)";

function Function_for_Reaction_1(k_pg, P, p_inf)
  k_pg*P*(1 - P/p_inf);
end
Function_for_Reaction_1 is "Function for Reaction 1 [1]";

function Function_for_Reaction_2(k_pm, s_m, P, mu_m, k_mp)
  k_pm*s_m*P/(mu_m + k_mp*P);
end

function Function_for_Reaction_3(f_Nstar, P, k_pn)
  k_pn*f_Nstar*P;
end

function Function_for_Reaction_4(s_nr, R, mu_nr)
  s_nr*R/(mu_nr + R);
end

function Function_for_Reaction_6(k_dn, f_s_f_Nstar)
  k_dn*f_s_f_Nstar;
end

function Function_for_Reaction_9(k_cn, f_Nstar_k_cnd_D)
  k_cn*f_Nstar_k_cnd_D/(1 + f_Nstar_k_cnd_D);
end

model Reynolds2006___Reduced_model_of_the_acute_inflammatory_response()
  // Reynolds2006 - Reduced model of the acute inflammatory response
  // hasProperty GO:0006955
  // hasProperty mamo:MAMO_0000046
  // hasProperty GO:0002526
  // hasTaxon taxonomy:9606
  // isDescribedBy pubmed:16584750
  // biomodels.db:MODEL1808280003 biomodels.db:BIOMD0000000714

  // Compartments:
  compartment compartment = 1; compartment is "Human body";  // hasTaxon taxonomy:9606

  // Species:
  species P in compartment = 1; P is "Pathogen (P)";  // isVersionOf EFO:0000643
  species Nstar in compartment = 0; Nstar is "Activated Phagocytes (Nstar)";  // isVersionOf BTO:0001044
  species D in compartment = 0; D is "Tissue Damage (D)";  // isVersionOf ncit:C50773
  species C_A in compartment = 0.125; C_A is "Anti-inflammatory mediators (C_A)";  // isVersionOf CHEBI:67079; hasProperty ncit:C28347

  // Parameters:
  k_pm = 0.6;
  k_mp = 0.01;
  s_m = 0.005;
  mu_m = 0.002;
  k_pg = 0.3;
  p_inf = 20;
  k_pn = 1.8;
  k_np = 0.1;
  k_nn = 0.01;
  s_nr = 0.08;
  mu_nr = 0.12;
  mu_n = 0.05;
  k_nd = 0.02;
  k_dn = 0.35;
  x_dn = 0.06;
  mu_d = 0.02;
  c_inf = 0.28;
  s_c = 0.0125;
  k_cn = 0.04;
  k_cnd = 48;
  mu_c = 0.1;
  var f_Nstar__k_cnd_D;

  // Assignment rules:
  f_Nstar := Nstar/(1 + (C_A/c_inf)^2);
  f_s_f_Nstar := f_Nstar^6/(x_dn^6 + f_Nstar^6);
  R := (k_nn*Nstar + k_np*P + k_nd*D)/(1 + (C_A/c_inf)^2);
  f_Nstar__k_cnd_D := (Nstar + k_cnd*D)/(1 + (C_A/c_inf)^2);

  // Reactions:
  Production_of_Pathogen: => P; compartment*Function_for_Reaction_1(k_pg, P, p_inf);
  reaction_2: P => ; compartment*Function_for_Reaction_2(k_pm, s_m, P, mu_m, k_mp); reaction_2 is "Degradation of pathogen by non-specific local response";
  reaction_3: P => ; compartment*Function_for_Reaction_3(f_Nstar, P, k_pn); reaction_3 is "Degradation of pathogen by activated phagocytes";
  reaction_4: => Nstar; compartment*Function_for_Reaction_4(s_nr, R, mu_nr); reaction_4 is "Recruitment of Activated Phagocytes from the source";
  Death_of_activated_phagocytes: Nstar => ; compartment*mu_n*Nstar;
  reaction_6: => D; compartment*Function_for_Reaction_6(k_dn, f_s_f_Nstar); reaction_6 is "Tissue damage produced by activated phagocytes";
  Removal_of_damaged_tissue: D => ; compartment*mu_d*D;
  reaction_8: => C_A; compartment*Constant_flux__irreversible(s_c); reaction_8 is "Recruitment of Anti-inflammatory mediators from the source";
  reaction_9: => C_A; compartment*Function_for_Reaction_9(k_cn, f_Nstar__k_cnd_D); reaction_9 is "Production of anti-inflammatory mediators";
  reaction_10: C_A => ; compartment*mu_c*C_A; reaction_10 is "Removal of anti-inflammatory mediators";

  // Unit definitions:
  unit time = 3600 second;
end
