// SBML level 2 version 4
// dcterms:bibliographicCitation: urn:miriam:pubmed:23028477
// dcterms:bibliographicCitation: urn:miriam:doi:10.1371/journal.pone.0043908

function Constant_flux__irreversible(v)
  v;
end
Constant_flux__irreversible is "Constant flux (irreversible)";

function self_promoting_michaelis_menten(k, M, J1, P, J2)
  k*(M/(J1 + M))*(P/(J2 + P));
end

function function(k, M, J)
  k*M/(J + M);
end

function function_1(k, M1, M2, J)
  k*M1*(M2/(J + M2));
end

model Yan2014___Rb_E2F_pathway_dynamics_with_miR449()
  // Yan2012 - Rb-E2F pathway dynamics with miR449
  // isDerivedFrom GO:0007049 reactome:R-HSA-69206 mamo:MAMO_0000046 taxonomy:40674 biomodels.db:BIOMD0000000318
  // hasPart GO:0007049
  // isPartOf reactome:R-HSA-69206
  // hasProperty mamo:MAMO_0000046
  // hasTaxon taxonomy:40674
  // isDescribedBy biomodels.db:BIOMD0000000318 doi:10.1371/journal.pone.0043908

  // Compartments:
  compartment compartment = 1; compartment is "cell";  // ncit:C12958

  // Species:
  species E2F in compartment = 1.2;  // isVersionOf uniprot:Q01094
  species Myc in compartment = 0;  // isVersionOf uniprot:P01106
  species CycD in compartment = 0;  // hasPart uniprot:Q00534; hasPart uniprot:P11802; isVersionOf uniprot:P30279; isVersionOf uniprot:P30281
  species RE in compartment = 0;  // hasPart uniprot:Q01094; hasPart uniprot:P06400
  species CycE in compartment = 0;  // hasPart uniprot:P24864; hasPart uniprot:P24941
  species RB in compartment = 0.55;  // isVersionOf uniprot:P06400
  species miR449 in compartment = 0;  // isVersionOf mirbase.mature:MIMAT0001541
  species $S in compartment = 3;  // hasProperty ncit:C20424
  species PRB in compartment = 0;  // isVersionOf uniprot:P06400; hasProperty ncit:C1897

  // Parameters:
  ksE1 = 0.4;
  JM = 0.15;
  JE = 0.15;
  ksE2 = 0.003;
  kP1 = 18;
  JCD = 0.92;
  kP2 = 18;
  JCE = 0.92;
  kdE = 0.25;
  kRE = 180;
  ksmiR = 1.4;
  kdmiR = 0.02;
  ksM = 1;
  JS = 0.5;
  kdM1 = 0.7;
  kdM2 = 0.6;
  ksCD1 = 0.45;
  ksCD2 = 0.03;
  kdCD1 = 1.5;
  kdCD2 = 1;
  ksCE = 0.35;
  kdCE1 = 1.5;
  kdCE2 = 0.7;
  ksR = 0.18;
  kP = 3.6;
  JP = 0.01;
  kdR = 0.06;
  kdP = 0.06;
  kdRE = 0.03;

  // Reactions:
  reaction: => E2F; compartment*self_promoting_michaelis_menten(ksE1, Myc, JM, E2F, JE);  // modifiers: Myc
  reaction_1: => E2F; compartment*function(ksE2, Myc, JM);  // modifiers: Myc
  reaction_2: RE => E2F + PRB; compartment*function_1(kP1, CycD, RE, JCD);  // modifiers: CycD
  reaction_3: RE => E2F + PRB; compartment*function_1(kP2, CycE, RE, JCE);  // modifiers: CycE
  reaction_4: E2F => ; compartment*kdE*E2F;
  reaction_5: E2F + RB => RE; compartment*kRE*E2F*RB;
  reaction_6: => miR449; compartment*function(ksmiR, E2F, JE);  // modifiers: E2F
  reaction_7: miR449 => ; compartment*kdmiR*miR449;
  reaction_8: miR449 + Myc => ; compartment*function_1(kdM2, miR449, Myc, JM);
  reaction_9: miR449 + CycD => ; compartment*function_1(kdCD2, miR449, CycD, JCD);
  reaction_10: miR449 + CycE => ; compartment*function_1(kdCE2, miR449, CycE, JCE);
  reaction_11: => Myc; compartment*function(ksM, S, JS);  // modifiers: S
  reaction_12: Myc => ; compartment*kdM1*Myc;
  reaction_13: => CycD; compartment*function(ksCD1, S, JS);  // modifiers: S
  reaction_14: => CycD; compartment*function(ksCD2, Myc, JM);  // modifiers: Myc
  reaction_15: CycD => ; compartment*kdCD1*CycD;  // modifiers: S
  reaction_16: => CycE; compartment*function(ksCE, E2F, JE);  // modifiers: E2F
  reaction_17: CycE => ; compartment*kdCE1*CycE;
  reaction_18: => RB; compartment*Constant_flux__irreversible(ksR);
  reaction_19: PRB => RB; compartment*function(kP, PRB, JP);
  reaction_20: RB => ; compartment*kdR*RB;
  reaction_21: RB => PRB; compartment*function_1(kP1, CycD, RB, JCD);  // modifiers: CycD
  reaction_22: RB => PRB; compartment*function_1(kP2, CycE, RB, JCE);  // modifiers: CycE
  reaction_23: PRB => ; compartment*kdP*PRB;
  reaction_24: RE => ; compartment*kdRE*RE;

  // Unit definitions:
  unit volume = 1e-3 litre;
  unit time = 3600 second;
  unit substance = 1e-3 mole;
end
