// SBML level 2 version 4

function Henri_Michaelis_Menten__irreversible(substrate, Km, V)
  V*substrate/(Km + substrate);
end
Henri_Michaelis_Menten__irreversible is "Henri-Michaelis-Menten (irreversible)";

// Taken from DeLeo et al 1973, JBC 248, 2344-2353
function Rate_Law_for_R1(vmax, PEP, EP, kpep, kep)
  vmax*EP*PEP/(kpep*kep + kpep*EP + kep*PEP + EP*PEP);
end

function Rate_Law_for_R6(PEP, vmax, SKP, kpep, kskp)
  vmax*PEP*SKP/(kpep*kskp + kpep*SKP + kskp*PEP + SKP*PEP);
end

function Rate_Law_for_R8(vmax, CM, Gln, kcm, kgln)
  vmax*CM*Gln/(kcm*kgln + kcm*Gln + kgln*CM + CM*Gln);
end

function Rate_Law_for_R14(vmax, DHP, Glu, kdhp, kglu, ATP, katp)
  vmax*DHP*Glu*ATP/(kdhp*kglu*katp + kdhp*(Glu + ATP) + kglu*(DHP + ATP) + katp*(Glu + ATP) + DHP*Glu*ATP);
end

function Rate_Law_for_R16(vmax, THF, Glu, kthf, kglu, ATP, katp, DHF, kidhf)
  vmax*THF*Glu*ATP/(kthf*(1 + DHF/kidhf)*kglu*katp + kthf*(Glu + ATP) + kglu*(THF + ATP) + katp*(THF + Glu) + THF*Glu*ATP);
end

function Rate_Law_for_R17(vmax, THFGlu, Ser, kthfglu, kser, THF, kithf)
  vmax*THFGlu*Ser/(kthfglu*(1 + THF/kithf)*kser + kthfglu*Ser + kser*THFGlu + THFGlu*Ser);
end

function Rate_Law_for_R18c(vmax, THFGlu, kthfglu, SAmDLp, ksamdlp)
  vmax*THFGlu*SAmDLp/(kthfglu*ksamdlp + kthfglu*SAmDLp + ksamdlp*THFGlu + THFGlu*SAmDLp);
end

function Rate_Law_for_R20(vmax, MTHFGlu, Hcy, kmthfglu, khcy)
  vmax*MTHFGlu*Hcy/(kmthfglu*khcy + kmthfglu*Hcy + khcy*MTHFGlu + MTHFGlu*Hcy);
end

function Rate_Law_for_R21(vmax, myTHFGlu, dUMP, kdump, kmythfglu, DHF, kidhf)
  vmax*myTHFGlu*dUMP/(kmythfglu*(1 + DHF/kidhf)*kdump + kmythfglu*dUMP + kdump*myTHFGlu + myTHFGlu*dUMP);
end

function Rate_Law_for_R18b(vmax, Gly, DLp, kgly, kdlp)
  vmax*Gly*DLp/(kgly*kdlp + kgly*DLp + kdlp*Gly + Gly*DLp);
end

function Rate_Law_for_R18a(vmax, NADH, Lp, knadh, klp)
  vmax*NADH*Lp/(knadh*klp + knadh*Lp + klp*NADH + NADH*Lp);
end

function Rate_Law_for_R4(vmax, DHSK, NADPH, kdhsk, knadph)
  vmax*DHSK*NADPH/(kdhsk*knadph + kdhsk*NADPH + knadph*DHSK + DHSK*NADPH);
end

function Rate_Law_for_R5(vmax, SK, ATP, ksk, katp)
  vmax*SK*ATP/(ksk*katp + ksk*ATP + katp*SK + SK*ATP);
end

function Rate_Law_for_R12(vmax, ATP, katp, AHMDHP, kahmdhp)
  vmax*AHMDHP*ATP/(kahmdhp*katp + katp*AHMDHP + kahmdhp*ATP + AHMDHP*ATP);
end

function Rate_Law_for_R15(vmax, DHF, NADPH, kdhf, knadph)
  vmax*DHF*NADPH/(kdhf*knadph + kdhf*NADPH + knadph*DHF + DHF*NADPH);
end

function Rate_Law_for_R19(vmax, myTHFGlu, NADPH, knadph, kmythfglu, DHF, kidhf)
  vmax*myTHFGlu*NADPH/(kmythfglu*(1 + DHF/kidhf)*knadph + kmythfglu*NADPH + knadph*myTHFGlu + myTHFGlu*NADPH);
end

function Rate_Law_for_R22(vmax, myTHFGlu, NADP, kmythfglu, knadp, DHF, kidhf)
  vmax*myTHFGlu*NADP/(kmythfglu*(1 + DHF/kidhf)*knadp + kmythfglu*NADP + knadp*myTHFGlu + myTHFGlu*NADP);
end

function Rate_Law_for_R25(vmax, fTHFGlu, mtRNA, kfthfglu, kmtrna)
  vmax*fTHFGlu*mtRNA/(kfthfglu*kmtrna + kfthfglu*mtRNA + kmtrna*fTHFGlu + fTHFGlu*mtRNA);
end

function Rate_Law_for_R26(vmax, fTHFGlu, NADP, kfthfglu, knadp)
  vmax*fTHFGlu*NADP/(kfthfglu*knadp + kfthfglu*NADP + knadp*fTHFGlu + fTHFGlu*NADP);
end

function Rate_Law_for_R13(vmax, kahmdpp, kpaba, AHMDPP, pABA)
  vmax*AHMDPP*pABA/(kahmdpp*kpaba + kpaba*AHMDPP + kahmdpp*pABA + AHMDPP*pABA);
end

function Rate_Law_for_R24(vmax, kthfglu, kformyl, katp, THFGlu, Formyl, ATP)
  vmax*THFGlu*Formyl*ATP/(kthfglu*kformyl*katp + kthfglu*(Formyl + ATP) + kformyl*(THFGlu + ATP) + katp*(Formyl + THFGlu) + THFGlu*Formyl*ATP);
end

function Rate_Law_for_R10(vmax, GTP, kgtp, THF, kiTHF)
  vmax*GTP/(kgtp*(1 + THF/kiTHF) + GTP);
end

function Rate_Law_for_R29(vmax, ATP, ffTHFGlu, katp, kffthfglu)
  vmax*ATP*ffTHFGlu/(katp*kffthfglu + katp*ffTHFGlu + kffthfglu*ATP + ATP*ffTHFGlu);
end

model MODEL1511020000()
  // Salcedo-Sora2016 - Microbial folate biosynthesis and utilisation
  // This model is described in the article:
  // A mathematical model of microbial folate biosynthesis and utilisation: implications for antifolate development.
  // Enrique Salcedo-Sora J, Mc Auley MT.
  // Mol Biosyst. 2016 Jan 21.
  // Abstract:
  // The metabolic biochemistry of folate biosynthesis and utilisation has evolved into a complex network of reactions. Although this complexity represents challenges to the field of folate research it has also provided a renewed source for antimetabolite targets. A range of improved folate chemotherapy continues to be developed and applied particularly to cancer and chronic inflammatory diseases. However, new or better antifolates against infectious diseases remain much more elusive. In this paper we describe the assembly of a generic deterministic mathematical model of microbial folate metabolism. Our aim is to explore how a mathematical model could be used to explore the dynamics of this inherently complex set of biochemical reactions. Using the model it was found that: (1) a particular small set of folate intermediates are overrepresented, (2) inhibitory profiles can be quantified by the level of key folate products, (3) using the model to scan for the most effective combinatorial inhibitions of folate enzymes we identified specific targets which could complement current antifolates, and (4) the model substantiates the case for a substrate cycle in the folinic acid biosynthesis reaction. Our model is coded in the systems biology markup language and has been deposited in the BioModels Database (MODEL1511020000), this makes it accessible to the community as a whole.
  // This model is hosted on BioModels Database and identified by: MODEL1511020000.
  // To cite BioModels Database, please use: BioModels Database: An enhanced, curated and annotated resource for published quantitative kinetic models.
  // To the extent possible under law, all copyright and related or neighbouring rights to this encoded model have been dedicated to the public domain worldwide. Please refer to CC0 Public Domain Dedication for more information.
  // biomodels.db:MODEL1511020000

  // Compartments:
  compartment compartment = 1;

  // Species:
  species DAHP in compartment = 0.9796079;
  species $PEP in compartment = 16.01032;
  species Pi in compartment = 2.725541;
  species DHQ in compartment = 0.9994088;
  species $EP in compartment = 107.502052;
  species DHSK in compartment = 1.92788104;
  species SK in compartment = 5.06777189;
  species SKP in compartment = 2;
  species CVPSK in compartment = 0.9174313;
  species CM in compartment = 1.009196;
  species $Gln in compartment = 381.0009;
  species Glu in compartment = 959.9999;
  species ADC in compartment = 0.9907047;
  species Pyr in compartment = 1.000007;
  species pABA in compartment = 1.00378139;
  species DHNTP in compartment = 4;
  species $GTP in compartment = 487.4867;
  species AHMDHP in compartment = 2.01877235;
  species HAD in compartment = 2.002306;
  species PTHP in compartment = 1.002299;
  species AHMDPP in compartment = 0.9873083;
  species DHP in compartment = 0.9963801;
  species DHF in compartment = 1.142744;
  species THF in compartment = 8;
  species THFGlu in compartment = 1;
  species $Gly in compartment = 499.9975;
  species $Ser in compartment = 6.803577;
  species myTHFGlu in compartment = 1.04350884;
  species MTHFGlu in compartment = 1.000096;
  species $Hcy in compartment = 1.000183;
  species Met in compartment = 0.9998172;
  species dTMP in compartment = 0.9974701;
  species $dUMP in compartment = 20.00253;
  species meTHFGlu in compartment = 0.9082384;
  species fTHFGlu in compartment = 1.83347183;
  species fmtRNA in compartment = 0.9968761;
  species $mtRNA in compartment = 1.003124;
  species COTwo in compartment = 0.988683328;
  species ADP in compartment = 2.828115;
  species $ATP in compartment = 963.0188;
  species NADP in compartment = 2;
  species $NADPH in compartment = 12.19849;
  species AMP in compartment = 0.983533495;
  species DLp in compartment = 0.7017503;
  species SAmDLp in compartment = 1.000015;
  species $Lp in compartment = 1.298234;
  species NAD in compartment = 0.7017656;
  species $NADH in compartment = 8.349823;
  species Ammonia in compartment = 0.9895374;
  species Formyl in compartment = 8;
  species ffTHFGlu in compartment = 1;

  // Reactions:
  R1: $PEP + $EP => DAHP + Pi; compartment*Rate_Law_for_R1(R1_vmax, PEP, EP, R1_kpep, kep);
    R1_vmax = 578.76; R1_kpep = 36; kep = 285;
  R2: DAHP => DHQ + Pi; compartment*Henri_Michaelis_Menten__irreversible(DAHP, R2_Km, R2_V);
    R2_Km = 4.7; R2_V = 7.462;
  R3: DHQ => DHSK; compartment*Henri_Michaelis_Menten__irreversible(DHQ, R3_Km, R3_V);
    R3_Km = 58; R3_V = 116.48;
  R4: DHSK + $NADPH => SK + NADP; compartment*Rate_Law_for_R4(R4_vmax, DHSK, NADPH, kdhsk, R4_knadph);
    R4_vmax = 17290; kdhsk = 30; R4_knadph = 11;
  R5: SK + $ATP => SKP + ADP + Pi; compartment*Rate_Law_for_R5(R5_vmax, SK, ATP, ksk, R5_katp);
    R5_vmax = 18200; ksk = 200; R5_katp = 151.5;
  R6: SKP + $PEP => CVPSK + Pi; compartment*Rate_Law_for_R6(SKP, R6_vmax, PEP, R6_kpep, kskp);
    R6_vmax = 1547; R6_kpep = 93; kskp = 80;
  R7: CVPSK => CM + Pi; compartment*Henri_Michaelis_Menten__irreversible(CVPSK, R7_Km, R7_V);
    R7_Km = 12.7; R7_V = 728;
  R8: CM + $Gln => ADC + Glu; compartment*Rate_Law_for_R8(R8_vmax, CM, Gln, kcm, kgln);
    R8_vmax = 26; kcm = 13; kgln = 1100;
  R9: ADC => pABA + Pyr; compartment*Henri_Michaelis_Menten__irreversible(ADC, R9_Km, R9_V);
    R9_Km = 1.1; R9_V = 2.2;
  R10: $GTP => DHNTP + Formyl; compartment*Rate_Law_for_R10(R10_vmax, GTP, kgtp, THF, kiTHF);  // modifiers: THF
    R10_vmax = 1515.15; kgtp = 17.6; kiTHF = 0.157;
  R11: DHNTP => AHMDHP + HAD + Pi; compartment*Henri_Michaelis_Menten__irreversible(DHNTP, R11_Km, R11_V);
    R11_Km = 7.4; R11_V = 792.064;
  R27: DHNTP => PTHP + Pi; compartment*Henri_Michaelis_Menten__irreversible(DHNTP, R27_Km, R27_V);
    R27_Km = 10; R27_V = 22.659;
  R12: AHMDHP + $ATP => AHMDPP + AMP; compartment*Rate_Law_for_R12(R12_vmax, AHMDHP, R12_katp, ATP, kahmdhp);
    R12_vmax = 382.2; R12_katp = 15; kahmdhp = 3.6;
  R14: DHP + Glu + $ATP => DHF + ADP + Pi; compartment*Rate_Law_for_R14(R14_vmax, DHP, Glu, kdhp, R14_kglu, ATP, R14_katp);
    R14_vmax = 2.821; kdhp = 1; R14_kglu = 1380; R14_katp = 100;
  R15: DHF + $NADPH => THF + NADP; compartment*Rate_Law_for_R15(R15_vmax, DHF, NADPH, kdhf, R15_knadph);
    R15_vmax = 3000; kdhf = 3; R15_knadph = 6.12;
  R16: THF + Glu + $ATP => THFGlu + ADP + Pi; compartment*Rate_Law_for_R16(R16_vmax, THF, Glu, kthf, R16_kglu, ATP, R16_katp, DHF, R16_kidhf);  // modifiers: DHF
    R16_vmax = 84.63; kthf = 26; R16_kglu = 740; R16_katp = 128; R16_kidhf = 3.1;
  R17: THFGlu + $Ser -> myTHFGlu + $Gly; compartment*Rate_Law_for_R17(R17_vmax, THFGlu, Ser, R17_kthfglu, kser, THF, kithf);  // modifiers: THF
    R17_vmax = 682.5; R17_kthfglu = 40; kser = 700; kithf = 0.157;
  R18b: DLp + $Gly -> SAmDLp + COTwo; compartment*Rate_Law_for_R18b(R18b_vmax, DLp, Gly, kgly, kdlp);
    R18b_vmax = 751.66; kgly = 4505; kdlp = 290;
  R19: myTHFGlu + $NADPH => MTHFGlu + NADP; compartment*Rate_Law_for_R19(R19_vmax, myTHFGlu, NADPH, R19_knadph, R19_kmythfglu, DHF, R19_kidhf);  // modifiers: DHF
    R19_vmax = 738.92; R19_knadph = 19; R19_kmythfglu = 33; R19_kidhf = 0.428;
  R20: MTHFGlu + $Hcy => THFGlu + Met; compartment*Rate_Law_for_R20(R20_vmax, MTHFGlu, Hcy, kmthfglu, khcy);
    R20_vmax = 379.925; kmthfglu = 30; khcy = 17;
  R21: myTHFGlu + $dUMP => dTMP + DHF; compartment*Rate_Law_for_R21(R21_vmax, myTHFGlu, dUMP, kdump, R21_kmythfglu, DHF, R21_kidhf);
    R21_vmax = 49.14; kdump = 5.4; R21_kmythfglu = 17; R21_kidhf = 0.428;
  R22: myTHFGlu + NADP -> meTHFGlu + $NADPH; compartment*Rate_Law_for_R22(R22_vmax, myTHFGlu, NADP, R22_kmythfglu, R22_knadp, DHF, R22_kidhf);  // modifiers: DHF
    R22_vmax = 1892.8; R22_kmythfglu = 25; R22_knadp = 22; R22_kidhf = 0.428;
  R25: fTHFGlu + $mtRNA -> fmtRNA + THFGlu; compartment*Rate_Law_for_R25(R25_vmax, fTHFGlu, mtRNA, R25_kfthfglu, kmtrna);
    R25_vmax = 116.48; R25_kfthfglu = 12.15; kmtrna = 1.07;
  R26: fTHFGlu + NADP -> THFGlu + COTwo + $NADPH; compartment*Rate_Law_for_R26(R26_vmax, fTHFGlu, NADP, R26_kfthfglu, R26_knadp);
    R26_vmax = 59.332; R26_kfthfglu = 7.85; R26_knadp = 0.9;
  R18c: THFGlu + SAmDLp -> myTHFGlu + $Lp + Ammonia; compartment*Rate_Law_for_R18c(R18c_vmax, THFGlu, R18c_kthfglu, SAmDLp, ksamdlp);
    R18c_vmax = 196.56; R18c_kthfglu = 67.7; ksamdlp = 290;
  R18a: $Lp + $NADH -> DLp + NAD; compartment*Rate_Law_for_R18a(R18a_vmax, NADH, Lp, knadh, klp);
    R18a_vmax = 5432.7; knadh = 58; klp = 1280;
  R13: AHMDPP + pABA => DHP + Pi; compartment*Rate_Law_for_R13(R13_vmax, kahmdpp, kpaba, AHMDPP, pABA);
    R13_vmax = 105.014; kahmdpp = 3.15; kpaba = 2.6;
  R24: fTHFGlu + ADP + Pi -> THFGlu + $ATP + Formyl; compartment*Rate_Law_for_R24(R24_vmax, R24_kthfglu, kformyl, R24_katp, fTHFGlu, ADP, Pi);
    R24_vmax = 1.53153e4; R24_kthfglu = 134; kformyl = 3190; R24_katp = 74.5;
  R23: meTHFGlu -> fTHFGlu; compartment*(k1*meTHFGlu - k2*fTHFGlu);
    k1 = 0.08; k2 = 0.031;
  R28: meTHFGlu => ffTHFGlu; compartment*Henri_Michaelis_Menten__irreversible(meTHFGlu, R28_Km, R28_V);
    R28_Km = 67; R28_V = 200;
  R29: $ATP + ffTHFGlu => ADP + Pi + meTHFGlu; compartment*Rate_Law_for_R29(R29_vmax, ATP, ffTHFGlu, R29_katp, kffthfglu);
    R29_vmax = 500; R29_katp = 50; kffthfglu = 5;

  // Unit definitions:
  unit time = 60 second;
  unit substance = 1e-6 mole;
end
