// SBML level 2 version 4

function Constant_flux__irreversible(v)
  v;
end
Constant_flux__irreversible is "Constant flux (irreversible)";

function non_competitive_inhibition(v, volume, substrate, Km, noncompet_inhib, Ki)
  v*volume*substrate/((Km + substrate)*(1 + noncompet_inhib/Ki));
end
non_competitive_inhibition is "non-competitive inhibition";

function mass_action__dif_compartments__explicit_volume___1(k, VolCompart, Substrate)
  k*Substrate*VolCompart;
end
mass_action__dif_compartments__explicit_volume___1 is "mass action (dif compartments, explicit volume) [1]";

model MODEL1605030004()
  // Parmar2017 - Mouse Iron Distribution - Deficient iron diet
  // Mouse Iron Distribution - Deficient iron diet
  // This model describes the dynamics of iron distribution in mice. It includes only normal iron with the parameters that fit the data from Lopes et al. 2010 for mice fed a deficient iron diet. It does not include the radioiron tracer species. It is appropriate to study the properties in conditions where no tracers are used (for example for steady state analysis).
  // This model is described in the article:
  // Modeling the dynamics of mouse iron body distribution: hepcidin is necessary but not sufficient
  // Jignesh H. Parmar, Grey Davis, Hope Shevchuk and Pedro Mendes
  // BMC Systems Biology
  // Abstract:
  // Background Iron is an essential element of most living organisms but is a dangerous substance when poorly liganded in solution. The hormone hepcidin regulates the export of iron from tissues to the plasma contributing to iron homeostasis and also restricting its availability to infectious agents. Disruption of iron regulation in mammals leads to disorders such as anemia and hemochromatosis, and contributes to the etiology of several other diseases such as cancer and neurodegenerative diseases. Here we test the hypothesis that hepcidin alone is able to regulate iron distribution in different dietary regimes in the mouse using a computational model of iron distribution calibrated with radioiron tracer data. Results A model was developed and calibrated to the data from adequate iron diet, which was able to simulate the iron distribution under a low iron diet. However simulation of high iron diet shows considerable deviations from the experimental data. Namely the model predicts more iron in red blood cells and less iron in the liver than what was observed in experiments. Conclusions These results suggest that hepcidin alone is not sufficient to regulate iron homeostasis in high iron conditions and that other factors are important. The model was able to simulate anemia when hepcidin was increased but was unable to simulate hemochromatosis when hepcidin was suppressed, suggesting that in high iron conditions additional regulatory interactions are important.
  // This model is hosted on BioModels Database and identified by: MODEL1605030004.
  // To cite BioModels Database, please use: BioModels Database: An enhanced, curated and annotated resource for published quantitative kinetic models.
  // To the extent possible under law, all copyright and related or neighbouring rights to this encoded model have been dedicated to the public domain worldwide. Please refer to CC0 Public Domain Dedication for more information.
  // biomodels.db:MODEL1605030004
  // taxonomy:10090
  // GO:0055072

  // Compartments:
  compartment Duodenum = 3.84615e-5;
  compartment RBC = 0.00079;
  compartment Spleen = 6.73077e-5;
  compartment Liver = 0.001161905;
  compartment Plasma = 0.0013;
  compartment RestOfBody = 0.019694766;
  compartment BoneMarrow = 0.000214286;

  // Species:
  species FeDuo in Duodenum = 0.01175906;  // hasPart CHEBI:24875
  species FeRBC in RBC = 0.03797999;  // hasPart CHEBI:24875
  species FeSpleen in Spleen = 0.0039424;  // hasPart CHEBI:24875
  species FeLiver in Liver = 0.00200011;  // hasPart CHEBI:24875
  species Tf in Plasma = 1.582183e-5;  // uniprot:Q921I1
  species Hepcidin in Plasma = 2.300175e-8;  // uniprot:Q9EQ21
  species Fe2Tf in Plasma = 1.352482e-5;  // hasPart CHEBI:29034; hasPart uniprot:Q921I1
  species Fe1Tf in Plasma = 9.353347e-6;  // hasPart CHEBI:29034; hasPart uniprot:Q921I1
  species NTBI in Plasma = 3.331121e-8;  // hasPart CHEBI:24875
  species FeRest in RestOfBody = 0.0002868417;  // hasPart CHEBI:24875
  species $FeOutside in RestOfBody = 0;  // hasPart CHEBI:24875
  species FeBM in BoneMarrow = 0.003037836;  // hasPart CHEBI:24875

  // Parameters:
  kNTBI_Fe1Tf = 1084322005;
  kInDuo = 0.06899842;
  kInLiver = 2.977905;
  kInRBC = 1.084476;
  kInRest = 6.163562;
  Km = 0.01594212;
  Ki = 1e-9;
  kFe1Tf_Fe2Tf = 1084322005;
  VDuoNTBI = 0.2002419;
  VLiverNTBI = 0.02611476;
  VSpleenNTBI = 1.342205;
  VRestNTBI = 0.01094513;
  kDuoLoss = 0.02701133;
  vRBCSpleen = 0.0235286;
  kRestLoss = 0.02353324;
  var Total_Fe__particle; Total_Fe__particle is "Total_Fe (particle)";
  var Total_Fe__conc; Total_Fe__conc is "Total_Fe (conc)";
  var FePlasma__particle; FePlasma__particle is "FePlasma (particle)";
  kInBM = 15.76906;
  kBMSpleen = 0.06190295;
  var Total_Fe__g; Total_Fe__g is "Total_Fe (g)";
  var Total_Tf__particle; Total_Tf__particle is "Total_Tf (particle)";
  var Total_Tf__conc; Total_Tf__conc is "Total_Tf (conc)";
  var Total_Tf__mg_ml; Total_Tf__mg_ml is "Total_Tf (mg/ml)";
  vDiet = 0;
  var FePlasma_conc; FePlasma_conc is "FePlasma(conc)";
  quantity_to_number_factor = 6.02214179e23;
  Avogadro = 6.02214179e23;
  Initial_for_Avogadro = Avogadro;

  // Assignment rules:
  TfSaturation := 100*(2*Fe2Tf*Avogadro*Plasma + Fe1Tf*Avogadro*Plasma)/(2*(Tf*Avogadro*Plasma + Fe2Tf*Avogadro*Plasma + Fe1Tf*Avogadro*Plasma));
  FePlasma__particle := 2*Fe2Tf*Avogadro*Plasma + Fe1Tf*Avogadro*Plasma + NTBI*Avogadro*Plasma;
  Total_Fe__particle := FeDuo*Avogadro*Duodenum + FeLiver*Avogadro*Liver + FeSpleen*Avogadro*Spleen + FeRBC*Avogadro*RBC + FeRest*Avogadro*RestOfBody + 2*Fe2Tf*Avogadro*Plasma + Fe1Tf*Avogadro*Plasma + NTBI*Avogadro*Plasma + FeBM*Avogadro*BoneMarrow;
  FePlasma_conc := FePlasma__particle/(Plasma*Initial_for_Avogadro);
  Total_Fe__conc := (FeDuo*Avogadro*Duodenum + FeLiver*Avogadro*Liver + FeSpleen*Avogadro*Spleen + FeRBC*Avogadro*RBC + FeRest*Avogadro*RestOfBody + 2*Fe2Tf*Avogadro*Plasma + Fe1Tf*Avogadro*Plasma + NTBI*Avogadro*Plasma + FeBM*Avogadro*BoneMarrow)/(Initial_for_Avogadro*(Duodenum + Liver + Plasma + RBC + RestOfBody + Spleen));
  Total_Fe__g := Total_Fe__particle*55.845/Initial_for_Avogadro;
  Total_Tf__particle := Tf*Avogadro*Plasma + Fe1Tf*Avogadro*Plasma + Fe2Tf*Avogadro*Plasma;
  Total_Tf__conc := Total_Tf__particle/(Initial_for_Avogadro*Plasma);
  Total_Tf__mg_ml := Total_Tf__conc*80;

  // Reactions:
  Diet: => FeDuo; Duodenum*Constant_flux__irreversible(vDiet);
  HepcidinSynthesis: => Hepcidin; Plasma*Constant_flux__irreversible(v);
    v = 8.54927e-9;
  HepcidinDecay: Hepcidin => ; Plasma*k1*Hepcidin;
    k1 = 0.75616;
  Duo_NTBI: FeDuo => NTBI; non_competitive_inhibition(VDuoNTBI, Duodenum, FeDuo, Km, Hepcidin, Ki);  // modifiers: Hepcidin; GO:1903414
  Fe2Tf_BM: Fe2Tf => 2 FeBM + Tf; mass_action__dif_compartments__explicit_volume___1(kInBM, Plasma, Fe2Tf);  // GO:0097286
  RBC_Spleen: FeRBC => FeSpleen; mass_action__dif_compartments__explicit_volume___1(vRBCSpleen, RBC, FeRBC);  // GO:0006909
  Spleen_NTBI: FeSpleen => NTBI; non_competitive_inhibition(VSpleenNTBI, Spleen, FeSpleen, Km, Hepcidin, Ki);  // modifiers: Hepcidin; GO:1903414; GO:1903988
  Liver_NTBI: FeLiver => NTBI; non_competitive_inhibition(VLiverNTBI, Liver, FeLiver, Km, Hepcidin, Ki);  // modifiers: Hepcidin; GO:1903414; GO:1903988
  NTBI_Fe1Tf: NTBI + Tf => Fe1Tf; Plasma*kNTBI_Fe1Tf*NTBI*Tf;
  DuoLoss: FeDuo => $FeOutside; mass_action__dif_compartments__explicit_volume___1(kDuoLoss, Duodenum, FeDuo);
  Fe2Tf_Liver: Fe2Tf => 2 FeLiver + Tf; mass_action__dif_compartments__explicit_volume___1(kInLiver, Plasma, Fe2Tf);  // GO:0097286
  Fe2Tf_Rest: Fe2Tf => 2 FeRest + Tf; mass_action__dif_compartments__explicit_volume___1(kInRest, Plasma, Fe2Tf);  // GO:0097286
  RestLoss: FeRest => $FeOutside; RestOfBody*kRestLoss*FeRest;
  Fe2Tf_Duo: Fe2Tf => 2 FeDuo + Tf; mass_action__dif_compartments__explicit_volume___1(kInDuo, Plasma, Fe2Tf);  // GO:0097286
  Rest_NTBI: FeRest => NTBI; non_competitive_inhibition(VRestNTBI, RestOfBody, FeRest, Km, Hepcidin, Ki);  // modifiers: Hepcidin; GO:1903988; GO:1903414
  Fe1Tf_Fe2Tf: Fe1Tf + NTBI => Fe2Tf; Plasma*kFe1Tf_Fe2Tf*Fe1Tf*NTBI;
  Fe1Tf_Liver: Fe1Tf => FeLiver + Tf; mass_action__dif_compartments__explicit_volume___1(kInLiver, Plasma, Fe1Tf);  // GO:0097286
  Fe1Tf_BM: Fe1Tf => FeBM + Tf; mass_action__dif_compartments__explicit_volume___1(kInBM, Plasma, Fe1Tf);  // GO:0097286
  Fe1Tf_Rest: Fe1Tf => FeRest + Tf; mass_action__dif_compartments__explicit_volume___1(kInRest, Plasma, Fe1Tf);  // GO:0097286
  Fe1Tf_Duo: Fe1Tf => FeDuo + Tf; mass_action__dif_compartments__explicit_volume___1(kInDuo, Plasma, Fe1Tf);  // GO:0097286
  BM_RBC: FeBM => FeRBC; mass_action__dif_compartments__explicit_volume___1(kInRBC, BoneMarrow, FeBM);  // GO:0043249
  BM_Spleen: FeBM => FeSpleen; mass_action__dif_compartments__explicit_volume___1(kBMSpleen, BoneMarrow, FeBM);

  // Unit definitions:
  unit time = 86400 second;
end
