// SBML level 2 version 4
// dcterms:bibliographicCitation: model for APC regulation of factor V urn:miriam:pubmed:22607732

model Bravo2012___Modelling_blood_coagulation_factor_Va_inactivation_by_APC()
  // Bravo2012 - Modelling blood coagulation factor Va inactivation by APC
  // isDescribedBy pubmed:22607732
  // isVersionOf GO:0007596
  // hasProperty mamo:MAMO_0000046
  // hasTaxon taxonomy:9606
  // biomodels.db:MODEL1807020001 biomodels.db:BIOMD0000000739

  // Compartments:
  compartment compartment = 1;

  // Species:
  species APC in compartment = 2e-9;  // ncit:C102826
  species APC_Va in compartment = 0; APC_Va is "APC:Va";  // hasPart ncit:C91335; hasPart ncit:C102826
  species Va in compartment = 2e-8;  // ncit:C91335
  species Va_i_506 in compartment = 0;  // hasVersion ncit:C91335
  species Va_i_306 in compartment = 0;  // isDerivedFrom ncit:C91335
  species APC_Va_i_506 in compartment = 0; APC_Va_i_506 is "APC:Va_i_506";  // hasPart ncit:C102826; hasPart ncit:C91335
  species APC_Va_i_306 in compartment = 0; APC_Va_i_306 is "APC:Va_i_306";  // hasPart ncit:C102826; hasPart ncit:C91335
  species Va_i_306_506 in compartment = 0; Va_i_306_506 is "Va_i_306/506";  // hasVersion ncit:C91335
  species Va_1_306_Va_LC in compartment = 0; Va_1_306_Va_LC is "Va_1-306:Va_LC";  // isDerivedFrom ncit:C91335
  species Va_307_506 in compartment = 0; Va_307_506 is "Va_307-506";  // isDerivedFrom ncit:C91335
  species Va_507_679_709 in compartment = 0; Va_507_679_709 is "Va_507-679/709";  // isDerivedFrom ncit:C91335
  species APC_Va_1_306_Va_LC in compartment = 0; APC_Va_1_306_Va_LC is "APC:Va_1-306:Va_LC";  // hasPart ncit:C102826; hasPart ncit:C91335
  species Xa in compartment = 0;  // ncit:C98727
  species Xa_Va in compartment = 0; Xa_Va is "Xa:Va";  // hasPart ncit:C91335; hasPart ncit:C98727
  species Xa_Va_i_506 in compartment = 0; Xa_Va_i_506 is "Xa:Va_i_506";  // hasPart ncit:C98727; hasPart ncit:C91335
  species Xa_Va_i_306_506 in compartment = 0; Xa_Va_i_306_506 is "Xa:Va_i_306/506";  // hasPart ncit:C98727; hasPart ncit:C91335
  species Xa_Va_i_306 in compartment = 0; Xa_Va_i_306 is "Xa:Va_i_306";  // hasPart ncit:C91335; hasPart ncit:C98727
  species Va_307_679_709 in compartment = 0; Va_307_679_709 is "Va_307-679/709";  // hasTaxon ncit:C91335
  species PT in compartment = 0;  // ncit:C82273
  species Va_PT in compartment = 0; Va_PT is "Va:PT";  // hasPart ncit:C82273; hasPart ncit:C91335
  species Xa_Va_PT in compartment = 0; Xa_Va_PT is "Xa:Va:PT";  // hasPart ncit:C91335; hasPart ncit:C98727; hasPart ncit:C82273
  species Xa_Va_i_506_PT in compartment = 0; Xa_Va_i_506_PT is "Xa:Va_i_506:PT";  // hasPart ncit:C98727; hasPart ncit:C82273; hasPart ncit:C91335
  species Xa_Va_i_306_PT in compartment = 0; Xa_Va_i_306_PT is "Xa:Va_i_306:PT";  // hasPart ncit:C82273; hasPart ncit:C98727; hasPart ncit:C91335
  species Xa_Va_i_306_506_PT in compartment = 0; Xa_Va_i_306_506_PT is "Xa:Va_i_306/506:PT";  // hasPart ncit:C98727; hasPart ncit:C91335; hasPart ncit:C82273

  // Parameters:
  R01_koff = 0.7;
  R01_kon = 100000000;
  R02_kcat = 1;
  R03_kcat = 0.192;
  R04_koff = 0.7;
  R04_kon = 100000000;
  R05_koff = 0.7;
  R05_kon = 100000000;
  R06_kcat = 0.192;
  R07_kcat = 1;
  R08_kdis = 0.028;
  R09_kdis = 0.028;
  R10_koff = 0.7;
  R10_kon = 100000000;
  R11_koff = 0.075;
  R11_kon = 150000000;
  R12_koff = 0.15;
  R12_kon = 150000000;
  R13_koff = 0.15;
  R13_kon = 150000000;
  R14_koff = 0.15;
  R14_kon = 150000000;
  R15_kdis = 0.0035;
  R16_kdis = 0.0035;
  R17_koff = 70;
  R17_kon = 100000000;
  R19_koff = 103;
  R19_kon = 100000000;
  R20_koff = 103;
  R20_kon = 100000000;
  R21_koff = 103;
  R21_kon = 100000000;
  R22_koff = 103;
  R22_kon = 100000000;
  R23_dis = 0.0035;
  R24_dis = 0.0035;
  var Curve_Va_Xa; Curve_Va_Xa is "Curve_Va:Xa";
  Initial_for_Va_PT = Va_PT; Initial_for_Va_PT is "Initial for Va:PT";
  Initial_for_Va = Va;
  Initial_for_Xa_Va = Xa_Va; Initial_for_Xa_Va is "Initial for Xa:Va";

  // Assignment rules:
  time_minutes := time/60;
  Curve_Va_Xa := Xa_Va/Initial_for_Xa_Va;
  Curve_Va := Va/Initial_for_Va;
  param_for_curve_va_i_506_normalise := piecewise(5.9e-9, Initial_for_Va_PT < 3e-7, piecewise(1.08e-7, Initial_for_Va_PT < 6e-7, 2.01e-7));
  Curve_va_i_506 := Va_i_506/param_for_curve_va_i_506_normalise;

  // Reactions:
  R01: APC + Va -> APC_Va; compartment*(R01_kon*APC*Va - R01_koff*APC_Va);
  R02: APC_Va => APC + Va_i_506; compartment*R02_kcat*APC_Va;
  R03: APC_Va => APC + Va_i_306; compartment*R03_kcat*APC_Va;
  R04: APC + Va_i_506 -> APC_Va_i_506; compartment*(R04_kon*APC*Va_i_506 - R04_koff*APC_Va_i_506);
  R05: APC + Va_i_306 -> APC_Va_i_306; compartment*(R05_kon*APC*Va_i_306 - R05_koff*APC_Va_i_306);
  R06: APC_Va_i_506 => APC + Va_i_306_506; compartment*R06_kcat*APC_Va_i_506;
  R07: APC_Va_i_306 => APC + Va_i_306_506; compartment*R07_kcat*APC_Va_i_306;
  R08: Va_i_306 => Va_1_306_Va_LC + Va_307_679_709; compartment*R08_kdis*Va_i_306;
  R09: Va_i_306_506 => Va_1_306_Va_LC + Va_307_506 + Va_507_679_709; compartment*R09_kdis*Va_i_306_506;
  R10: APC + Va_1_306_Va_LC -> APC_Va_1_306_Va_LC; compartment*(R10_kon*APC*Va_1_306_Va_LC - R10_koff*APC_Va_1_306_Va_LC);
  R11: Xa + Va -> Xa_Va; compartment*(R11_kon*Xa*Va - R11_koff*Xa_Va);
  R12: Xa + Va_i_506 -> Xa_Va_i_506; compartment*(R12_kon*Xa*Va_i_506 - R12_koff*Xa_Va_i_506);
  R13: Xa + Va_i_306 -> Xa_Va_i_306; compartment*(R13_kon*Xa*Va_i_306 - R13_koff*Xa_Va_i_306);
  R14: Xa + Va_i_306_506 -> Xa_Va_i_306_506; compartment*(R14_kon*Xa*Va_i_306_506 - R14_koff*Xa_Va_i_306_506);
  R15: Xa_Va_i_306 => Xa + Va_1_306_Va_LC + Va_307_679_709; compartment*R15_kdis*Xa_Va_i_306;
  R16: Xa_Va_i_306_506 => Xa + Va_1_306_Va_LC + Va_307_506 + Va_507_679_709; compartment*R16_kdis*Xa_Va_i_306_506;
  R17: Va + PT -> Va_PT; compartment*(R17_kon*Va*PT - R17_koff*Va_PT);
  R19: Xa_Va + PT -> Xa_Va_PT; compartment*(R19_kon*Xa_Va*PT - R19_koff*Xa_Va_PT);
  R20: Xa_Va_i_506 + PT -> Xa_Va_i_506_PT; compartment*(R20_kon*Xa_Va_i_506*PT - R20_koff*Xa_Va_i_506_PT);
  R21: Xa_Va_i_306 + PT -> Xa_Va_i_306_PT; compartment*(R21_kon*Xa_Va_i_306*PT - R21_koff*Xa_Va_i_306_PT);
  R22: Xa_Va_i_306_506 + PT -> Xa_Va_i_306_506_PT; compartment*(R22_kon*Xa_Va_i_306_506*PT - R22_kon*Xa_Va_i_306_506_PT);
  R23: Xa_Va_i_306_PT => Xa + Va_1_306_Va_LC + Va_307_679_709 + PT; compartment*R23_dis*Xa_Va_i_306_PT;
  R24: Xa_Va_i_306_506_PT => Xa + PT + Va_1_306_Va_LC + Va_307_506 + Va_507_679_709; compartment*R24_dis*Xa_Va_i_306_506_PT;

  // Unit definitions:
  unit volume = 1e-3 litre;
end
