// SBML level 2 version 4
// dcterms:bibliographicCitation: urn:miriam:pubmed:20441738

model Panteleev2010___Blood_Coagulation__Full_Model()
  // Panteleev2010 - Blood Coagulation: Full Model
  // isDescribedBy pubmed:20441738
  // isVersionOf GO:0007596
  // hasProperty mamo:MAMO_0000046
  // hasTaxon taxonomy:9606
  // biomodels.db:MODEL1808160002 biomodels.db:BIOMD0000000740

  // Compartments:
  compartment compartment = 1;

  // Species:
  species $VIIa_TF in compartment = 0; VIIa_TF is "VIIa-TF";  // hasPart ncit:C16570; hasPart ncit:C17197
  species $VII_TF in compartment = 0; VII_TF is "VII-TF";  // hasPart ncit:C16570; hasPart ncit:C17197
  species $TF in compartment = 0.005;  // ncit:C17197
  species $VIIa in compartment = 0.1;  // isPartOf ncit:C16570
  species $VII in compartment = 10;  // ncit:C16570
  species $IXa in compartment = 0;  // isVersionOf ncit:C28482
  species $IX in compartment = 90;  // ncit:C28482
  species $Xa in compartment = 0;  // isVersionOf ncit:C76142
  species $X in compartment = 170;  // hasVersion ncit:C76142
  species $IIa in compartment = 0;  // isPropertyOf CHEBI:9574
  species $II in compartment = 1400;  // CHEBI:9574
  species $fibrin in compartment = 0;  // ncit:C32598
  species $fibrinogen in compartment = 7600;  // ncit:C25736
  species $VIIIa in compartment = 0;  // isVersionOf ncit:C16571
  species $VIII in compartment = 0.7;  // hasTaxon ncit:C16571
  species $Va in compartment = 0;  // isPropertyOf ncit:C91335
  species $V in compartment = 0;  // ncit:C91335
  species $XIa in compartment = 0;  // isPropertyOf orphanet:121660
  species $XI in compartment = 30;  // orphanet:121660
  species $AT_III in compartment = 3400; AT_III is "AT-III";  // ncit:C136824
  species $TFPI in compartment = 2.5;  // ncit:C97260
  species $Xa_TFPI in compartment = 0; Xa_TFPI is "Xa-TFPI";  // hasInstance ncit:C76142 ncit:C97260; hasPart ncit:C76142
  species $APC in compartment = 0;  // isVersionOf ncit:C87607
  species $PC in compartment = 60;  // ncit:C87607
  species $VIIa_TF_F in compartment; VIIa_TF_F is "VIIa-TF^F";  // hasPart ncit:C17197; hasPart ncit:C16570
  species $Xa_VIIa_TF in compartment; Xa_VIIa_TF is "Xa-VIIa-TF";  // hasInstance ncit:C16570 ncit:C76142 ncit:C17197; hasPart ncit:C16570; hasPart ncit:C76142
  species $IXa_B_F in compartment; IXa_B_F is "IXa^B^F";  // isVersionOf ncit:C28482
  species $VIIIa_B_F in compartment; VIIIa_B_F is "VIIIa^B^F";  // isVersionOf ncit:C16571
  species $Xa_Va_b in compartment; Xa_Va_b is "Xa-Va^b";  // hasPart ncit:C91335; hasPart ncit:C76142
  species $Xa_F in compartment; Xa_F is "Xa^F";  // isVersionOf ncit:C76142
  species $X_B in compartment; X_B is "X^B";  // isVersionOf ncit:C76142
  species $IIa_F in compartment; IIa_F is "IIa^F";  // isVersionOf CHEBI:9574
  species $II_B in compartment; II_B is "II^B";  // isVersionOf CHEBI:9574
  species $Va_B in compartment; Va_B is "Va^B";  // isVersionOf ncit:C91335
  species $Va_B_F in compartment; Va_B_F is "Va^B^F";  // isVersionOf ncit:C91335
  species alpha2_macroglobulin in compartment = 3000; alpha2_macroglobulin is "alpha2-macroglobulin";  // ncit:C105924
  species alpha1_antitrypsin in compartment = 40000; alpha1_antitrypsin is "alpha1-antitrypsin";  // ncit:C105012
  species alpha2_antiplasmin in compartment = 1100; alpha2_antiplasmin is "alpha2-antiplasmin";  // ncit:C129263
  species heparin_cofactor2 in compartment = 1400; heparin_cofactor2 is "heparin-cofactor2";  // ncit:C113637
  species ProteinC_Inhibitor in compartment = 88; ProteinC_Inhibitor is "ProteinC-Inhibitor";  // hasProperty ncit:C17324
  species C1_inhibitor in compartment = 1700; C1_inhibitor is "C1-inhibitor";  // ncit:C87730
  species ProteinS_inhibitor in compartment = 346; ProteinS_inhibitor is "ProteinS-inhibitor";  // hasProperty ncit:C17324
  species Phospholipid in compartment = 7.5e-5;  // CHEBI:16247

  // Parameters:
  k01 = 4.2;
  k_01 = 1.1;
  k02 = 0.0014;
  k03 = 0.4;
  k04 = 15;
  K04 = 210;
  k05 = 5.8;
  K05 = 200;
  k06 = 435;
  K06 = 238;
  k07 = 0.06;
  K07 = 230;
  k08 = 6350;
  K08 = 1216;
  K09 = 278;
  K10 = 1655;
  k11 = 0.052;
  k_11 = 0.02;
  k12 = 45;
  k13 = 1.44;
  k14 = 5040;
  K14 = 7200;
  k15 = 54;
  K15 = 147;
  k16 = 14;
  K16 = 71.7;
  k17 = 0.03;
  k18 = 2e-5;
  k_19 = 770;
  n20 = 260;
  K20 = 2.57;
  n21 = 750;
  K21 = 1.5;
  K22 = 150;
  K23 = 0.118;
  K24 = 200;
  n25 = 16000;
  K25 = 320;
  K26 = 470;
  n27 = 2700;
  K27 = 2.9;
  h01 = 0.44;
  h02 = 6;
  h03 = 8.2e-6;
  h04 = 0.00015;
  h05 = 4e-5;
  h06 = 1.36e-5;
  h07 = 0.0012;
  h08 = 2.2e-5;
  h09 = 0.00041;
  h10 = 0.0001;
  h11 = 3e-6;
  h12 = 0.00037;
  h13 = 6.3e-5;
  h14 = 0.35;
  h15 = 7.7;
  h16 = 1.9e-5;
  h17 = 2.6e-5;
  h18 = 6e-6;
  h19 = 0.0054;
  h20 = 0.00014;
  h21 = 6e-6;
  h22 = 6e-6;
  h23 = 7e-7;
  h24 = 0.00039;
  quantity = 0;
  var Fibrin_uM; Fibrin_uM is "Fibrin(uM)";

  // Assignment rules:
  X_B := X*Phospholipid*n25/(K25*(1 + X/K25 + II/K26));
  VIIIa_B_F := VIIIa*Phospholipid*n21/((K21 + VIIIa)*(1 + X_B/(Phospholipid*K10)*(1 + ProteinS_inhibitor/K22)));
  IIa_F := IIa/(1 + (fibrin + fibrinogen)/K14);
  II_B := II*Phospholipid*n25/(K26*(1 + X/K25 + II/K26));
  Va_B := Va*Phospholipid*n27/(K27 + Va);
  Xa_Va_b := Xa*Va_B/(K23*(1 + ProteinS_inhibitor/K24 + Xa/K23) + Va_B);
  Xa_F := Xa - Xa_Va_b;
  VIIa_TF_F := VIIa_TF/(1 + IX/K04 + X/K06);
  Xa_VIIa_TF := k06/(K06*k_19)*X*VIIa_TF_F;
  IXa_B_F := IXa*Phospholipid*n20/(K20 + IXa);
  Va_B_F := Va_B - Xa_Va_b;
  Fibrin_uM := fibrin/1000;

  // Rate rules:
  VIIa_TF' = k01*VIIa*TF - k_01*VIIa_TF_F + k02*VII_TF*IIa_F + k03*VII_TF*Xa_F - h01*VIIa_TF_F*Xa_TFPI - h02*Xa_VIIa_TF*TFPI;
  VII_TF' = k01*VII*TF - k_01*VII_TF - k02*VII_TF*IIa_F - k03*VII_TF*Xa_F;
  TF' = -(k01*VIIa*TF - k_01*VIIa_TF_F) - (k01*VII*TF - k_01*VII_TF);
  VIIa' = -(k01*VIIa*TF - k_01*VIIa_TF_F) + k02*VII*IIa_F;
  VII' = -(k01*VII*TF - k_01*VII_TF) - k02*VII*IIa_F;
  IXa' = k04/K04*IX*VIIa_TF_F + k05*IX*XIa/(K05 + IX) - h03*Xa_TFPI*IXa;
  IX' = -(k04/K04)*IX*VIIa_TF_F - k05*IX*XIa/(K05 + IX);
  Xa' = k06/K06*X*VIIa_TF_F + k07*IXa_B_F*X_B/(Phospholipid*K07) + k08*IXa_B_F*VIIIa_B_F*X_B/(Phospholipid^2*K09*k08) - (k11*Xa_F*TFPI - k_11*Xa_TFPI) - (h04*AT_III + h05*alpha2_macroglobulin + h06*alpha1_antitrypsin + h07*ProteinC_Inhibitor)*Xa_F - h08*AT_III*Xa_Va_b;
  X' = -(k06/K06)*X*VIIa_TF_F - k07*IXa_B_F*X_B/(Phospholipid*K07) - k08*IXa_B_F*VIIIa_B_F*X_B/(Phospholipid^2*K09*k08);
  IIa' = k12*Phospholipid*Xa_F*II + k13*Xa_Va_b*II_B/Phospholipid - (h09*AT_III + h10*alpha2_macroglobulin + h11*alpha1_antitrypsin + h12*ProteinC_Inhibitor + h13*heparin_cofactor2)*IIa_F;
  II' = -k12*Phospholipid*Xa_F*II - k13*Xa_Va_b*II_B/Phospholipid;
  fibrin' = k14/K14*fibrinogen*IIa_F;
  fibrinogen' = -(k14/K14)*fibrinogen*IIa_F;
  VIIIa' = k15*VIII*IIa_F/(K15 + IIa_F) - h14*VIIIa;
  VIII' = -k15*VIII*IIa_F/(K15 + IIa_F);
  Va' = k16*V*IIa_F/(K16 + IIa_F) - h15*APC*Va_B_F;
  V' = -k16*V*IIa_F/(K16 + IIa_F);
  XIa' = k17*Phospholipid*XI*IIa_F - (h16*AT_III + h17*alpha2_antiplasmin + h18*alpha1_antitrypsin + h19*ProteinC_Inhibitor + h20*C1_inhibitor)*XIa;
  XI' = -k17*Phospholipid*XI*IIa_F;
  AT_III' = -(h03*IXa + h04*Xa_F + h08*Xa_Va_b + h09*IIa_F + h16*XIa)*AT_III;
  TFPI' = -(k11*Xa_F*TFPI - k_11*Xa_TFPI) - h02*Xa_VIIa_TF*TFPI;
  Xa_TFPI' = k11*Xa_F*TFPI - k_11*Xa_TFPI - h01*VIIa_TF_F*Xa_TFPI;
  APC' = k18*PC*IIa_F - (h21*alpha2_macroglobulin + h22*alpha2_antiplasmin + h23*alpha1_antitrypsin + h24*ProteinC_Inhibitor)*APC;
  PC' = -k18*PC*IIa_F;

  // Unit definitions:
  unit volume = 1e-3 litre;
  unit substance = 1e-9 mole;
end
