// SBML level 3 version 1
// dcterms:bibliographicCitation: urn:miriam:pubmed:26305801

function effector_exhaustion_0(d1, E, R, f)
  d1*E*R*R*R*f;
end

function tumor_death_0(la, R)
  la*R/3;
end

function stimulation(r, R, E, k)
  r*R*R*R*E/(k + R*R*R);
end

function killing(c, E, R, f)
  c*E*R*f;
end

function tumor_growth_0(lm, B, R)
  lm*B*R/3;
end

function Constant_flux__irreversible(v)
  v;
end
Constant_flux__irreversible is "Constant flux (irreversible)";

function nutrience(lm, B, ld, R)
  lm*(1 - B)*ld/tanh(R/ld);
end
nutrience is "nutrience+";

function nutrience_0(lm, b, ld, R)
  lm*(1 - b)*ld*ld/R;
end
nutrience_0 is "nutrience-";

model Reppas2015___tumor_control_via_alternating_immunostimulating_and_immunosuppressive_phases()
  // Reppas2015 - tumor control via alternating immunostimulating and immunosuppressive phases
  // The paper describes a model of tumor control via alternating immunostimulating and immunosuppressive phases. Created by COPASI 4.25 (Build 207) This model is described in the article: In silico tumor control induced via alternating immunostimulating and immunosuppressive phases AI Reppas, JCL Alfonso, and H Hatzikirou Virulence 7:2, 174--186 Abstract: Despite recent advances in the field of Oncoimmunology, the success potential of immunomodulatory therapies against cancer remains to be elucidated. One of the reasons is the lack of understanding on the complex interplay between tumor growth dynamics and the associated immune system responses. Toward this goal, we consider a mathematical model of vascularized tumor growth and the corresponding effector cell recruitment dynamics. Bifurcation analysis allows for the exploration of model’s dynamic behavior and the determination of these parameter regimes that result in immune-mediated tumor control. In this work, we focus on a particular tumor evasion regime that involves tumor and effector cell concentration oscillations of slowly increasing and decreasing amplitude, respectively. Considering a temporal multiscale analysis, we derive an analytically tractable mapping of model solutions onto a weakly negatively damped harmonic oscillator. Based on our analysis, we propose a theory-driven intervention strategy involving immunostimulating and immunosuppressive phases to induce long-term tumor control. To cite BioModels Database, please use: BioModels Database: An enhanced, curated and annotated resource for published quantitative kinetic models . To the extent possible under law, all copyright and related or neighbouring rights to this encoded model have been dedicated to the public domain worldwide. Please refer to CC0 Public Domain Dedication for more information.
  // isDescribedBy pubmed:26305801
  // isVersionOf GO:0002418
  // hasProperty mamo:MAMO_0000046
  // hasTaxon taxonomy:9606
  // biomodels.db:MODEL1907110002 biomodels.db:BIOMD0000000749
  // model units - substance: substance, time: time, volume: volume, area: area, length: length, extent: substance

  // Compartments:
  compartment tumor_microenvironment = 1 volume;  // isVersionOf ncit:C94498

  // Species:
  // initial condition 1=2e6, condition 2=1e6
  // effector cell count
  species E in tumor_microenvironment = 1000000;  // isVersionOf ncit:C28241
  // in mm
  // tumor radius
  species R in tumor_microenvironment = 2;  // isVersionOf CL:0001064
  // phenomenological scaling function f(R,B)
  species $f in tumor_microenvironment;  // isVersionOf ncit:C54025
  // effector cell count/1e5
  // easier for plotting
  species $E_0 in tumor_microenvironment; E_0 is "E'";  // isVersionOf ncit:C28241

  // Parameters:
  // vascularization parameter, 0.40/0.50/0.65/0.80/0.95
  B = 0.5 unit_0;
  // Mitotic rate of tumor cells
  lm = 1.34 unit_1;
  // Death rate of tumor cells
  la = 0.14 unit_1;  // isVersionOf ncit:C53346
  // Characteristic nutrient diffusion length, mm
  // 0.2-0.3
  ld = 0.3 unit_0;
  // Killing rate of tumor cells by effectors
  c = 0.03 unit_1;  // isVersionOf ncit:C53346
  // Tumor volume where effector recruitment rate is half-maximal
  k = 2.72 unit_0;
  // Inactivation rate of effectors by tumor cells
  d1 = 0.01 unit_1;  // isVersionOf ncit:C53346
  // Death rate of effectors
  d0 = 0.37 unit_1;  // isVersionOf ncit:C53346
  // Background rate of effector recruitment
  sigma = 13000 unit_1;
  // immune recruitment rate, 0.54/0.57/0.60
  r = 0.57 unit_1;

  // Assignment rules:
  E_0 := E/100000;
  f := R^(B - 1)/(R^(B - 1) + 1);

  // Reactions:
  tumor_growth: => R; tumor_microenvironment*tumor_growth_0(lm, B, R);  // isVersionOf GO:0008283
  tumor_death: R => ; tumor_microenvironment*tumor_death_0(la, R);  // isVersionOf GO:0008219
  tumor_killing: R => ; tumor_microenvironment*killing(c, E_0, R, f);  // modifiers: E_0, f; isVersionOf GO:0001909
  tumor_nutrient_supply: => R; tumor_microenvironment*nutrience(lm, B, ld, R);  // isVersionOf GO:0008283
  effector_stimulation: => E; tumor_microenvironment*stimulation(r, R, E, k);  // modifiers: R; isVersionOf GO:0070661
  effector_exhaustion: E => ; tumor_microenvironment*effector_exhaustion_0(d1, E, R, f);  // modifiers: R, f; isVersionOf GO:0008219
  effector_death: E => ; tumor_microenvironment*d0*E;  // isVersionOf GO:0008219
  effector_source: => E; tumor_microenvironment*Constant_flux__irreversible(sigma);  // isVersionOf GO:0070661
  tumor_nutrient_missuply: R => ; tumor_microenvironment*nutrience_0(lm, B, ld, R);  // isVersionOf GO:0008219

  // Unit definitions:
  unit length = metre;
  unit area = metre^2;
  unit volume = 1e-3 litre;
  unit time = 86400 second;
  unit substance = 1e-3 mole;
  unit unit_0 = dimensionless^0; unit_0 is "1";
  unit unit_1 = 1 / (8640 second); unit_1 is "1/d";
end
