// SBML level 3 version 1
// dcterms:bibliographicCitation: urn:miriam:pubmed:23734575

function Constant_flux__irreversible(v)
  v;
end
Constant_flux__irreversible is "Constant flux (irreversible)";

function stimulation(p, T, E, g)
  p*T*E/(g + T);
end

function t_d(a, b, T)
  a*b*T*T;
end
t_d is "t-d";

function growth(a, T)
  a*T;
end

function interaction(k, sub, mod)
  k*sub*mod;
end

model Figueredo2013_1___immunointeraction_base_model()
  // Figueredo2013/1 - immunointeraction base model
  // The paper describes a basic model of immune-itumor interaction. Created by COPASI 4.25 (Build 207) This model is described in the article: Investigating mathematical models of immuno-interactions with early-stage cancer under an agent-based modelling perspective Grazziela P Figueredo, Peer-Olaf Siebers, Uwe Aickelin Kathleen BMC Bioinformatics 2013, 14(Suppl 6):S6 Abstract: Many advances in research regarding immuno-interactions with cancer were developed with the help of ordinary differential equation (ODE) models. These models, however, are not effectively capable of representing problems involving individual localisation, memory and emerging properties, which are common characteristics of cells and molecules of the immune system. Agent-based modelling and simulation is an alternative paradigm to ODE models that overcomes these limitations. In this paper we investigate the potential contribution of agent-based modelling and simulation when compared to ODE modelling and simulation. We seek answers to the following questions: Is it possible to obtain an equivalent agent-based model from the ODE formulation? Do the outcomes differ? Are there any benefits of using one method compared to the other? To answer these questions, we have considered three case studies using established mathematical models of immune interactions with early-stage cancer. These case studies were re-conceptualised under an agent-based perspective and the simulation results were then compared with those from the ODE models. Our results show that it is possible to obtain equivalent agent-based models (i.e. implementing the same mechanisms); the simulation output of both types of models however might differ depending on the attributes of the system to be modelled. In some cases, additional insight from using agent-based modelling was obtained. Overall, we can confirm that agent-based modelling is a useful addition to the tool set of immunologists, as it has extra features that allow for simulations with characteristics that are closer to the biological phenomena. To cite BioModels Database, please use: BioModels Database: An enhanced, curated and annotated resource for published quantitative kinetic models . To the extent possible under law, all copyright and related or neighbouring rights to this encoded model have been dedicated to the public domain worldwide. Please refer to CC0 Public Domain Dedication for more information.
  // isDescribedBy pubmed:23734575
  // isVersionOf GO:0002418
  // hasProperty mamo:MAMO_0000046
  // hasTaxon taxonomy:9606
  // biomodels.db:MODEL1907180001 biomodels.db:BIOMD0000000753
  // model units - substance: substance, time: time, volume: volume, area: area, length: length, extent: substance

  // Compartments:
  compartment tumor_microenvironment = 1 volume;  // isVersionOf ncit:C94498

  // Species:
  // tumor cell
  species T in tumor_microenvironment = 50;  // isVersionOf CL:0001064
  // effector cell
  species E in tumor_microenvironment = 5;  // isVersionOf ncit:C28241

  // Parameters:
  // proliferation rate of tumor
  a = 1.636 unit_0;
  // =0.002/0.004
  // death rate of tumor
  b = 0.004 unit_0;  // isVersionOf ncit:C53346
  // immune killing rate of tumor
  n = 1 unit_0;
  // immune stimulation rate
  p = 1.131 unit_0;
  // immune stimulation half saturation constant
  g = 20.19 unit_0;
  // immune cell exhaustion rate
  m = 0.00311 unit_0;  // isVersionOf ncit:C53346
  // =0.1908/0.3743/2
  // immune cell death rate
  d = 2 unit_0;  // isVersionOf ncit:C53346
  // =0.318/0.1181/0
  // immune cell source
  s = 0.318 unit_0;

  // Reactions:
  tumor_growth: => T; tumor_microenvironment*growth(a, T);  // isVersionOf GO:0008283
  tumor_death: T => ; tumor_microenvironment*t_d(a, b, T);  // isVersionOf GO:0008219
  tumor_killing: T => ; tumor_microenvironment*interaction(n, T, E);  // modifiers: E; isVersionOf GO:0002419
  immune_stimulation: => E; tumor_microenvironment*stimulation(p, T, E, g);  // modifiers: T; isVersionOf GO:0008283
  immune_exhaustion: E => ; tumor_microenvironment*interaction(m, E, T);  // modifiers: T; isVersionOf GO:0008219
  immune_death: E => ; tumor_microenvironment*d*E;  // isVersionOf GO:0008219
  immune_source: => E; tumor_microenvironment*Constant_flux__irreversible(s);  // isVersionOf GO:0008283

  // Unit definitions:
  unit length = metre;
  unit area = metre^2;
  unit volume = 1e-3 litre;
  unit time = second;
  unit substance = 1e-3 mole;
  unit unit_0 = dimensionless^0; unit_0 is "1";
end
