// SBML level 3 version 1
// dcterms:bibliographicCitation: urn:miriam:pubmed:27022405

function Constant_flux__irreversible(v)
  v;
end
Constant_flux__irreversible is "Constant flux (irreversible)";

function logistic(r, P, k)
  r*P*(1 - P/k);
end

function killing(a1, M1, e, a2, Fb, C, sub, h)
  a1*(M1/(M1 + e))*(a2 + e*(1 - a2)/(Fb + e))*C*sub/(h + sub);
end

function transformation(ra, T, k1, S, k2)
  ra*(T/k1)*(S/k2)*(k1 - T);
end

function one_mod(k, mod)
  k*mod;
end

function M2(am2y, Fy, em2y, em2b, am2b, Fb)
  am2y*Fy/(Fy + em2y)*(em2b*(1 - am2b)/(Fb + em2b) + am2b);
end

function M1(am1y, Fy, em1y)
  am1y*Fy/(Fy + em1y);
end

model Abernathy2016___glioblastoma_treatment()
  // Abernathy2016 - glioblastoma treatment
  // The paper describes a model of glioblastoma. Created by COPASI 4.25 (Build 207) This model is described in the article: Modeling the Treatment of Glioblastoma Multiforme and Cancer Stem Cells with Ordinary Differential Equations Kristen Abernathy and Jeremy Burke BMC Computational and Mathematical Methods in Medicine Volume 2016, Article ID 1239861, 11 pages Abstract: Despite improvements in cancer therapy and treatments, tumor recurrence is a common event in cancer patients. One explanation of recurrence is that cancer therapy focuses on treatment of tumor cells and does not eradicate cancer stem cells (CSCs). CSCs are postulated to behave similar to normal stem cells in that their role is to maintain homeostasis. That is, when the population of tumor cells is reduced or depleted by treatment, CSCs will repopulate the tumor, causing recurrence. In this paper, we study the application of the CSC Hypothesis to the treatment of glioblastoma multiforme by immunotherapy. We extend the work of Kogan et al. (2008) to incorporate the dynamics of CSCs, prove the existence of a recurrence state, and provide an analysis of possible cancerous states and their dependence on treatment levels. To cite BioModels Database, please use: BioModels Database: An enhanced, curated and annotated resource for published quantitative kinetic models . To the extent possible under law, all copyright and related or neighbouring rights to this encoded model have been dedicated to the public domain worldwide. Please refer to CC0 Public Domain Dedication for more information.
  // isDescribedBy pubmed:27022405
  // hasProperty efo:0000519
  // hasProperty GO:0002418
  // hasProperty mamo:MAMO_0000046
  // hasTaxon taxonomy:9606
  // biomodels.db:MODEL1907240001 biomodels.db:BIOMD0000000757
  // model units - substance: substance, time: time, volume: volume, area: area, length: length, extent: substance

  // Compartments:
  compartment tumor_microenvironment = 1 volume;  // isVersionOf ncit:C94498; isVersionOf ncit:C3058

  // Species:
  // tumor cell
  species Tumor in tumor_microenvironment = 70;  // isVersionOf CL:0001064
  // cancer stem cekk
  species CancerStemCell in tumor_microenvironment = 30;  // isVersionOf BTO:0004254
  // cytotoxic t cell
  species CytotoxicTcell in tumor_microenvironment = 250;  // isVersionOf CL:0000910
  // TGF-b
  species TGFb in tumor_microenvironment = 50;  // uniprot:P01137
  // IFN-y
  species IFNy in tumor_microenvironment = 50;  // uniprot:P01579
  // MHC1
  species MHC1 in tumor_microenvironment = 50;  // isVersionOf ncit:C20706
  // MHC2
  species MHC2 in tumor_microenvironment = 50;  // isVersionOf ncit:C20705
  // tumor/1e8
  species $Tumor_Plot in tumor_microenvironment;  // isVersionOf CL:0001064
  // CSC/1e7
  species $CSC_Plot in tumor_microenvironment;  // isVersionOf BTO:0004254
  // CTL/100
  species $CTL_Plot in tumor_microenvironment;  // isVersionOf CL:0000910

  // Parameters:
  // tumor logistic growth rate
  r1 = 0.001 unit_0;
  // tumor cell carrying capacity
  k1 = 100000000 unit_1;
  // mhc1 killing rate of tumor
  at = 0.12 unit_0;  // isVersionOf ncit:C53346
  // half saturation constant of mhc1 killing tumor
  et = 50 unit_1;
  // fraction of inhibition of tumor by mhc1
  atb = 0.69 unit_1;
  // tgfb half saturation constant in tumor-mhc1 inhibition
  etb = 10000 unit_1;
  // half saturation constant of tumor at killing
  ht = 500000000 unit_1;
  // CSC growth rate
  r2 = 0.1 unit_0;
  // CSC carrying capacity
  k2 = 10000000 unit_1;
  // CSC to tumor conversion rate
  ra = 0.006 unit_0;  // isVersionOf ncit:C25636
  // inhibition rate of tumor by mhc1
  as has unit_0;  // isVersionOf ncit:C25636
  // mhc1 inhibition half saturation constant
  es has unit_1;
  // fraction of inhibition of CSC by mhc1
  asb has unit_1;
  // tgfb half saturation constant in CSC-mhc1 inhibition
  esb has unit_1;
  // mhc1 inhibition of tumor saturation constant of CSC
  hs has unit_1;
  // decay rate of CTL
  uc = 0.007 unit_0;  // isVersionOf ncit:C25636
  // tgfb source rate
  gb = 63945 unit_0;  // isVersionOf ncit:C25636
  // tgfb production by tumor rate
  abt = 5.75e-6 unit_0;  // isVersionOf ncit:C25636
  // tgfb production by CSC rate
  abs has unit_0;  // isVersionOf ncit:C25636
  // tgfb decay rate
  ub = 7 unit_0;  // isVersionOf ncit:C25636
  // mhc1 source
  gm1 = 1.44 unit_0;  // isVersionOf ncit:C25636
  // mhc1 stimulation rate by ifny
  am1y = 2.88 unit_0;  // isVersionOf ncit:C25636
  // half saturation constant of ifny in mhc1 production
  em1y = 338000 unit_1;
  // mhc1 decay rate
  um1 = 0.0144 unit_0;  // isVersionOf ncit:C25636
  // mhc2 stimulation rate by ifny
  am2y = 8660 unit_0;  // isVersionOf ncit:C25636
  // half saturation constant of ifny in mhc2 stimulation
  em2y = 1420 unit_1;
  // fraction of mhc2 stimulation by tgfb
  am2b = 0.012 unit_1;
  // half saturation constant of tgfb in mhc2 stimulation
  em2b = 100000 unit_1;
  // mhc2 decay rate
  um2 = 0.0144 unit_0;  // isVersionOf ncit:C25636
  // ifny production rate by CTL
  ayc = 0.000102 unit_0;  // isVersionOf ncit:C25636
  // ifny decay rate
  uy = 0.102 unit_0;  // isVersionOf ncit:C25636
  // CTL source rate
  N = 0 unit_0;  // isVersionOf ncit:C25636

  // Assignment rules:
  Tumor_Plot := Tumor/100000000;
  CSC_Plot := CancerStemCell/10000000;
  CTL_Plot := CytotoxicTcell/100;
  as := at*0.1;
  es := et;
  asb := atb;
  esb := etb;
  hs := ht;
  abs := abt;

  // Reactions:
  tumor_growth: => Tumor; tumor_microenvironment*logistic(r1, Tumor, k1);  // isVersionOf GO:0008283
  tumor_transformation: CancerStemCell => Tumor; tumor_microenvironment*transformation(ra, Tumor, k1, CancerStemCell, k2);  // isVersionOf GO:0048863
  tumor_killing: Tumor => ; tumor_microenvironment*killing(at, MHC1, etb, atb, TGFb, CytotoxicTcell, Tumor, ht);  // modifiers: MHC1, TGFb, CytotoxicTcell; isVersionOf GO:0002419
  csc_growth: => CancerStemCell; tumor_microenvironment*logistic(r2, CancerStemCell, k2);  // isVersionOf GO:0008283
  csc_killing: CancerStemCell => ; tumor_microenvironment*killing(as, MHC1, esb, asb, TGFb, CytotoxicTcell, CancerStemCell, hs);  // modifiers: MHC1, TGFb, CytotoxicTcell; isVersionOf GO:0002419
  ctl_death: CytotoxicTcell => ; tumor_microenvironment*uc*CytotoxicTcell;  // isVersionOf GO:0008219
  ctl_source: => CytotoxicTcell; tumor_microenvironment*Constant_flux__irreversible(N);  // isVersionOf GO:0008283
  tgfb_source: => TGFb; tumor_microenvironment*Constant_flux__irreversible(gb);  // isVersionOf GO:0038044
  tgfb_by_tumor: => TGFb; tumor_microenvironment*one_mod(abt, Tumor);  // modifiers: Tumor; isVersionOf GO:0038044
  tgfb_by_csc: => TGFb; tumor_microenvironment*one_mod(abs, CancerStemCell);  // modifiers: CancerStemCell; isVersionOf GO:0038044
  tgfb_decay: TGFb => ; tumor_microenvironment*ub*TGFb;  // isVersionOf GO:0030163
  ifny_production: => IFNy; tumor_microenvironment*one_mod(ayc, CytotoxicTcell);  // modifiers: CytotoxicTcell; isVersionOf GO:0072643
  ifny_decay: IFNy => ; tumor_microenvironment*uy*IFNy;  // isVersionOf GO:0030163
  mhc1_source: => MHC1; tumor_microenvironment*Constant_flux__irreversible(gm1);  // isVersionOf GO:0009306
  mhc1_decay: MHC1 => ; tumor_microenvironment*um1*MHC1;  // isVersionOf GO:0030163
  mhc1_stimulation: => MHC1; tumor_microenvironment*M1(am1y, IFNy, em1y);  // modifiers: IFNy; isVersionOf GO:0009306
  mhc2_production: => MHC2; tumor_microenvironment*M2(am2y, IFNy, em2y, em2b, am2b, TGFb);  // modifiers: IFNy, TGFb; isVersionOf GO:0009306
  mhc2_decay: MHC2 => ; tumor_microenvironment*um2*MHC2;  // isVersionOf GO:0030163

  // Unit definitions:
  unit length = metre;
  unit area = metre^2;
  unit volume = 1e-3 litre;
  unit time = 3600 second;
  unit substance = 1e-3 mole;
  unit unit_0 = 1 / (360000 second); unit_0 is "1/h";
  unit unit_1 = dimensionless^0;
end
