// SBML level 3 version 1
// dcterms:bibliographicCitation: urn:miriam:pubmed:29605227

function s(r, S, p)
  r*S*(2*p - 1);
end

function d(r, S, p)
  2*r*S*(1 - p);
end

model Wodarz2018_1___simple_model()
  // Wodarz2018/1 - simple model
  // The paper describes a basic model of effect of cellular de-differentiation on the dynamics and evolution of tissue and tumor cells. Created by COPASI 4.25 (Build 207) This model is described in the article: Effect of cellular de-differentiation on the dynamics and evolution of tissue and tumor cells in mathematical models with feedback regulation Dominik Wodarz J Theor Biol. 2018 July 07; 448: 86–93 Abstract: Tissues are maintained by adult stem cells that self-renew and also differentiate into functioning tissue cells. Homeostasis is achieved by a set of complex mechanisms that involve regulatory feedback loops. Similarly, tumors are believed to be maintained by a minority population of cancer stem cells, while the bulk of the tumor is made up of more differentiated cells, and there is indication that some of the feedback loops that operate in tissues continue to be functional in tumors. Mathematical models of such tissue hierarchies, including feedback loops, have been analyzed in a variety of different contexts. Apart from stem cells giving rise to differentiated cells, it has also been observed that more differentiated cells can de-differentiate into stem cells, both in healthy tissue and tumors, aspects of which have also been investigated mathematically. This paper analyses the effect of de-differentiation on the basic and evolutionary dynamics of cells in the context of tissue hierarchy models that include negative feedback regulation of the cell populations. The models predict that in the presence of de-differentiation, the fixation probability of a neutral mutant is lower than in its absence. Therefore, if de-differentiation occurs, a mutant with identical parameters compared to the wild-type cell population behaves like a disadvantageous mutant. Similarly, the process of de-differentiation is found to lower the fixation probability of an advantageous mutant. These results indicate that the presence of de- differentiation can lower the rates of tumor initiation and progression in the context of the models considered here. To cite BioModels Database, please use: BioModels Database: An enhanced, curated and annotated resource for published quantitative kinetic models . To the extent possible under law, all copyright and related or neighbouring rights to this encoded model have been dedicated to the public domain worldwide. Please refer to CC0 Public Domain Dedication for more information.
  // isDescribedBy pubmed:29605227
  // hasProperty mamo:MAMO_0000046
  // hasProperty GO:0002418
  // hasTaxon taxonomy:9606
  // biomodels.db:MODEL1908010003 biomodels.db:BIOMD0000000774
  // model units - substance: substance, time: time, volume: volume, area: area, length: length, extent: substance

  // Compartments:
  compartment tme = 1 volume;  // isVersionOf ncit:C94498

  // Species:
  // stem cells
  species S in tme = 1;  // isVersionOf CL:0000034
  // differentiated cells
  species D in tme = 0;  // isVersionOf CL:0000000

  // Parameters:
  // differentiated cell death rate
  a = 0.0025 unit_0;  // isVersionOf ncit:C25636
  // cell growth rate
  r has unit_0;
  p has unit_0;  // isVersionOf ncit:C54154
  // cell dedifferentiation rate
  g has unit_0;  // isVersionOf ncit:C25636
  r_0 = 0.01 unit_0; r_0 is "r'";
  // 0.7 or 0.35
  p_0 = 0.7 unit_0; p_0 is "p'";  // isVersionOf ncit:C54154
  h1 = 0.0001 unit_0;  // isVersionOf ncit:C84380
  h2 = 0.0001 unit_0;  // isVersionOf ncit:C84380
  k1 = 1 unit_0;  // isVersionOf ncit:C48923
  k2 = 1 unit_0;  // isVersionOf ncit:C48923
  // 0.0035 or 0.0015
  g_0 = 0.0035 unit_0; g_0 is "g'";  // isVersionOf ncit:C25636
  h3 = 0.01 unit_0;  // isVersionOf ncit:C84380
  k3 = 1 unit_0;  // isVersionOf ncit:C48923

  // Assignment rules:
  p := p_0/(1 + h2*D^k2);
  g := g_0/(1 + h3*S^k3);
  r := r_0/(1 + h1*D^k1);

  // Reactions:
  stem_cell_division: => S; tme*s(r, S, p);  // isVersionOf GO:0008283
  de_differentiation: D => S; tme*g*D; de_differentiation is "de-differentiation";  // isVersionOf GO:0043696
  differentiation_of_cell: => D; tme*d(r, S, p);  // modifiers: S; isVersionOf GO:0030154
  differentiated_cell_death: D => ; tme*a*D;  // isVersionOf GO:0008219

  // Unit definitions:
  unit length = metre;
  unit area = metre^2;
  unit volume = 1e-3 litre;
  unit time = second;
  unit substance = 1e-3 mole;
  unit unit_0 = dimensionless^0; unit_0 is "1";
end
