// SBML level 3 version 1
// dcterms:bibliographicCitation: urn:miriam:pubmed:23340437

function removal(pn, v, e)
  pn*v*e;
end

function Constant_flux__irreversible(v)
  v;
end
Constant_flux__irreversible is "Constant flux (irreversible)";

function H_antiport(f1, Hi, He)
  f1*(Hi - He)*piecewise(1, Hi > He, 0);
end

function mct(k3, f, Hi, Li, He, Le)
  k3*f*(Hi*Li - He*Le);
end

function glycolysis_H_0(fg, Hi, v, vv, p)
  p*(2*fg/(Hi + 1))*piecewise(1, v > vv, 0);
end
glycolysis_H_0 is "glycolysis-H";

function glycolysis_L_0(fg, Hi, v, vv)
  2*fg/(Hi + 1)*piecewise(1, v > vv, 0);
end
glycolysis_L_0 is "glycolysis-L";

model Al_Husari2013___pH_and_lactate_in_tumor()
  // Al-Husari2013 - pH and lactate in tumor
  // The paper describes a model of pH control in tumor. Created by COPASI 4.26 (Build 213) This model is described in the article: Regulation of tumour intracellular pH: A mathematical model examining the interplay between H and lactate Maymona Al-Husari, Steven D. Webb Journal of Theoretical Biology 322 (2013) 58–71 Abstract: Non-invasive measurements of pH have shown that both tumour and normal cells have intracellular pH (pHi) that lies on the alkaline side of neutrality (7.1–7.2). However, extracellular pH (pHe) is reported to be more acidic in some tumours compared to normal tissues. Many cellular processes and therapeutic agents are known to be tightly pH dependent which makes the study of intracellular pH regulation of paramount importance. We develop a mathematical model that examines the role of various membrane-based ion transporters in tumour pH regulation, in particular, with a focus on the interplay between lactate and H ions and whether the lactate/H symporter activity is sufficient to give rise to the observed reversed pH gradient that is seen is some tumours. Using linear stability analysis and H ions. We extend this analysis using perturbation techniques to specifically examine a rapid change in H-ion concentrations relative to variations in lactate. We then perform a parameter sensitivity analysis to explore solution robustness to parameter variations. An important result from our study is that a reversed pH gradient is possible in our system but for unrealistic parameter estimates—pointing to the possible involvement of other mechanisms in cellular pH gradient reversal, for example acidic vesicles, lysosomes, golgi and endosomes. To cite BioModels Database, please use: BioModels Database: An enhanced, curated and annotated resource for published quantitative kinetic models . To the extent possible under law, all copyright and related or neighbouring rights to this encoded model have been dedicated to the public domain worldwide. Please refer to CC0 Public Domain Dedication for more information.
  // isDescribedBy pubmed:23340437
  // hasProperty mamo:MAMO_0000046
  // hasTaxon taxonomy:9606
  // biomodels.db:MODEL1909030001 biomodels.db:BIOMD0000000805
  // model units - substance: substance, time: time, volume: volume, area: area, length: length, extent: substance

  // Compartments:
  compartment tme = 1 volume;  // isVersionOf ncit:C94498

  // Species:
  // intracellular H+
  species Hi in tme = 10^(-0.3);  // isVersionOf ncit:C45997
  // extracellular H+
  species He in tme = 10^0;  // isVersionOf ncit:C45997
  // intracellular lactate
  species Li in tme = 0.00125;  // isVersionOf CHEBI:24996
  // extracellular lactate
  species Le in tme = 0.00125;  // isVersionOf CHEBI:24996

  // Parameters:
  // H+ rate entering cell
  lh = 0.017174 unit_0;  // isVersionOf ncit:C25636
  // H+ flux rate
  f1 = 17174 unit_0;  // isVersionOf ncit:C25636
  // ion transport rate
  k3 = 5.4316 unit_0;  // isVersionOf ncit:C25636
  // other source of H+ rate
  d1 = 7999.6 unit_0;  // isVersionOf ncit:C25636
  // ion remove rate of H+
  p1 = 20095 unit_0;  // isVersionOf ncit:C25636
  // ion remove rate of lactate
  p2 = 0.2857 unit_0;  // isVersionOf ncit:C25636
  // maximal rate of glycolysis
  fg = 0.2823 unit_0;  // isVersionOf ncit:C25636
  // coefficient
  p = 14000 unit_0;  // isVersionOf ncit:C48922
  // threshold vasculature
  vv = 0.5 unit_0;  // isVersionOf BTO:0003718; isVersionOf ncit:C48228
  // pH extracellular
  pHe has unit_0;  // isVersionOf ncit:C45997
  // pH intracellular
  pHi has unit_0;  // isVersionOf ncit:C45997
  // vasculature
  v = 1.499685 unit_0;  // isVersionOf BTO:0003718

  // Assignment rules:
  pHe := -log10(He) + 7;
  pHi := -log10(Hi) + 7;

  // Reactions:
  H_leak: He -> Hi; tme*(lh*He - lh*Hi);  // isVersionOf GO:0034220
  H_antiporter: Hi => He; tme*H_antiport(f1, Hi, He);  // isVersionOf GO:0034220
  MCT: Hi + Li => He + Le; tme*mct(k3, p, Hi, Li, He, Le);  // isVersionOf GO:0034220
  glycolysis_H: => Hi; tme*glycolysis_H_0(fg, Hi, v, vv, p); glycolysis_H is "glycolysis-H";  // isVersionOf GO:0061621
  H__source: => Hi; tme*Constant_flux__irreversible(d1); H__source is "H+ source";
  removal_of_H: He => ; tme*removal(p1, v, He); removal_of_H is "removal of H+";
  lactate_source: => Li; tme*Constant_flux__irreversible(lactate_source_v);
    lactate_source_v = 1;
  lactate_degradation: Li => ; tme*k1*Li;  // isVersionOf GO:1903457
    k1 = 1;
  removal_of_lactate: Le => ; tme*removal(p2, v, Le);
  glycolysis_L: => Li; tme*glycolysis_L_0(fg, Hi, v, vv); glycolysis_L is "glycolysis-L";  // modifiers: Hi; isVersionOf GO:0061621

  // Unit definitions:
  unit length = metre;
  unit area = metre^2;
  unit volume = 1e-3 litre;
  unit time = second;
  unit substance = 1e-3 mole;
  unit unit_0 = dimensionless^0; unit_0 is "1";
end
