// SBML level 2 version 4
// dcterms:bibliographicCitation: urn:miriam:pubmed:31493485

function Function_for_Absorption_of_rapamycin(_K_abs_Rapam, Rapamycin_Dose)
  _K_abs_Rapam*Rapamycin_Dose;
end

function Function_for_Elimination_of_rapamycin(_K_el_Rapam, _Cytosolic_Rapamycin)
  _K_el_Rapam*_Cytosolic_Rapamycin;
end

function Function_for_Synthesis_of_mTOR(_K_syn_mTOR)
  _K_syn_mTOR;
end

function Function_for_Degradation_of_mTOR(_K_deg_mTOR, mTOR)
  _K_deg_mTOR*mTOR;
end

function Function_for_Synthesis_of_Raptor(_K_syn_Raptor)
  _K_syn_Raptor;
end

function Function_for_Degradation_of_Raptor(_K_deg_Raptor, Raptor)
  _K_deg_Raptor*Raptor;
end

function Function_for_Synthesis_of_Rictor(_K_syn_Rictor)
  _K_syn_Rictor;
end

function Function_for_Degradation_of_Rictor(_K_deg_Rictor, Rictor)
  _K_deg_Rictor*Rictor;
end

function Function_for_mTORC1_formation_and_dissociation(_k_form_C1, mTOR, Raptor, _k_diss_C1, mTORC1)
  _k_form_C1*mTOR*Raptor - _k_diss_C1*mTORC1;
end

function Function_for_mTORC2_formation_and_dissociation(_k_form_C2, mTOR, Rictor, _k_diss_C2, mTORC2)
  _k_form_C2*mTOR*Rictor - _k_diss_C2*mTORC2;
end

function Function_for_mTOR___Rapamycin_association_sequestration_and_dissociation(_k_form_mTOR_Rapam, mTOR, _Cytosolic_Rapamycin, _k_diss_mTOR_Rapam, _mTOR_Rapamycin)
  _k_form_mTOR_Rapam*mTOR*_Cytosolic_Rapamycin - _k_diss_mTOR_Rapam*_mTOR_Rapamycin;
end
Function_for_mTOR___Rapamycin_association_sequestration_and_dissociation is "Function for mTOR - Rapamycin association/sequestration and dissociation";

function Function_for_mTORC1___Rapamycin_association_sequestration_and_dissociation(_k_form_C1_Rapam, mTORC1, _Cytosolic_Rapamycin, _k_diss_C1_Rapam, _mTORC1_Rapamycin)
  _k_form_C1_Rapam*mTORC1*_Cytosolic_Rapamycin - _k_diss_C1_Rapam*_mTORC1_Rapamycin;
end
Function_for_mTORC1___Rapamycin_association_sequestration_and_dissociation is "Function for mTORC1 - Rapamycin association/sequestration and dissociation";

function Function_for_Releasing_Raptor_from_mTORC1___rapamycin_complex(_k_forward_Raptor_release, _mTORC1_Rapamycin, _k_reverse_Raptor_release, _mTOR_Rapamycin, Raptor)
  _k_forward_Raptor_release*_mTORC1_Rapamycin - _k_reverse_Raptor_release*_mTOR_Rapamycin*Raptor;
end
Function_for_Releasing_Raptor_from_mTORC1___rapamycin_complex is "Function for Releasing Raptor from mTORC1 - rapamycin complex";

model New_Model()
  // Dorvash2019 - Dynamic modeling of signal transduction by mTOR complexes in cancer
  // This model is based on: Dynamic modeling of signal transduction by mTOR complexes in cancer Author: Mohammadreza Dorvash, Mohammad Farahmandnia, Pouria Mosaddeghi, Mitra Farahmandnejad, Hosein Saber, Mohammadhossein Khorraminejad-Shirazi, Amir Azadi, Iman Tavassoly Abstract: Signal integration has a crucial role in the cell fate decision and dysregulation of the cellular signaling pathways is a primary characteristic of cancer. As a signal integrator, mTOR shows a complex dynamical behavior which determines the cell fate at different cellular processes levels, including cell cycle progression, cell survival, cell death, metabolic reprogramming, and aging. The dynamics of the complex responses to rapamycin in cancer cells have been attributed to its differential time-dependent inhibitory effects on mTORC1 and mTORC2, the two main complexes of mTOR. Two explanations were previously provided for this phenomenon: 1-Rapamycin does not inhibit mTORC2 directly, whereas it prevents mTORC2 formation by sequestering free mTOR protein (Le Chatelier’s principle). 2-Components like Phosphatidic Acid (PA) further stabilize mTORC2 compared with mTORC1. To understand the mechanism by which rapamycin differentially inhibits the mTOR complexes in the cancer cells, we present a mathematical model of rapamycin mode of action based on the first explanation, i.e., Le Chatelier’s principle. Translating the interactions among components of mTORC1 and mTORC2 into a mathematical model revealed the dynamics of rapamycin action in different doses and time-intervals of rapamycin treatment. This model shows that rapamycin has stronger effects on mTORC1 compared with mTORC2, simply due to its direct interaction with free mTOR and mTORC1, but not mTORC2, without the need to consider other components that might further stabilize mTORC2. Based on our results, even when mTORC2 is less stable compared with mTORC1, it can be less inhibited by rapamycin.
  // hasProperty mamo:MAMO_0000046
  // hasProperty ncit:C2201
  // hasProperty efo:0000311
  // hasProperty ncit:C43382
  // isDescribedBy pubmed:31493485
  // biomodels.db:MODEL1909250002 biomodels.db:BIOMD0000000822

  // Compartments:
  compartment compartment = 1;  // isVersionOf ncit:C13413

  // Species:
  species Cytosolic_Rapamycin in compartment = 0;  // isVersionOf CHEBI:9168; isVersionOf ncit:C61554
  species mTOR in compartment = 3.756228e-7;  // isVersionOf orphanet:431220; isVersionOf ncit:C2201
  species Raptor in compartment = 3.201594e-7;  // isVersionOf ncit:C104769
  species Rictor in compartment = 8.834274e-8;  // isVersionOf ncit:C104740
  species mTORC1 in compartment = 0;  // isVersionOf ncit:C96314
  species mTORC2 in compartment = 0;  // isVersionOf ncit:C96315
  species mTOR_Rapamycin in compartment = 0; mTOR_Rapamycin is "mTOR:Rapamycin";  // isPartOf CHEBI:9168; isPartOf ncit:C2201; isVersionOf orphanet:431220
  species mTORC1_Rapamycin in compartment = 0; mTORC1_Rapamycin is "mTORC1:Rapamycin";  // isPartOf CHEBI:9168; isPartOf ncit:C96314

  // Parameters:
  K_abs_Rapam = 2.77 unit_0; K_abs_Rapam is "K_abs@Rapam";
  Rapamycin_Dose = 0;
  K_el_Rapam = 0.0718632 unit_0; K_el_Rapam is "K_el@Rapam";
  K_syn_mTOR = 1.6e-27 unit_1; K_syn_mTOR is "K_syn@mTOR";
  K_deg_mTOR = 1e-8 unit_2; K_deg_mTOR is "K_deg@mTOR";
  K_syn_Raptor = 2.15e-27 unit_1; K_syn_Raptor is "K_syn@Raptor";
  K_deg_Raptor = 1e-8 unit_2; K_deg_Raptor is "K_deg@Raptor";
  K_syn_Rictor = 5.9e-28 unit_1; K_syn_Rictor is "K_syn@Rictor";
  K_deg_Rictor = 1e-8 unit_2; K_deg_Rictor is "K_deg@Rictor";
  k_form_C1 = 16666666 unit_3; k_form_C1 is "k_form@C1";
  k_diss_C1 = 0.08333 unit_2; k_diss_C1 is "k_diss@C1";
  k_form_C2 = 16666666 unit_3; k_form_C2 is "k_form@C2";
  k_diss_C2 = 0.08333 unit_2; k_diss_C2 is "k_diss@C2";
  k_form_mTOR_Rapam = 1920000 unit_3; k_form_mTOR_Rapam is "k_form@mTOR:Rapam";
  k_diss_mTOR_Rapam = 0.022 unit_2; k_diss_mTOR_Rapam is "k_diss@mTOR:Rapam";
  k_form_C1_Rapam = 1920000 unit_3; k_form_C1_Rapam is "k_form@C1:Rapam";
  k_diss_C1_Rapam = 0.022 unit_2; k_diss_C1_Rapam is "k_diss@C1:Rapam";
  k_forward_Raptor_release = 0.01 unit_2; k_forward_Raptor_release is "k_forward@Raptor release";
  k_reverse_Raptor_release = 1e-5 unit_3; k_reverse_Raptor_release is "k_reverse@Raptor release";

  // Reactions:
  Absorption_of_Rapamycin: => Cytosolic_Rapamycin; compartment*Function_for_Absorption_of_rapamycin(K_abs_Rapam, Rapamycin_Dose);  // isVersionOf GO:0035737
  Elimination_of_rapamycin: Cytosolic_Rapamycin => ; compartment*Function_for_Elimination_of_rapamycin(K_el_Rapam, Cytosolic_Rapamycin);
  Synthesis_of_mTOR: => mTOR; compartment*Function_for_Synthesis_of_mTOR(K_syn_mTOR);
  Degradation_of_mTOR: mTOR => ; compartment*Function_for_Degradation_of_mTOR(K_deg_mTOR, mTOR);
  Synthesis_of_Raptor: => Raptor; compartment*Function_for_Synthesis_of_Raptor(K_syn_Raptor);
  Degradation_of_Raptor: Raptor => ; compartment*Function_for_Degradation_of_Raptor(K_deg_Raptor, Raptor);
  Synthesis_of_Rictor: => Rictor; compartment*Function_for_Synthesis_of_Rictor(K_syn_Rictor);
  Degradation_of_Rictor: Rictor => ; compartment*Function_for_Degradation_of_Rictor(K_deg_Rictor, Rictor);
  mTORC1_formation_and_dissociation: mTOR + Raptor -> mTORC1; compartment*Function_for_mTORC1_formation_and_dissociation(k_form_C1, mTOR, Raptor, k_diss_C1, mTORC1);
  mTORC2_formation_and_dissociation: mTOR + Rictor -> mTORC2; compartment*Function_for_mTORC2_formation_and_dissociation(k_form_C2, mTOR, Rictor, k_diss_C2, mTORC2);
  mTOR___Rapamycin_association_sequestration_and_dissociation: mTOR + Cytosolic_Rapamycin -> mTOR_Rapamycin; compartment*Function_for_mTOR___Rapamycin_association_sequestration_and_dissociation(k_form_mTOR_Rapam, mTOR, Cytosolic_Rapamycin, k_diss_mTOR_Rapam, mTOR_Rapamycin); mTOR___Rapamycin_association_sequestration_and_dissociation is "mTOR - Rapamycin association/sequestration and dissociation";  // isVersionOf GO:0072752
  mTORC1___Rapamycin_association_sequestration_and_dissociation: mTORC1 + Cytosolic_Rapamycin -> mTORC1_Rapamycin; compartment*Function_for_mTORC1___Rapamycin_association_sequestration_and_dissociation(k_form_C1_Rapam, mTORC1, Cytosolic_Rapamycin, k_diss_C1_Rapam, mTORC1_Rapamycin); mTORC1___Rapamycin_association_sequestration_and_dissociation is "mTORC1 - Rapamycin association/sequestration and dissociation";  // isVersionOf GO:0072752
  Releasing_Raptor_from_mTORC1___rapamycin_complex: mTORC1_Rapamycin -> mTOR_Rapamycin + Raptor; compartment*Function_for_Releasing_Raptor_from_mTORC1___rapamycin_complex(k_forward_Raptor_release, mTORC1_Rapamycin, k_reverse_Raptor_release, mTOR_Rapamycin, Raptor); Releasing_Raptor_from_mTORC1___rapamycin_complex is "Releasing Raptor from mTORC1 - rapamycin complex";

  // Events:
  dose: at ((time >= 240) && (piecewise(time - 24*ceil(time/24), xor(time < 0, 24 < 0), time - 24*floor(time/24)) == 0)): Rapamycin_Dose = Rapamycin_Dose + 8e-20;

  // Unit definitions:
  unit volume = 1e-3 litre;
  unit unit_0 = 1 / (360000 second); unit_0 is "1/h";
  unit unit_1 = mole / second; unit_1 is "mol/s";
  unit unit_2 = 1 / second; unit_2 is "1/s";
  unit unit_3 = 1 / (mole * second); unit_3 is "1/(mol*s)";
end
