// SBML level 2 version 4
// dcterms:bibliographicCitation: urn:miriam:pubmed:30389532

function Function_for_Virus_Lytic_Release_From_Infected(beta, eta, I)
  beta*eta*I;
end

function Function_for_Susceptible_Logistic_Growth(r, S, N, K)
  r*S*(1 - N/K);
end

model Gulbudak2019___Heterogeneous_viral_strategies_promote_coexistence_in_virus_microbe_systems()
  // Gulbudak2019.1 - Heterogeneous viral strategies promote coexistence in virus-microbe systems (Lytic)
  // This is a mathematical model describing describing the population dynamics of microbes infected by lytic viruses.
  // isDescribedBy pubmed:30389532
  // hasProperty mamo:MAMO_0000046
  // hasProperty GO:0019089
  // biomodels.db:MODEL1911100003 biomodels.db:BIOMD0000000845

  // Compartments:
  compartment compartment = 1;  // isVersionOf ncit:C16551

  // Species:
  species S in compartment = 830000000;  // hasVersion ncit:C14187
  species I in compartment = 0;  // isVersionOf BTO:0000152
  species V_L in compartment = 33200000;  // ncit:C14368

  // Parameters:
  r = 0.339;
  K = 894700000;
  beta = 20;
  eta = 1.5;
  mu = 0.0866;
  r_tilde = 0.2;
  phi_tilde = 2e-11;
  alpha = 0.1;
  d_tilde = 0.05;

  // Assignment rules:
  d := 1/24;
  phi := 0.55*10^(-9.5);
  N := S + I;

  // Reactions:
  Susceptible_Logistic_Growth: => S; compartment*Function_for_Susceptible_Logistic_Growth(r, S, N, K);  // ncit:C18081
  Susceptible_Absorption_Virus: S + V_L => I; compartment*phi*S*V_L;  // GO:0046718
  Susceptible_Death: S => ; compartment*d*S;  // GO:0008219
  Infected_Death: I => ; compartment*d*I;  // GO:0008219
  Infected_Lysis: I => ; compartment*eta*I;  // GO:0044659
  Virus_Lytic_Release_From_Infected: => V_L; compartment*Function_for_Virus_Lytic_Release_From_Infected(beta, eta, I);  // modifiers: I; GO:0019076
  Virus_Lytic_Decay: V_L => ; compartment*mu*V_L;

  // Unit definitions:
  unit volume = 1e-3 litre;
  unit time = 3600 second;
  unit substance = item;
end
