// SBML level 2 version 4
// dcterms:bibliographicCitation: A dynamic model to simulate potassium balance in dairy cows. urn:miriam:pubmed:28987591

function Function_for_DmMa(default, dmi, p42, T_src_metact, basic_metact)
  (basic_metact + p42*dmi^2/(dmi^2 + T_src_metact^2))/default;
end

function Function_for_GbGs(Gluc_b, Gluc_feed, Gluc_prod, Gluc_stor, default, ins_b, p1, p12, p36, Milk_in_l_h, p57)
  Gluc_feed^10/(Gluc_feed^10 + p1^10)*p12*Gluc_prod*default*p57^10/((Gluc_stor*default)^10 + p57^10)*ins_b*Gluc_b*p36^10/(p36^10 + Milk_in_l_h^10);
end

function Function_for_GpGb(Gluc_b, Gluc_prod, default, p37, p39, p50)
  (p37 + p39*Gluc_prod*default)*(1/(1 + (Gluc_b/p50)^10));
end

function Function_for_GpGs(Gluc_prod, Gluc_stor, default, p51, Milk_in_l_h, p57, p62)
  p51*Gluc_prod*default*(p57^10/((Gluc_stor*default)^10 + p57^10))*p62^10/(p62^10 + Milk_in_l_h^10)/default;
end

function Function_for_GsGb(Gluc_b, Gluc_feed, Gluc_stor, default, p1, p17, p35, Milk_in_l_h, p63, p64, p65, p7)
  1/(1 + (Gluc_feed/p1)^10)*p17*(p7 - Gluc_b)*(Gluc_stor*default)^10/((Gluc_stor*default)^10 + p35^10) + 1/(1 + (p64/Milk_in_l_h)^10)*p65^10/(p65^10 + Gluc_b^10)*p63*(Gluc_stor*default)^10/((Gluc_stor*default)^10 + p35^10);
end

function Function_for_GsGp(Gluc_feed, Gluc_stor, default, p35, p60, p61)
  p60*1/(1 + (Gluc_feed/p61)^5)*(Gluc_stor*default)^10/((Gluc_stor*default)^10 + p35^10)/default;
end

function Function_for_KeKi(K_ECF, ins_b, p20, p21, p3, p33, p8, p9, pH)
  (p8 + p9*ins_b^8/(ins_b^8 + p3^8))*K_ECF^2/(K_ECF^2 + p33^2)*(1 + p21*pH^10/(pH^10 + p20^10));
end

function Function_for_KeKs(K_ECF, dmi, p18)
  p18*K_ECF*dmi;
end

function Function_for_KeKt(K_ECF, K_git, K_tiss, default, p10, p15, p2, p25)
  (K_git*default)^10/((K_git*default)^10 + p15^10)*p25*K_ECF*(p2 - p10)^10/((K_tiss*default - p10)^10 + (p2 - p10)^10);
end

function Function_for_KeKu(K_ECF, K_git, default, p13, p16, p22, p24, basal_KeKu, p6)
  (1 + p13*K_ECF^5/(K_ECF^5 + p24^5))*p6*K_git*default*(1 + p16*K_ECF^10/(K_ECF^10 + p22^10)) + basal_KeKu*K_ECF;
end

function Function_for_KeMi(K_ECF, p40, kmilk_content, Milk_in_l_h)
  kmilk_content*Milk_in_l_h*K_ECF^10/(K_ECF^10 + p40^10);
end

function Function_for_KfKg(K_feed, default, p30)
  p30*K_feed/default;
end

function Function_for_KgKe(K_git, default, p31)
  p31*K_git*default;
end

function Function_for_KiKe(K_ECF, K_ICF, p14, p19, p20, p23, p29, p5, pH)
  (1 + 1/(1 + (K_ECF/p29)^10))*p5*(1 + 1/(1 + (pH/p20)^10))*K_ICF^2/(K_ICF^2 + p23^2)*(1 + p19*K_ICF^2/(K_ICF^2 + p14^2));
end

function Function_for_KsKg(K_sal, default, p32)
  p32*K_sal*default/default;
end

function Function_for_KtKe(K_ECF, K_git, K_tiss, default, p10, p15, p26, p27, p38)
  1/(1 + (K_git*default/p15)^10)*p26*(p27 - K_ECF)*(K_tiss*default - p10)^10/((K_tiss*default - p10)^10 + (p38*0.99 - p10)^10);
end

function Function_for_MaSnk(default, met_act, snc_metact)
  snc_metact*met_act*default/default;
end

function Function_for_SnkGb(Gluc_b, Gluc_prod, default, p28, p47, Milk_in_l_h, p58, p59, p66)
  Gluc_b^10/(Gluc_b^10 + p58^10)*(p28*Gluc_b + p59*Gluc_prod*default*exp(-p66*Milk_in_l_h) + Milk_in_l_h*p47);
end

function Function_for_SnkIn(extracell, ins_b, p41)
  p41*ins_b/extracell;
end

function Function_for_SrcGb(Gluc_feed, extracell, scale_blood_gluc)
  scale_blood_gluc*Gluc_feed/extracell;
end

function Function_for_SrcGp(Gluc_feed, default, scale_blood_gluc)
  (1 - scale_blood_gluc)*Gluc_feed/default;
end

function Function_for_SrcIn(Gluc_b, extracell, p49)
  p49*Gluc_b/extracell;
end

model MODEL1710230000()
  // Potassium balance in lactating and non-lactating dairy cows
  // hasInstance biomodels.db:MODEL1710230000 taxonomy:9913 mamo:MAMO_0000046
  // isDescribedBy mamo:MAMO_0000046 pubmed:28987591
  // hasProperty biomodels.db:MODEL1710230000
  // hasTaxon taxonomy:9913
  // biomodels.db:MODEL1710230000 biomodels.db:BIOMD0000000849

  // Compartments:
  compartment default = 1 volume;
  compartment intracell in default = 10.2 volume;
  compartment extracell in default = 22.8 volume;

  // Species:
  species K_ECF in extracell = 0.1751368;
  species K_ICF in intracell = 0.897326;
  species K_urin in default = 0;
  species K_tiss in default = 1509.6/default;
  species K_sal in default = 4.538189/default;
  species met_act in default = 6.248851/default;
  species K_milk in default = 0;
  species $K_ECF_mmol in extracell;
  species $K_ICF_mmol in intracell;
  species K_git in default = 43.13656/default;
  species Gluc_b in extracell = 0.5465665;
  species ins_b in extracell = 21.8533;
  species Gluc_stor in default = 3647.747/default;
  species Gluc_prod in default = 34.03372/default;
  species $src_metact in default = 0;
  species $snk_metact in default = 0;
  species $src_Kgit in default = 0;
  species $src_Glucblood in extracell = 0;
  species $src_Gprod in default = 0;
  species $sa4_degraded in default = 0; sa4_degraded is "snk_Kecf";
  species Gluc_use in default = 0;
  species $src_insnew in extracell = 0;
  species $snk_insnew in extracell = 0;

  // Parameters:
  p3 = 22 unit_0;
  p4 = 0.0001783 unit_0;
  p5 = 0.563 unit_0;
  p6 = 0.051 unit_0;
  p8 = 0.5994 unit_0;
  p9 = 0.4016 unit_0;
  p13 = 6.08 unit_0;
  p14 = 0.15639932 unit_0;
  p15 = 32 unit_0;
  p16 = 10 unit_0;
  p18 = 0.0223 unit_0;
  p19 = 0.1373 unit_0;
  p20 = 7.38 unit_0;
  p21 = 0.1085 unit_0;
  p22 = 0.25 unit_0;
  p23 = 0.58649745 unit_0;
  p24 = 0.1962811 unit_0;
  p25 = 6.6085 unit_0;
  p26 = 49.0279 unit_0;
  p27 = 0.232634885 unit_0;
  p29 = 0.11729949 unit_0;
  p30 = 0.95 unit_0;
  p31 = 0.353 unit_0;
  p32 = 1.31 unit_0;
  p33 = 0.07819966 unit_0;
  pH has unit_0;
  p42 = 4.5 unit_0; p42 is "src_metact";
  T_src_metact = 10 unit_0;
  snc_metact = 1.2 unit_0;
  basic_metact = 3 unit_0;
  src_glucfeed = 0.0854 unit_0;
  scale_blood_gluc = 0.08 unit_0;
  p49 = 800 unit_0;
  p41 = 20 unit_0;
  Pi = 3.141593 unit_0;
  dmi has unit_0;
  K_feed has unit_0;
  Gluc_feed has unit_0;
  kmilk_content = 1.4 unit_0;
  basal_KeKu = 0.01 unit_0;
  dmi_percentage = 1 unit_0;
  Milk_in_l_h = 0 unit_0; Milk_in_l_h is "Milk_in_l/h";
  perctK_in_dmi = 0.01137 unit_0;
  con = 0.0390983 unit_0;
  p1 = 40.4 unit_0;
  p11 = 860 unit_0;
  p12 = 0.0105 unit_0;
  p17 = 16 unit_0;
  p28 = 25 unit_0;
  p37 = 0 unit_0;
  p39 = 30 unit_0;
  p50 = 0.4 unit_0;
  p7 = 0.925 unit_0;
  p51 = 0.1 unit_0;
  p57 = 3800 unit_0;
  p59 = 1 unit_0;
  p60 = 2 unit_0;
  p61 = 5 unit_0;
  p40 = 0.01 unit_0;
  p47 = 72 unit_0;
  p58 = 0.01 unit_0;
  p63 = 800 unit_0;
  p64 = 0.2 unit_0;
  p65 = 0.3 unit_0;
  p66 = 1.4 unit_0;
  p2 = 1600 unit_0;
  p10 = 1400 unit_0;
  p35 = 100 unit_0;
  p62 = 1 unit_0;
  p38 = 1509.6 unit_0;
  p36 = 1 unit_0;
  amount_to_particle_factor = 6.022141e23;

  // Assignment rules:
  K_ECF_mmol := K_ECF/con;
  K_ICF_mmol := K_ICF/con;
  pH := 7.5 - met_act/40;
  dmi := dmi_percentage*487.5*(1 - sin(pi*time/12));
  K_feed := perctK_in_dmi*dmi;
  Gluc_feed := src_glucfeed*dmi;

  // Reactions:
  DmMa: $src_metact => met_act; default*Function_for_DmMa(default, dmi, p42, T_src_metact, basic_metact);
  GbGs: Gluc_b => Gluc_stor; Function_for_GbGs(Gluc_b, Gluc_feed, Gluc_prod, Gluc_stor, default, ins_b, p1, p12, p36, Milk_in_l_h, p57);  // modifiers: ins_b, Gluc_prod
  GpGb: Gluc_prod => Gluc_b; Function_for_GpGb(Gluc_b, Gluc_prod, default, p37, p39, p50);
  GpGs: Gluc_prod => Gluc_stor; default*Function_for_GpGs(Gluc_prod, Gluc_stor, default, p51, Milk_in_l_h, p57, p62);
  GsGb: Gluc_stor => Gluc_b; Function_for_GsGb(Gluc_b, Gluc_feed, Gluc_stor, default, p1, p17, p35, Milk_in_l_h, p63, p64, p65, p7);
  GsGp: Gluc_stor => Gluc_prod; default*Function_for_GsGp(Gluc_feed, Gluc_stor, default, p35, p60, p61);
  KeKi: K_ECF => K_ICF; Function_for_KeKi(K_ECF, ins_b, p20, p21, p3, p33, p8, p9, pH);  // modifiers: ins_b
  KeKs: K_ECF => K_sal; Function_for_KeKs(K_ECF, dmi, p18);
  KeKt: K_ECF => K_tiss; Function_for_KeKt(K_ECF, K_git, K_tiss, default, p10, p15, p2, p25);  // modifiers: K_git
  KeKu: K_ECF => K_urin; Function_for_KeKu(K_ECF, K_git, default, p13, p16, p22, p24, basal_KeKu, p6);  // modifiers: K_git
  KeMi: K_ECF => K_milk; Function_for_KeMi(K_ECF, p40, kmilk_content, Milk_in_l_h);
  KeR: K_ECF => $sa4_degraded; p4*K_ECF;
  KfKg: $src_Kgit => K_git; default*Function_for_KfKg(K_feed, default, p30);
  KgKe: K_git => K_ECF; Function_for_KgKe(K_git, default, p31);
  KiKe: K_ICF => K_ECF; Function_for_KiKe(K_ECF, K_ICF, p14, p19, p20, p23, p29, p5, pH);
  KsKg: K_sal => K_git; default*Function_for_KsKg(K_sal, default, p32);
  KtKe: K_tiss => K_ECF; Function_for_KtKe(K_ECF, K_git, K_tiss, default, p10, p15, p26, p27, p38);  // modifiers: K_git
  MaSnk: met_act => $snk_metact; default*Function_for_MaSnk(default, met_act, snc_metact);
  SnkGb: Gluc_b => Gluc_use; Function_for_SnkGb(Gluc_b, Gluc_prod, default, p28, p47, Milk_in_l_h, p58, p59, p66);  // modifiers: Gluc_prod
  SnkIn: ins_b => $snk_insnew; extracell*Function_for_SnkIn(extracell, ins_b, p41);
  SrcGb: $src_Glucblood => Gluc_b; extracell*Function_for_SrcGb(Gluc_feed, extracell, scale_blood_gluc);
  SrcGp: $src_Gprod => Gluc_prod; default*Function_for_SrcGp(Gluc_feed, default, scale_blood_gluc);
  SrcIn: $src_insnew => ins_b; extracell*Function_for_SrcIn(Gluc_b, extracell, p49);  // modifiers: Gluc_b

  // Unit definitions:
  unit substance = mole;
  unit volume = litre;
  unit area = metre^2;
  unit length = metre;
  unit time = 3600 second;
  unit unit_0 = dimensionless^0; unit_0 is "1";
end
