// SBML level 2 version 4

function MM_Kcat(E, kcat, S, Km)
  E*kcat*S/(Km + S);
end

model New_Model()
  // NIK-dependent p100 processing into p52 and IkBd degradation, Michaelis-Menten, SBML 2v4
  // This model represents NIK-dependent p100 processing into p52 and NIK-dependent IkBd degradation with Michaelis-Menten kinetics. Compare this Michaelis-Menten representation to the mass action model in which the dose-response to increasing p100 mRNA is no longer monotonic due to substrate complex competition.

  // Compartments:
  compartment compartment = 1;

  // Species:
  species $p100t in compartment = 2.5;  // ensembl:ENSG00000077150
  species p100 in compartment = 0;  // uniprot:Q00653
  species p52 in compartment = 0;  // uniprot:Q00653
  species NIK in compartment = 10;  // uniprot:Q99558
  species IkBd in compartment = 0;  // hasPart uniprot:Q00653

  // Reactions:
  p100_mRNA_Expressions: $p100t => p100; compartment*p100_mRNA_Expressions_k1*p100t;
    p100_mRNA_Expressions_k1 = 0.2;
  p100_processing: p100 => p52; compartment*MM_Kcat(NIK, p100_processing_kcat, p100, p100_processing_Km);  // modifiers: NIK
    p100_processing_kcat = 0.05; p100_processing_Km = 10;
  p52_degradation: p52 => ; compartment*p52_degradation_k1*p52;
    p52_degradation_k1 = 0.00038;
  p100_degradation: p100 => ; compartment*p100_degradation_k1*p100;
    p100_degradation_k1 = 0.00038;
  p100_dimerization: 2 p100 -> IkBd; compartment*(p100_dimerization_k1*p100^2 - k2*IkBd);
    p100_dimerization_k1 = 1.6e-5; k2 = 0.00024;
  IkBd_degradation: IkBd => ; compartment*IkBd_degradation_k1*IkBd;
    IkBd_degradation_k1 = 0.00038;
  IkBd_degradation_by_NIK: IkBd => ; compartment*MM_Kcat(NIK, IkBd_degradation_by_NIK_kcat, IkBd, IkBd_degradation_by_NIK_Km);  // modifiers: NIK
    IkBd_degradation_by_NIK_kcat = 0.05; IkBd_degradation_by_NIK_Km = 10;

  // Unit definitions:
  unit volume = 1e-3 litre;
  unit substance = 1e-9 mole;
end
