// SBML level 2 version 4

model MODEL1008060001()
  // Munz2009 - Zombie SIZRC
  // This is the model with an latent infection and cure for zombies described in the article.
  // This model was originally created by libAntimony v1.4 (using libSBML 3.4.1).
  // This model is described in the article:
  // When zombies attack!: Mathematical modelling of an outbreak of zombie infection
  // P. Munz, I. Hudea, J. Imad and R.J. Smith?
  // Infectious Disease Modelling Research Progress 2009, chapter 4, pp 133-150. Editors: Jean Michel Tchuenche and C. Chiyaka; Nova Science Publishers, Inc., NY, USA.
  // Abstract:
  // Zombies are a popular figure in pop culture/entertainment and they are usually portrayed as being brought about through an outbreak or epidemic. Consequently, we model a zombie attack, using biological assumptions based on popular zombie movies. We introduce a basic model for zombie infection, determine equilibria and their stability, and illustrate the outcome with numerical solutions. We then refine the model to introduce a latent period of zombification, whereby humans are infected, but not infectious, before becoming undead. We then modify the model to include the effects of possible quarantine or a cure. Finally, we examine the impact of regular, impulsive reductions in the number of zombies and derive conditions under which eradication can occur. We show that only quick, aggressive attacks can stave off the doomsday scenario: the collapse of society as zombies overtake us all.
  // This model is hosted on BioModels Database and identified by: MODEL1008060001 .
  // To cite BioModels Database, please use: BioModels Database: An enhanced, curated and annotated resource for published quantitative kinetic models .
  // To the extent possible under law, all copyright and related or neighbouring rights to this encoded model have been dedicated to the public domain worldwide. Please refer to CC0 Public Domain Dedication for more information.
  // biomodels.db:MODEL1008060001
  // isDescribedBy ISBN:1607413477
  // isVersionOf DOID:0050117 GO:0016032
  // hasTaxon taxonomy:9606

  // Compartments:
  compartment env = 1; env is "environment";

  // Species:
  substanceOnly species S in env = N; S is "Susceptible";
  substanceOnly species I in env = 0; I is "Infected";
  substanceOnly species Z in env = 1*env; Z is "Zombie";
  substanceOnly species R in env = 0; R is "Removed";

  // Parameters:
  N = 500 substance; N is "starting Population";
  p has indperday;
  // background death rate
  delta = 0.0001 perday;
  // rate of zombie bites
  beta = 0.0095 perdayperind;
  // rate of zombification
  rho = 0.05 perday;
  // rate of undead resurrection
  zeta = 0.0001 perday;
  // rate of zombie destruction
  alpha = 0.005 perdayperind;
  // cure rate of infected
  c = 0.5 perday;

  // Assignment rules:
  p := S*delta;

  // Reactions:
  birth: => S; p;
  death_healthy: S => R; delta*S;
  infection: S => I; beta*S*Z;  // modifiers: Z
  natural_death_infected: I => R; delta*I;
  zombification_infected: I => Z; rho*I;
  cure: Z => S; c*Z;
  resurrection: R => Z; zeta*R;
  destruction: Z => R; alpha*S*Z;  // modifiers: S

  // Unit definitions:
  unit substance = 1000 item; substance is "individuals(thousands)";
  unit time = 86400 second; time is "days";
  unit perday = 1 / (86400 second); perday is "per day";
  unit perdayperind = 1 / (86400 second * 1000 item); perdayperind is "per day per thousand individuals";
  unit indperday = 1000 item / (86400 second); indperday is "thousand individuals per day";
end
