// SBML level 2 version 4
// dcterms:bibliographicCitation: urn:miriam:pubmed:30481266

function HMM_Modified_Inverted(PI3K_Active, Kcat, AKT, km)
  piecewise(Kcat*PI3K_Active*AKT/(km + AKT), PI3K_Active <= 1, 0);
end

function HMM_Modified(Kcat, km, PI3K_Active, AKT)
  Kcat*PI3K_Active*AKT/(km + AKT);
end

model Giani2019___Computational_modeling_to_predict_MAP3K8_effects_as_mediator_of_resistance_to_vemurafenib_in_thyroid_cancer_stem_cells()
  // Giani2019 - Computational modeling to predict MAP3K8 effects as mediator of resistance to vemurafenib in thyroid cancer stem cells
  // Computational modeling to predict MAP3K8 effects as mediator of resistance to vemurafenib in thyroid cancer stem cells
  // isDerivedFrom BTO:0001610 NCIT:C15632 GO:0035690 mamo:MAMO_0000046 GO:0007173 taxonomy:9606
  // isDescribedBy biomodels.db:MODEL1902140001 pubmed:30481266
  // occursIn BTO:0001610
  // hasProperty NCIT:C15632
  // hasProperty GO:0035690
  // hasProperty mamo:MAMO_0000046

  // Compartments:
  compartment Sphere_thyroid_cancer_cell = 1e-12; Sphere_thyroid_cancer_cell is "Sphere (thyroid cancer cell)";  // hasProperty BTO:0001601

  // Species:
  // pEGFR= boundEGFR
  species pEGFR in Sphere_thyroid_cancer_cell = 0;  // uniprot:P00533; hasProperty PATO:0002220
  species free_EGFR in Sphere_thyroid_cancer_cell = 10;  // uniprot:P00533
  species Sos_Active in Sphere_thyroid_cancer_cell = 0;  // hasPart ncit:C45329; uniprot:Q07889
  species Sos_Inactive in Sphere_thyroid_cancer_cell = 10;  // uniprot:Q07889; hasProperty PATO:0002355
  species Ras_Active in Sphere_thyroid_cancer_cell = 0;  // uniprot:P01112; hasProperty ncit:C45329
  species Ras_Inactive in Sphere_thyroid_cancer_cell = 10;  // uniprot:P01112; hasProperty PATO:0002355
  species Raf1_Active in Sphere_thyroid_cancer_cell = 0;  // uniprot:P04049; hasProperty ncit:C45329
  species Raf1_Inactive in Sphere_thyroid_cancer_cell = 10;  // uniprot:P04049; hasProperty PATO:0002355
  species Mek_Active in Sphere_thyroid_cancer_cell = 0;  // isVersionOf uniprot:Q02750; hasProperty ncit:C45329
  species Mek_Inactive in Sphere_thyroid_cancer_cell = 10;  // isVersionOf uniprot:Q02750; hasProperty PATO:0002355
  species pERK in Sphere_thyroid_cancer_cell = 0;  // isVersionOf uniprot:P28482; hasProperty PATO:0002220
  species ERK in Sphere_thyroid_cancer_cell = 10;  // isVersionOf uniprot:P28482
  species PI3K_Active in Sphere_thyroid_cancer_cell = 0;  // isVersionOf uniprot:P27986; hasProperty ncit:C45329
  species PI3K_Inactive in Sphere_thyroid_cancer_cell = 10;  // isVersionOf uniprot:P27986; hasProperty PATO:0002355
  species pAKT in Sphere_thyroid_cancer_cell = 0;  // isVersionOf uniprot:P31749; hasProperty PATO:0002220
  species AKT in Sphere_thyroid_cancer_cell = 10;  // isVersionOf uniprot:P31749
  species $EGF in Sphere_thyroid_cancer_cell = 10000;  // uniprot:P01133
  species $pro_EGFR in Sphere_thyroid_cancer_cell = 5;  // isVersionOf uniprot:P00533
  species PIP3Active in Sphere_thyroid_cancer_cell = 0;  // isVersionOf CHEBI:16618
  species PIP3Inactive in Sphere_thyroid_cancer_cell = 10; PIP3Inactive is "PIP2";  // isVersionOf CHEBI:18348
  species $PTENActive in Sphere_thyroid_cancer_cell = 10; PTENActive is "PTEN_Active";  // uniprot:P60484; hasProperty ncit:C45329
  species PDK1Inactive in Sphere_thyroid_cancer_cell = 10; PDK1Inactive is "PDK1_Inactive";  // uniprot:O15530; hasProperty PATO:0002355
  species PDK1Active in Sphere_thyroid_cancer_cell = 0; PDK1Active is "PDK1_Active";  // uniprot:O15530; hasProperty ncit:C45329
  species $HSP90_Cdc37Active in Sphere_thyroid_cancer_cell = 10; HSP90_Cdc37Active is "HSP90-Cdc37_Active";  // hasPart uniprot:P07900; hasPart uniprot:Q16543; hasProperty ncit:C45329
  species $PHLPPActive in Sphere_thyroid_cancer_cell = 10; PHLPPActive is "PHLPP_Active";  // uniprot:O60346; hasProperty ncit:C45329
  species mTORC2Active in Sphere_thyroid_cancer_cell = 0; mTORC2Active is "mTORC2_Active";  // isDerivedFrom ncit:C45329 uniprot:Q6R327; isDerivedFrom uniprot:P42345; hasProperty ncit:C45329
  species $TCL1Active in Sphere_thyroid_cancer_cell = 10; TCL1Active is "TCL1_Active";  // isVersionOf uniprot:P56279; hasProperty ncit:C45329
  species $CTMPActive in Sphere_thyroid_cancer_cell = 10; CTMPActive is "CTMP_Active";  // uniprot:Q5T1C6; hasProperty PATO:0002354
  species mTORC1Active in Sphere_thyroid_cancer_cell = 0; mTORC1Active is "mTORC1_Active";  // isDerivedFrom ncit:C45329 uniprot:Q8N122; isDerivedFrom uniprot:P42345; hasProperty ncit:C45329
  species mTORC1Inactive in Sphere_thyroid_cancer_cell = 10; mTORC1Inactive is "mTORC1_Inactive";  // isDerivedFrom PATO:0002355 uniprot:Q8N122; isDerivedFrom uniprot:P42345; hasProperty PATO:0002355
  // We simulated the 8505C cell lines having the bRaf mutation in this way:
  // 1) We introduced the new species bRafMutated; with the same initaila concentration of bRafInactive (100)
  // 2) We deleted the bRaf activation by Rap1 as the new species bRafMutated is not affected by this signalling (the same applies for Ras)
  // 3) We inhibited the deactivation of Braf by Raf1PPtase (as Raf1PPtase does not anymore influence Braf)
  // 4) bRafMutated accomplish the Mek activation subsituting the not mutated species bRaf
  // In cells where AKT signaling is aberrantly activated (by PTEN loss, PI3K activation, or RTK amplification), the negative impact of BRAFV600E is countered by a dominant input upstream of AKT. Consequently, activated AKT phosphorylates substrates PRAS40, FOXO and GSK3β and suppresses their activity.
  // See:
  // http://journals.plos.org/plosone/article?id=10.1371/journal.pone.0042598
  // http://journals.plos.org/plosone/article?id=10.1371/journal.pone.0042598#s2
  species bRafMutated in Sphere_thyroid_cancer_cell = 100; bRafMutated is "bRaf_Mutated";  // uniprot:P15056; hasProperty ncit:C45576
  // Vemurafenib (iBRAF)
  // Treatment with the RAF inhibitors have opposing effects on AKT phosphorylation depending on the mutational status of two important oncogenes, KRAS and BRAF. If these two genes are in wildtype configuration, RAF inhibitors reduce AKT phosphorylation. In contrast, if BRAF or KRAS are mutant, RAF inhibitors will leave AKT phosphorylation unaffected or lead to an increase of AKT phosphorylation. (doi: 10.18632/oncotarget.6959)
  // 1uM = 1000nmol/l
  species PLX4032 in Sphere_thyroid_cancer_cell = 1000;  // CHEBI:63637
  species Grb2Active in Sphere_thyroid_cancer_cell = 0; Grb2Active is "Grb2_Active";  // uniprot:P62993; hasProperty ncit:C45329
  species Grb2Inactive in Sphere_thyroid_cancer_cell = 10; Grb2Inactive is "Grb2_Inactive";  // uniprot:P62993; hasProperty PATO:0002355
  species $FGF in Sphere_thyroid_cancer_cell = 10000;  // isVersionOf uniprot:P05230
  species freeFGFR in Sphere_thyroid_cancer_cell = 10; freeFGFR is "free_FGFR";  // isVersionOf uniprot:P11362
  species pFGFR in Sphere_thyroid_cancer_cell = 0;  // isVersionOf uniprot:P11362; hasProperty PATO:0002220
  species $proFGFR in Sphere_thyroid_cancer_cell = 5; proFGFR is "pro_FGFR";  // isVersionOf uniprot:P11362
  species $TNF in Sphere_thyroid_cancer_cell = 10000;  // uniprot:Q5STB3
  species freeTNFR1 in Sphere_thyroid_cancer_cell = 10; freeTNFR1 is "free_TNFR1";  // uniprot:P19438
  species pTNFR1 in Sphere_thyroid_cancer_cell = 0;  // uniprot:P19438; hasProperty PATO:0002220
  species freeTNFR2 in Sphere_thyroid_cancer_cell = 10; freeTNFR2 is "free_TNFR2";  // uniprot:P20333
  species pTNFR2 in Sphere_thyroid_cancer_cell = 0;  // uniprot:P20333; hasProperty PATO:0002220
  species TRADD_TRAF2_TRAF5_RIP1_Active in Sphere_thyroid_cancer_cell = 0; TRADD_TRAF2_TRAF5_RIP1_Active is "TRADD:TRAF2:TRAF5:RIP1_Active";  // hasPart uniprot:O00463; hasPart uniprot:Q13546; hasPart uniprot:Q12933; hasPart uniprot:Q15628
  species TRADD_TRAF2_TRAF5_RIP1_Inactive in Sphere_thyroid_cancer_cell = 10; TRADD_TRAF2_TRAF5_RIP1_Inactive is "TRADD:TRAF2:TRAF5:RIP1_Inactive";  // hasPart uniprot:Q12933; hasPart uniprot:O00463; hasPart uniprot:Q13546; hasPart uniprot:Q15628
  species TRAF1_TRAF2_TRAF3_Active in Sphere_thyroid_cancer_cell = 0; TRAF1_TRAF2_TRAF3_Active is "TRAF1:TRAF2:TRAF3_Active";  // hasPart uniprot:Q12933; hasPart uniprot:Q13114; hasPart uniprot:Q13077; hasProperty ncit:C45329
  species TRAF1_TRAF2_TRAF3_Inactive in Sphere_thyroid_cancer_cell = 10; TRAF1_TRAF2_TRAF3_Inactive is "TRAF1:TRAF2:TRAF3_Inactive";  // hasPart uniprot:Q13114; hasPart uniprot:Q13077; hasPart uniprot:Q12933; hasProperty PATO:0002355
  species NIKActive in Sphere_thyroid_cancer_cell = 0; NIKActive is "NIK_Active";  // uniprot:Q99558; hasProperty ncit:C45329
  species NIKInactive in Sphere_thyroid_cancer_cell = 10; NIKInactive is "NIK_Inactive";  // uniprot:Q99558; hasProperty PATO:0002355
  species IKKbeta_IKKalfa_IKKgamma_Active in Sphere_thyroid_cancer_cell = 0; IKKbeta_IKKalfa_IKKgamma_Active is "IKKbeta:IKKalfa:IKKgamma_Active";  // hasPart uniprot:O14920; hasPart uniprot:Q9Y6K9; hasPart uniprot:O15111; hasProperty ncit:C45329
  species IKKbeta_IKKalfa_IKKgamma_Inactive in Sphere_thyroid_cancer_cell = 10; IKKbeta_IKKalfa_IKKgamma_Inactive is "IKKbeta:IKKalfa:IKKgamma_Inactive";  // hasPart uniprot:O15111; hasPart uniprot:O14920; hasPart uniprot:Q9Y6K9; hasProperty PATO:0002355
  species TAB1_TAB2_TAB3_TAK1_Active in Sphere_thyroid_cancer_cell = 0; TAB1_TAB2_TAB3_TAK1_Active is "TAB1:TAB2:TAB3:TAK1_Active";  // hasPart uniprot:Q8N5C8; hasPart uniprot:Q9NYJ8; hasPart uniprot:O43318; hasPart uniprot:Q15750
  species TAB1_TAB2_TAB3_TAK1_Inactive in Sphere_thyroid_cancer_cell = 10; TAB1_TAB2_TAB3_TAK1_Inactive is "TAB1:TAB2:TAB3:TAK1_Inactive";  // hasPart uniprot:Q9NYJ8; hasPart uniprot:Q15750; hasPart uniprot:O43318; hasPart uniprot:Q8N5C8
  species Tpl2_NF_kB_Active in Sphere_thyroid_cancer_cell = 0; Tpl2_NF_kB_Active is "MAP3K8:NF-kB_Active";  // hasPart uniprot:P41279; hasPart uniprot:P19838; hasProperty ncit:C45329
  species Tpl2_NF_kB_Inactive in Sphere_thyroid_cancer_cell = 1; Tpl2_NF_kB_Inactive is "MAP3K8:NF-kB_Inactive";  // hasPart uniprot:P19838; hasPart uniprot:P41279; hasProperty PATO:0002355
  species $proTNFR1 in Sphere_thyroid_cancer_cell = 5; proTNFR1 is "pro_TNFR1";  // isVersionOf uniprot:P19438
  species $proTNFR2 in Sphere_thyroid_cancer_cell = 5; proTNFR2 is "pro_TNFR2";  // isVersionOf uniprot:P20333
  species bRafMutatedInactive in Sphere_thyroid_cancer_cell = 0; bRafMutatedInactive is "bRaf_Mutated_Inactive";  // uniprot:P15056; hasProperty PATO:0002355; hasProperty ncit:C45576
  species TRADD_TRAF2_TRAF5_RIP1_bRafINH_Active in Sphere_thyroid_cancer_cell = 0; TRADD_TRAF2_TRAF5_RIP1_bRafINH_Active is "TRADD:TRAF2:TRAF5:RIP1_bRafINH_Active";  // hasPart uniprot:Q13546; hasPart uniprot:Q12933; hasPart uniprot:O00463; hasPart uniprot:Q15628
  species TRADD_TRAF2_TRAF5_RIP1_bRafINH_Inactive in Sphere_thyroid_cancer_cell = 1.5; TRADD_TRAF2_TRAF5_RIP1_bRafINH_Inactive is "TRADD:TRAF2:TRAF5:RIP1_bRafINH_Inactive";  // hasPart uniprot:Q12933; hasPart uniprot:Q13546; hasPart uniprot:O00463; hasPart CHEBI:75047
  species TAB1_TAB2_TAB3_TAK1_bRafINH_Inactive in Sphere_thyroid_cancer_cell = 1.5; TAB1_TAB2_TAB3_TAK1_bRafINH_Inactive is "TAB1:TAB2:TAB3:TAK1_bRafINH_Inactive";  // hasPart uniprot:O43318; hasPart CHEBI:75047; hasPart uniprot:Q8N6C8; hasPart uniprot:Q15750
  species TAB1_TAB2_TAB3_TAK1_bRafINH_Active in Sphere_thyroid_cancer_cell = 0; TAB1_TAB2_TAB3_TAK1_bRafINH_Active is "TAB1:TAB2:TAB3:TAK1_bRafINH_Active";  // hasPart uniprot:Q9NYJ8; hasPart uniprot:Q8N5C8; hasPart uniprot:O43318; hasPart CHEBI:75047
  species NIK_bRafINH_Active in Sphere_thyroid_cancer_cell = 0;  // hasPart CHEBI:75047; hasPart uniprot:Q99558; hasProperty ncit:C45329
  species NIK_bRafINH_Inactive in Sphere_thyroid_cancer_cell = 1.5;  // hasPart uniprot:Q99558; hasPart CHEBI:75047; hasProperty PATO:0002355
  species IKKbeta_IKKalfa_IKKgamma_bRafINH_Active in Sphere_thyroid_cancer_cell = 0; IKKbeta_IKKalfa_IKKgamma_bRafINH_Active is "IKKbeta:IKKalfa:IKKgamma_bRafINH_Active";  // hasPart uniprot:Q9Y6K9; hasPart uniprot:O14920; hasPart uniprot:O15111; hasPart CHEBI:75047
  species IKKbeta_IKKalfa_IKKgamma_bRafINH_Inactive in Sphere_thyroid_cancer_cell = 1.5; IKKbeta_IKKalfa_IKKgamma_bRafINH_Inactive is "IKKbeta:IKKalfa:IKKgamma_bRafINH_Inactive";  // hasPart uniprot:O15111; hasPart uniprot:Q9Y6K9; hasPart CHEBI:75047; hasPart uniprot:O14920
  species Tpl2_NF_kB_bRafINH_Active in Sphere_thyroid_cancer_cell = 0; Tpl2_NF_kB_bRafINH_Active is "MAP3K8:NF-kB_bRafINH_Active";  // hasPart uniprot:P19838; hasPart CHEBI:75047; hasPart uniprot:P41279; hasProperty ncit:C45329
  species Tpl2_NF_kB_bRafINH_Inactive in Sphere_thyroid_cancer_cell = 1.5; Tpl2_NF_kB_bRafINH_Inactive is "MAP3K8:NF-kB_bRafINH_Inactive";  // hasPart uniprot:P41279; hasPart CHEBI:75047; hasPart uniprot:P19838; hasProperty PATO:0002355
  species TRAF1_TRAF2_TRAF3_bRafINH_Active in Sphere_thyroid_cancer_cell = 0; TRAF1_TRAF2_TRAF3_bRafINH_Active is "TRAF1:TRAF2:TRAF3_bRafINH_Active";  // hasPart uniprot:Q12933; hasPart uniprot:Q13077; hasPart CHEBI:75047; hasPart uniprot:Q13114
  species TRAF1_TRAF2_TRAF3_bRafINH_Inactive in Sphere_thyroid_cancer_cell = 4.5; TRAF1_TRAF2_TRAF3_bRafINH_Inactive is "TRAF1:TRAF2:TRAF3_bRafINH_Inactive";  // hasPart CHEBI:75047; hasPart uniprot:Q13077; hasPart uniprot:Q13114; hasPart uniprot:Q12933
  species Tpl2_NF_kB_RasINH_Active in Sphere_thyroid_cancer_cell = 0; Tpl2_NF_kB_RasINH_Active is "MAP3K8:NF-kB_RasINH_Active";  // hasPart uniprot:P19838; hasPart ncit:C1902; hasPart uniprot:P41279; hasProperty ncit:C45329
  species Tpl2_NF_kB_RasINH_Inactive in Sphere_thyroid_cancer_cell = 2.25; Tpl2_NF_kB_RasINH_Inactive is "MAP3K8:NF-kB_RasINH_Inactive";  // hasPart uniprot:P41279; hasPart ncit:C1902; hasPart uniprot:P19838; hasProperty PATO:0002355
  species mTORC2Inactive in Sphere_thyroid_cancer_cell = 10; mTORC2Inactive is "mTORC2_Inactive";  // isDerivedFrom PATO:0002355 uniprot:Q6R327; isDerivedFrom uniprot:P42345; hasProperty PATO:0002355
  species MAP3K8_inhibitor in Sphere_thyroid_cancer_cell = 10;  // hasProperty CHEBI:79091
  species MAP3K8_NF_kB_inhibited in Sphere_thyroid_cancer_cell = 0; MAP3K8_NF_kB_inhibited is "MAP3K8:NF-kB_inhibited";  // hasPart uniprot:P19838; hasPart uniprot:P41279

  // Reactions:
  Ras_Activation: Ras_Inactive => Ras_Active; Sphere_thyroid_cancer_cell*HMM_Modified(Ras_Activation_Kcat, Ras_Activation_km, Sos_Active, Ras_Inactive);  // modifiers: Sos_Active
    Ras_Activation_Kcat = 0.1; Ras_Activation_km = 0.1;
  Raf1_Activation: Raf1_Inactive => Raf1_Active; Sphere_thyroid_cancer_cell*HMM_Modified(Raf1_Activation_Kcat, Raf1_Activation_km, Ras_Active, Raf1_Inactive);  // modifiers: Ras_Active
    Raf1_Activation_Kcat = 0.12; Raf1_Activation_km = 0.1;
  Mek_Activation_Raf1: Mek_Inactive => Mek_Active; Sphere_thyroid_cancer_cell*HMM_Modified(Mek_Activation_Raf1_Kcat, Mek_Activation_Raf1_km, Raf1_Active, Mek_Inactive);  // modifiers: Raf1_Active
    Mek_Activation_Raf1_Kcat = 0.096; Mek_Activation_Raf1_km = 0.1;
  Erk_Activation: ERK => pERK; Sphere_thyroid_cancer_cell*HMM_Modified(Erk_Activation_Kcat, Erk_Activation_km, Mek_Active, ERK);  // modifiers: Mek_Active
    Erk_Activation_Kcat = 0.1; Erk_Activation_km = 0.1;
  PI3K_Activation_pEGFR: PI3K_Inactive => PI3K_Active; Sphere_thyroid_cancer_cell*HMM_Modified(PI3K_Activation_pEGFR_Kcat, PI3K_Activation_pEGFR_km, pEGFR, PI3K_Inactive);  // modifiers: pEGFR
    PI3K_Activation_pEGFR_Kcat = 0.1; PI3K_Activation_pEGFR_km = 0.1;
  PI3K_Activation_Ras: PI3K_Inactive => PI3K_Active; Sphere_thyroid_cancer_cell*HMM_Modified(PI3K_Activation_Ras_Kcat, PI3K_Activation_Ras_km, Ras_Active, PI3K_Inactive);  // modifiers: Ras_Active
    PI3K_Activation_Ras_Kcat = 0.1; PI3K_Activation_Ras_km = 0.1;
  PI3K_Deactivation: PI3K_Active => PI3K_Inactive; Sphere_thyroid_cancer_cell*PI3K_Deactivation_k1*PI3K_Active;
    PI3K_Deactivation_k1 = 0.1;
  Akt_Activation_PI3K: AKT => pAKT; Sphere_thyroid_cancer_cell*HMM_Modified(Akt_Activation_PI3K_Kcat, Akt_Activation_PI3K_km, PI3K_Active, AKT);  // modifiers: PI3K_Active
    Akt_Activation_PI3K_Kcat = 0.1; Akt_Activation_PI3K_km = 0.1;
  Raf1_Deactivation_Akt: Raf1_Active => Raf1_Inactive; Sphere_thyroid_cancer_cell*HMM_Modified(Raf1_Deactivation_Akt_Kcat, Raf1_Deactivation_Akt_km, pAKT, Raf1_Active);  // modifiers: pAKT
    Raf1_Deactivation_Akt_Kcat = 0.1; Raf1_Deactivation_Akt_km = 0.1;
  EGFR_Degradation: pEGFR => ; Sphere_thyroid_cancer_cell*EGFR_Degradation_k1*pEGFR;
    EGFR_Degradation_k1 = 0.1;
  Mek_Activation_bRafMutated: Mek_Inactive => Mek_Active; Sphere_thyroid_cancer_cell*HMM_Modified(Mek_Activation_bRafMutated_Kcat, Mek_Activation_bRafMutated_km, bRafMutated, Mek_Inactive);  // modifiers: bRafMutated
    Mek_Activation_bRafMutated_Kcat = 0.1; Mek_Activation_bRafMutated_km = 0.1;
  EGFR_Production: $pro_EGFR => free_EGFR; Sphere_thyroid_cancer_cell*EGFR_Production_k1*pro_EGFR;
    EGFR_Production_k1 = 0.1;
  PIP3_Activation_PIP3: PIP3Inactive => PIP3Active; Sphere_thyroid_cancer_cell*HMM_Modified(PIP3_Activation_PIP3_Kcat, PIP3_Activation_PIP3_km, PI3K_Active, PIP3Inactive);  // modifiers: PI3K_Active
    PIP3_Activation_PIP3_Kcat = 0.1; PIP3_Activation_PIP3_km = 0.1;
  PIP3_Feedback_Deactivation_PTEN: PIP3Active => PIP3Inactive; Sphere_thyroid_cancer_cell*HMM_Modified(PIP3_Feedback_Deactivation_PTEN_Kcat, PIP3_Feedback_Deactivation_PTEN_km, PTENActive, PIP3Active);  // modifiers: PTENActive; isInstanceOf ncit:C82652
    PIP3_Feedback_Deactivation_PTEN_Kcat = 0.1; PIP3_Feedback_Deactivation_PTEN_km = 0.1;
  Akt_Activation_PIP3: AKT => pAKT; Sphere_thyroid_cancer_cell*HMM_Modified(Akt_Activation_PIP3_Kcat, Akt_Activation_PIP3_km, PIP3Active, AKT);  // modifiers: PIP3Active
    Akt_Activation_PIP3_Kcat = 0.1; Akt_Activation_PIP3_km = 0.1;
  PDK1_Activation: PDK1Inactive => PDK1Active; Sphere_thyroid_cancer_cell*HMM_Modified(PDK1_Activation_Kcat, PDK1_Activation_km, PIP3Active, PDK1Inactive);  // modifiers: PIP3Active
    PDK1_Activation_Kcat = 0.1; PDK1_Activation_km = 0.1;
  PDK1_Deactivation: PDK1Active => PDK1Inactive; Sphere_thyroid_cancer_cell*PDK1_Deactivation_k1*PDK1Active;
    PDK1_Deactivation_k1 = 0.1;
  Akt_Activation_PDK1: AKT => pAKT; Sphere_thyroid_cancer_cell*HMM_Modified(Akt_Activation_PDK1_Kcat, Akt_Activation_PDK1_km, PDK1Active, AKT);  // modifiers: PDK1Active
    Akt_Activation_PDK1_Kcat = 0.1; Akt_Activation_PDK1_km = 0.1;
  Akt_Feedback_Activation_HSP90_Cdc37: AKT => pAKT; Sphere_thyroid_cancer_cell*HMM_Modified(Akt_Feedback_Activation_HSP90_Cdc37_Kcat, Akt_Feedback_Activation_HSP90_Cdc37_km, HSP90_Cdc37Active, AKT); Akt_Feedback_Activation_HSP90_Cdc37 is "Akt_Feedback_Activation_HSP90-Cdc37";  // modifiers: HSP90_Cdc37Active; isInstanceOf ncit:C82652
    Akt_Feedback_Activation_HSP90_Cdc37_Kcat = 0.1; Akt_Feedback_Activation_HSP90_Cdc37_km = 0.1;
  Akt_Feedback_Deactivation_PHLPP: pAKT => AKT; Sphere_thyroid_cancer_cell*HMM_Modified(Akt_Feedback_Deactivation_PHLPP_Kcat, Akt_Feedback_Deactivation_PHLPP_km, PHLPPActive, pAKT);  // modifiers: PHLPPActive; isInstanceOf ncit:C82652
    Akt_Feedback_Deactivation_PHLPP_Kcat = 0.1; Akt_Feedback_Deactivation_PHLPP_km = 0.1;
  Akt_Feedback_Activation_mTORC2: AKT => pAKT; Sphere_thyroid_cancer_cell*HMM_Modified(Akt_Feedback_Activation_mTORC2_Kcat, Akt_Feedback_Activation_mTORC2_km, mTORC2Active, AKT);  // modifiers: mTORC2Active; isInstanceOf ncit:C82652
    Akt_Feedback_Activation_mTORC2_Kcat = 0.1; Akt_Feedback_Activation_mTORC2_km = 0.1;
  Akt_Feedback_Activation_TCL1: AKT => pAKT; Sphere_thyroid_cancer_cell*HMM_Modified(Akt_Feedback_Activation_TCL1_Kcat, Akt_Feedback_Activation_TCL1_km, TCL1Active, AKT);  // modifiers: TCL1Active; isInstanceOf ncit:C82652
    Akt_Feedback_Activation_TCL1_Kcat = 0.1; Akt_Feedback_Activation_TCL1_km = 0.1;
  Akt_Feedback_Deactivation_CTMP: pAKT => AKT; Sphere_thyroid_cancer_cell*HMM_Modified(Akt_Feedback_Deactivation_CTMP_Kcat, Akt_Feedback_Deactivation_CTMP_km, CTMPActive, pAKT);  // modifiers: CTMPActive; isInstanceOf ncit:C82652
    Akt_Feedback_Deactivation_CTMP_Kcat = 0.1; Akt_Feedback_Deactivation_CTMP_km = 0.1;
  // http://link.springer.com/article/10.1007%2Fs10555-008-9119-x
  Erk_Feedback_Deactivation_Raf1: pERK => ERK; Sphere_thyroid_cancer_cell*HMM_Modified(Erk_Feedback_Deactivation_Raf1_Kcat, Erk_Feedback_Deactivation_Raf1_km, Raf1_Active, pERK);  // modifiers: Raf1_Active
    Erk_Feedback_Deactivation_Raf1_Kcat = 0.1; Erk_Feedback_Deactivation_Raf1_km = 0.1;
  // DOI:10.1186/1752-0509-3-100
  Sos_Deactivation: Sos_Active => Sos_Inactive; Sphere_thyroid_cancer_cell*Sos_Deactivation_k1*Sos_Active;
    Sos_Deactivation_k1 = 0.1;
  mTORC1_Activation_Akt: mTORC1Inactive => mTORC1Active; Sphere_thyroid_cancer_cell*HMM_Modified(mTORC1_Activation_Akt_Kcat, mTORC1_Activation_Akt_km, pAKT, mTORC1Inactive);  // modifiers: pAKT
    mTORC1_Activation_Akt_Kcat = 0.1; mTORC1_Activation_Akt_km = 0.1;
  EGFR_Degradation_Free: free_EGFR => ; Sphere_thyroid_cancer_cell*EGFR_Degradation_Free_k1*free_EGFR;
    EGFR_Degradation_Free_k1 = 0.1;
  Sos_Activation_Grb2: Sos_Inactive => Sos_Active; Sphere_thyroid_cancer_cell*HMM_Modified(Sos_Activation_Grb2_Kcat, Sos_Activation_Grb2_km, Grb2Active, Sos_Inactive);  // modifiers: Grb2Active
    Sos_Activation_Grb2_Kcat = 0.1; Sos_Activation_Grb2_km = 0.1;
  Grb2_Activation_pEGFR: Grb2Inactive => Grb2Active; Sphere_thyroid_cancer_cell*HMM_Modified(Grb2_Activation_pEGFR_Kcat, Grb2_Activation_pEGFR_km, pEGFR, Grb2Inactive);  // modifiers: pEGFR
    Grb2_Activation_pEGFR_Kcat = 0.1; Grb2_Activation_pEGFR_km = 0.1;
  Grb2_Deactivation: Grb2Active => Grb2Inactive; Sphere_thyroid_cancer_cell*Grb2_Deactivation_k1*Grb2Active;
    Grb2_Deactivation_k1 = 0.1;
  FGFR_Production: $proFGFR => freeFGFR; Sphere_thyroid_cancer_cell*FGFR_Production_k1*proFGFR;
    FGFR_Production_k1 = 0.1;
  FGFR_Degradation_Free: freeFGFR => ; Sphere_thyroid_cancer_cell*FGFR_Degradation_Free_k1*freeFGFR;
    FGFR_Degradation_Free_k1 = 0.1;
  FGFR_Degradation: pFGFR => ; Sphere_thyroid_cancer_cell*FGFR_Degradation_k1*pFGFR;
    FGFR_Degradation_k1 = 0.1;
  Grb2_Activation_pFGFR: Grb2Inactive => Grb2Active; Sphere_thyroid_cancer_cell*HMM_Modified(Grb2_Activation_pFGFR_Kcat, Grb2_Activation_pFGFR_km, pFGFR, Grb2Inactive);  // modifiers: pFGFR
    Grb2_Activation_pFGFR_Kcat = 0.1; Grb2_Activation_pFGFR_km = 0.1;
  TRADD_TRAF2_TRAF5_RIP1_Activation_pTNFR1: TRADD_TRAF2_TRAF5_RIP1_Inactive => TRADD_TRAF2_TRAF5_RIP1_Active; Sphere_thyroid_cancer_cell*HMM_Modified(TRADD_TRAF2_TRAF5_RIP1_Activation_pTNFR1_Kcat, TRADD_TRAF2_TRAF5_RIP1_Activation_pTNFR1_km, pTNFR1, TRADD_TRAF2_TRAF5_RIP1_Inactive); TRADD_TRAF2_TRAF5_RIP1_Activation_pTNFR1 is "TRADD:TRAF2:TRAF5:RIP1_Activation_pTNFR1";  // modifiers: pTNFR1
    TRADD_TRAF2_TRAF5_RIP1_Activation_pTNFR1_Kcat = 0.1; TRADD_TRAF2_TRAF5_RIP1_Activation_pTNFR1_km = 0.1;
  TRAF1_TRAF2_TRAF3_Activation_pTNFR2: TRAF1_TRAF2_TRAF3_Inactive => TRAF1_TRAF2_TRAF3_Active; Sphere_thyroid_cancer_cell*HMM_Modified(TRAF1_TRAF2_TRAF3_Activation_pTNFR2_Kcat, TRAF1_TRAF2_TRAF3_Activation_pTNFR2_km, pTNFR2, TRAF1_TRAF2_TRAF3_Inactive); TRAF1_TRAF2_TRAF3_Activation_pTNFR2 is "TRAF1:TRAF2:TRAF3_Activation_pTNFR2";  // modifiers: pTNFR2
    TRAF1_TRAF2_TRAF3_Activation_pTNFR2_Kcat = 0.1; TRAF1_TRAF2_TRAF3_Activation_pTNFR2_km = 0.1;
  PI3K_Activation_TRAF1_TRAF2_TRAF3: PI3K_Inactive => PI3K_Active; Sphere_thyroid_cancer_cell*HMM_Modified(PI3K_Activation_TRAF1_TRAF2_TRAF3_Kcat, PI3K_Activation_TRAF1_TRAF2_TRAF3_km, TRAF1_TRAF2_TRAF3_Active, PI3K_Inactive); PI3K_Activation_TRAF1_TRAF2_TRAF3 is "PI3K_Activation_TRAF1:TRAF2:TRAF3";  // modifiers: TRAF1_TRAF2_TRAF3_Active
    PI3K_Activation_TRAF1_TRAF2_TRAF3_Kcat = 0.1; PI3K_Activation_TRAF1_TRAF2_TRAF3_km = 0.1;
  NIK_Activation_TRADD_TRAF2_TRAF5_RIP1: NIKInactive => NIKActive; Sphere_thyroid_cancer_cell*HMM_Modified(NIK_Activation_TRADD_TRAF2_TRAF5_RIP1_Kcat, NIK_Activation_TRADD_TRAF2_TRAF5_RIP1_km, TRADD_TRAF2_TRAF5_RIP1_Active, NIKInactive); NIK_Activation_TRADD_TRAF2_TRAF5_RIP1 is "NIK_Activation_TRADD:TRAF2:TRAF5:RIP1";  // modifiers: TRADD_TRAF2_TRAF5_RIP1_Active
    NIK_Activation_TRADD_TRAF2_TRAF5_RIP1_Kcat = 0.1; NIK_Activation_TRADD_TRAF2_TRAF5_RIP1_km = 0.1;
  TAB1_TAB2_TAB3_TAK1_Activation_TRADD_TRAF2_TRAF5_RIP1: TAB1_TAB2_TAB3_TAK1_Inactive => TAB1_TAB2_TAB3_TAK1_Active; Sphere_thyroid_cancer_cell*HMM_Modified(TAB1_TAB2_TAB3_TAK1_Activation_TRADD_TRAF2_TRAF5_RIP1_Kcat, TAB1_TAB2_TAB3_TAK1_Activation_TRADD_TRAF2_TRAF5_RIP1_km, TRADD_TRAF2_TRAF5_RIP1_Active, TAB1_TAB2_TAB3_TAK1_Inactive); TAB1_TAB2_TAB3_TAK1_Activation_TRADD_TRAF2_TRAF5_RIP1 is "TAB1:TAB2:TAB3:TAK1_Activation_TRADD:TRAF2:TRAF5:RIP1";  // modifiers: TRADD_TRAF2_TRAF5_RIP1_Active
    TAB1_TAB2_TAB3_TAK1_Activation_TRADD_TRAF2_TRAF5_RIP1_Kcat = 0.1; TAB1_TAB2_TAB3_TAK1_Activation_TRADD_TRAF2_TRAF5_RIP1_km = 0.1;
  IKKbeta_IKKalfa_IKKgamma_Activation_TRADD_TRAF2_TRAF5_RIP1: IKKbeta_IKKalfa_IKKgamma_Inactive => IKKbeta_IKKalfa_IKKgamma_Active; Sphere_thyroid_cancer_cell*HMM_Modified(IKKbeta_IKKalfa_IKKgamma_Activation_TRADD_TRAF2_TRAF5_RIP1_Kcat, IKKbeta_IKKalfa_IKKgamma_Activation_TRADD_TRAF2_TRAF5_RIP1_km, TRADD_TRAF2_TRAF5_RIP1_Active, IKKbeta_IKKalfa_IKKgamma_Inactive); IKKbeta_IKKalfa_IKKgamma_Activation_TRADD_TRAF2_TRAF5_RIP1 is "IKKbeta:IKKalfa:IKKgamma_Activation_TRADD:TRAF2:TRAF5:RIP1";  // modifiers: TRADD_TRAF2_TRAF5_RIP1_Active
    IKKbeta_IKKalfa_IKKgamma_Activation_TRADD_TRAF2_TRAF5_RIP1_Kcat = 0.1; IKKbeta_IKKalfa_IKKgamma_Activation_TRADD_TRAF2_TRAF5_RIP1_km = 0.1;
  IKKbeta_IKKalfa_IKKgamma_Activation_NIK: IKKbeta_IKKalfa_IKKgamma_Inactive => IKKbeta_IKKalfa_IKKgamma_Active; Sphere_thyroid_cancer_cell*HMM_Modified(IKKbeta_IKKalfa_IKKgamma_Activation_NIK_Kcat, IKKbeta_IKKalfa_IKKgamma_Activation_NIK_km, NIKActive, IKKbeta_IKKalfa_IKKgamma_Inactive); IKKbeta_IKKalfa_IKKgamma_Activation_NIK is "IKKbeta:IKKalfa:IKKgamma_Activation_NIK";  // modifiers: NIKActive
    IKKbeta_IKKalfa_IKKgamma_Activation_NIK_Kcat = 0.1; IKKbeta_IKKalfa_IKKgamma_Activation_NIK_km = 0.1;
  IKKbeta_IKKalfa_IKKgamma_Activation_TAB1_TAB2_TAB3_TAK1: IKKbeta_IKKalfa_IKKgamma_Inactive => IKKbeta_IKKalfa_IKKgamma_Active; Sphere_thyroid_cancer_cell*HMM_Modified(IKKbeta_IKKalfa_IKKgamma_Activation_TAB1_TAB2_TAB3_TAK1_Kcat, IKKbeta_IKKalfa_IKKgamma_Activation_TAB1_TAB2_TAB3_TAK1_km, TAB1_TAB2_TAB3_TAK1_Active, IKKbeta_IKKalfa_IKKgamma_Inactive); IKKbeta_IKKalfa_IKKgamma_Activation_TAB1_TAB2_TAB3_TAK1 is "IKKbeta:IKKalfa:IKKgamma_Activation_TAB1:TAB2:TAB3:TAK1";  // modifiers: TAB1_TAB2_TAB3_TAK1_Active
    IKKbeta_IKKalfa_IKKgamma_Activation_TAB1_TAB2_TAB3_TAK1_Kcat = 0.1; IKKbeta_IKKalfa_IKKgamma_Activation_TAB1_TAB2_TAB3_TAK1_km = 0.1;
  Tpl2_NF_kB_Activation_IKKbeta_IKKalfa: Tpl2_NF_kB_Inactive => Tpl2_NF_kB_Active; Sphere_thyroid_cancer_cell*HMM_Modified(Tpl2_NF_kB_Activation_IKKbeta_IKKalfa_Kcat, Tpl2_NF_kB_Activation_IKKbeta_IKKalfa_km, IKKbeta_IKKalfa_IKKgamma_Active, Tpl2_NF_kB_Inactive); Tpl2_NF_kB_Activation_IKKbeta_IKKalfa is "MAP3K8:NF-kB_Activation_IKKbeta:IKKalfa";  // modifiers: IKKbeta_IKKalfa_IKKgamma_Active
    Tpl2_NF_kB_Activation_IKKbeta_IKKalfa_Kcat = 0.1; Tpl2_NF_kB_Activation_IKKbeta_IKKalfa_km = 0.1;
  Mek_Activation__Tpl2_NF_kB: Mek_Inactive => Mek_Active; Sphere_thyroid_cancer_cell*HMM_Modified(Mek_Activation__Tpl2_NF_kB_Kcat, Mek_Activation__Tpl2_NF_kB_km, Tpl2_NF_kB_Active, Mek_Inactive); Mek_Activation__Tpl2_NF_kB is "Mek_Activation_MAP3K8:NF-kB";  // modifiers: Tpl2_NF_kB_Active
    Mek_Activation__Tpl2_NF_kB_Kcat = 0.1; Mek_Activation__Tpl2_NF_kB_km = 0.1;
  TNFR1_Production: $proTNFR1 => freeTNFR1; Sphere_thyroid_cancer_cell*TNFR1_Production_k1*proTNFR1;
    TNFR1_Production_k1 = 0.1;
  TNFR2_Production: $proTNFR2 => freeTNFR2; Sphere_thyroid_cancer_cell*TNFR2_Production_k1*proTNFR2;
    TNFR2_Production_k1 = 0.1;
  TNFR1_Degradation_Free: freeTNFR1 => ; Sphere_thyroid_cancer_cell*TNFR1_Degradation_Free_k1*freeTNFR1;
    TNFR1_Degradation_Free_k1 = 0.1;
  TNFR2_Degradation_Free: freeTNFR2 => ; Sphere_thyroid_cancer_cell*TNFR2_Degradation_Free_k1*freeTNFR2;
    TNFR2_Degradation_Free_k1 = 0.1;
  TNFR1_Degradation: pTNFR1 => ; Sphere_thyroid_cancer_cell*TNFR1_Degradation_k1*pTNFR1;
    TNFR1_Degradation_k1 = 0.1;
  TNFR2_Degradation: pTNFR2 => ; Sphere_thyroid_cancer_cell*TNFR2_Degradation_k1*pTNFR2;
    TNFR2_Degradation_k1 = 0.1;
  IKKbeta_IKKalfa_IKKgamma_Deactivation: IKKbeta_IKKalfa_IKKgamma_Active => IKKbeta_IKKalfa_IKKgamma_Inactive; Sphere_thyroid_cancer_cell*IKKbeta_IKKalfa_IKKgamma_Deactivation_k1*IKKbeta_IKKalfa_IKKgamma_Active; IKKbeta_IKKalfa_IKKgamma_Deactivation is "IKKbeta:IKKalfa:IKKgamma_Deactivation";
    IKKbeta_IKKalfa_IKKgamma_Deactivation_k1 = 0.1;
  Mek_Deactivation: Mek_Active => Mek_Inactive; Sphere_thyroid_cancer_cell*Mek_Deactivation_k1*Mek_Active;
    Mek_Deactivation_k1 = 0.1;
  mTORC1_Deactivation: mTORC1Active => mTORC1Inactive; Sphere_thyroid_cancer_cell*mTORC1_Deactivation_k1*mTORC1Active;
    mTORC1_Deactivation_k1 = 0.1;
  NIK_Deactivation: NIKActive => NIKInactive; Sphere_thyroid_cancer_cell*NIK_Deactivation_k1*NIKActive;
    NIK_Deactivation_k1 = 0.1;
  Ras_Deactivation: Ras_Active => Ras_Inactive; Sphere_thyroid_cancer_cell*Ras_Deactivation_k1*Ras_Active;
    Ras_Deactivation_k1 = 0.1;
  TAB1_TAB2_TAB3_TAK1_Deactivation: TAB1_TAB2_TAB3_TAK1_Active => TAB1_TAB2_TAB3_TAK1_Inactive; Sphere_thyroid_cancer_cell*TAB1_TAB2_TAB3_TAK1_Deactivation_k1*TAB1_TAB2_TAB3_TAK1_Active; TAB1_TAB2_TAB3_TAK1_Deactivation is "TAB1:TAB2:TAB3:TAK1_Deactivation";
    TAB1_TAB2_TAB3_TAK1_Deactivation_k1 = 0.1;
  Tpl2_NF_kB_Deactivation: Tpl2_NF_kB_Active => Tpl2_NF_kB_Inactive; Sphere_thyroid_cancer_cell*Tpl2_NF_kB_Deactivation_k1*Tpl2_NF_kB_Active; Tpl2_NF_kB_Deactivation is "MAP3K8:NF-kB_Deactivation";
    Tpl2_NF_kB_Deactivation_k1 = 0.1;
  TRADD_TRAF2_TRAF5_RIP1_Deactivation: TRADD_TRAF2_TRAF5_RIP1_Active => TRADD_TRAF2_TRAF5_RIP1_Inactive; Sphere_thyroid_cancer_cell*TRADD_TRAF2_TRAF5_RIP1_Deactivation_k1*TRADD_TRAF2_TRAF5_RIP1_Active; TRADD_TRAF2_TRAF5_RIP1_Deactivation is "TRADD:TRAF2:TRAF5:RIP1_Deactivation";
    TRADD_TRAF2_TRAF5_RIP1_Deactivation_k1 = 0.1;
  TRAF1_TRAF2_TRAF3_Deactivation: TRAF1_TRAF2_TRAF3_Active => TRAF1_TRAF2_TRAF3_Inactive; Sphere_thyroid_cancer_cell*TRAF1_TRAF2_TRAF3_Deactivation_k1*TRAF1_TRAF2_TRAF3_Active; TRAF1_TRAF2_TRAF3_Deactivation is "TRAF1:TRAF2:TRAF3_Deactivation";
    TRAF1_TRAF2_TRAF3_Deactivation_k1 = 0.1;
  TRADDComplex_Activation_bRafINH: TRADD_TRAF2_TRAF5_RIP1_bRafINH_Inactive => TRADD_TRAF2_TRAF5_RIP1_bRafINH_Active; Sphere_thyroid_cancer_cell*HMM_Modified(TRADDComplex_Activation_bRafINH_Kcat, TRADDComplex_Activation_bRafINH_km, TRADD_TRAF2_TRAF5_RIP1_Inactive, TRADD_TRAF2_TRAF5_RIP1_bRafINH_Inactive);  // modifiers: TRADD_TRAF2_TRAF5_RIP1_Inactive
    TRADDComplex_Activation_bRafINH_Kcat = 0.1; TRADDComplex_Activation_bRafINH_km = 0.1;
  TABComplex_Activation_bRafINH: TAB1_TAB2_TAB3_TAK1_bRafINH_Inactive => TAB1_TAB2_TAB3_TAK1_bRafINH_Active; Sphere_thyroid_cancer_cell*HMM_Modified(TABComplex_Activation_bRafINH_Kcat, TABComplex_Activation_bRafINH_km, TAB1_TAB2_TAB3_TAK1_Inactive, TAB1_TAB2_TAB3_TAK1_bRafINH_Inactive);  // modifiers: TAB1_TAB2_TAB3_TAK1_Inactive
    TABComplex_Activation_bRafINH_Kcat = 0.1; TABComplex_Activation_bRafINH_km = 0.1;
  NIK_Activation_bRafINH: NIK_bRafINH_Inactive => NIK_bRafINH_Active; Sphere_thyroid_cancer_cell*HMM_Modified(NIK_Activation_bRafINH_Kcat, NIK_Activation_bRafINH_km, NIKInactive, NIK_bRafINH_Inactive);  // modifiers: NIKInactive
    NIK_Activation_bRafINH_Kcat = 0.1; NIK_Activation_bRafINH_km = 0.1;
  IKKComplex_Activation_bRafINH: IKKbeta_IKKalfa_IKKgamma_bRafINH_Inactive => IKKbeta_IKKalfa_IKKgamma_bRafINH_Active; Sphere_thyroid_cancer_cell*HMM_Modified(IKKComplex_Activation_bRafINH_Kcat, IKKComplex_Activation_bRafINH_km, IKKbeta_IKKalfa_IKKgamma_Inactive, IKKbeta_IKKalfa_IKKgamma_bRafINH_Inactive);  // modifiers: IKKbeta_IKKalfa_IKKgamma_Inactive
    IKKComplex_Activation_bRafINH_Kcat = 0.1; IKKComplex_Activation_bRafINH_km = 0.1;
  Tpl2Complex_Activation_bRafINH: Tpl2_NF_kB_bRafINH_Inactive => Tpl2_NF_kB_bRafINH_Active; Sphere_thyroid_cancer_cell*HMM_Modified(Tpl2Complex_Activation_bRafINH_Kcat, Tpl2Complex_Activation_bRafINH_km, Tpl2_NF_kB_Inactive, Tpl2_NF_kB_bRafINH_Inactive); Tpl2Complex_Activation_bRafINH is "MAP3K8Complex_Activation_bRafINH";  // modifiers: Tpl2_NF_kB_Inactive
    Tpl2Complex_Activation_bRafINH_Kcat = 0.1; Tpl2Complex_Activation_bRafINH_km = 0.1;
  TRAFComplex_Activation_bRafINH: TRAF1_TRAF2_TRAF3_bRafINH_Inactive => TRAF1_TRAF2_TRAF3_bRafINH_Active; Sphere_thyroid_cancer_cell*HMM_Modified(TRAFComplex_Activation_bRafINH_Kcat, TRAFComplex_Activation_bRafINH_km, TRAF1_TRAF2_TRAF3_Inactive, TRAF1_TRAF2_TRAF3_bRafINH_Inactive);  // modifiers: TRAF1_TRAF2_TRAF3_Inactive
    TRAFComplex_Activation_bRafINH_Kcat = 0.1; TRAFComplex_Activation_bRafINH_km = 0.1;
  // The k1 parameter was set in a way that it reflects the half life of PLX4032 drug i.e., 57hrs (205200s)
  // C(t)=C0*e^(-ket) where ke is the half life constant.
  // http://www.calculator.net/half-life-calculator.html
  PLX4032_degradation: PLX4032 => ; Sphere_thyroid_cancer_cell*PLX4032_degradation_k1*PLX4032;
    PLX4032_degradation_k1 = 3.3779e-6;
  bRafMutated_Deactivation_PLX4032: bRafMutated => bRafMutatedInactive; Sphere_thyroid_cancer_cell*HMM_Modified(bRafMutated_Deactivation_PLX4032_Kcat, bRafMutated_Deactivation_PLX4032_km, PLX4032, bRafMutated);  // modifiers: PLX4032
    bRafMutated_Deactivation_PLX4032_Kcat = 0.1; bRafMutated_Deactivation_PLX4032_km = 0.1;
  bRafMutated_Reconstitution: bRafMutatedInactive => bRafMutated; Sphere_thyroid_cancer_cell*bRafMutated_Reconstitution_k1*bRafMutatedInactive; bRafMutated_Reconstitution is "bRafMutated_Activation";
    bRafMutated_Reconstitution_k1 = 0.1;
  Tpl2Complex_Activation_RasINH: Tpl2_NF_kB_RasINH_Inactive => Tpl2_NF_kB_RasINH_Active; Sphere_thyroid_cancer_cell*HMM_Modified(Tpl2Complex_Activation_RasINH_Kcat, Tpl2Complex_Activation_RasINH_km, Tpl2_NF_kB_Inactive, Tpl2_NF_kB_RasINH_Inactive); Tpl2Complex_Activation_RasINH is "MAP3K8Complex_Activation_RasINH";  // modifiers: Tpl2_NF_kB_Inactive
    Tpl2Complex_Activation_RasINH_Kcat = 0.1; Tpl2Complex_Activation_RasINH_km = 0.1;
  mTORC2_Deactivation_bRafMutated: mTORC2Active => mTORC2Inactive; Sphere_thyroid_cancer_cell*HMM_Modified(mTORC2_Deactivation_bRafMutated_Kcat, mTORC2_Deactivation_bRafMutated_km, bRafMutated, mTORC2Active);  // modifiers: bRafMutated
    mTORC2_Deactivation_bRafMutated_Kcat = 0.1; mTORC2_Deactivation_bRafMutated_km = 0.1;
  mTORC2_Activation_PI3K: mTORC2Inactive => mTORC2Active; Sphere_thyroid_cancer_cell*HMM_Modified(mTORC2_Activation_PI3K_Kcat, mTORC2_Activation_PI3K_km, PI3K_Active, mTORC2Inactive);  // modifiers: PI3K_Active
    mTORC2_Activation_PI3K_Kcat = 0.1; mTORC2_Activation_PI3K_km = 0.1;
  MAP3K8Complex_pERK_bRafINH: Tpl2_NF_kB_bRafINH_Active => pERK; Sphere_thyroid_cancer_cell*HMM_Modified_Inverted(bRafMutated, MAP3K8Complex_pERK_bRafINH_Kcat, Tpl2_NF_kB_bRafINH_Active, MAP3K8Complex_pERK_bRafINH_km);  // modifiers: bRafMutated
    MAP3K8Complex_pERK_bRafINH_Kcat = 0.1; MAP3K8Complex_pERK_bRafINH_km = 0.1;
  TRADDComplex_pERK_bRafINH: TRADD_TRAF2_TRAF5_RIP1_bRafINH_Active => pERK; Sphere_thyroid_cancer_cell*HMM_Modified_Inverted(bRafMutated, TRADDComplex_pERK_bRafINH_Kcat, TRADD_TRAF2_TRAF5_RIP1_bRafINH_Active, TRADDComplex_pERK_bRafINH_km);  // modifiers: bRafMutated
    TRADDComplex_pERK_bRafINH_Kcat = 0.1; TRADDComplex_pERK_bRafINH_km = 0.1;
  IKKComplex_pERK_bRafINH: IKKbeta_IKKalfa_IKKgamma_bRafINH_Active => pERK; Sphere_thyroid_cancer_cell*HMM_Modified_Inverted(bRafMutated, IKKComplex_pERK_bRafINH_Kcat, IKKbeta_IKKalfa_IKKgamma_bRafINH_Active, IKKComplex_pERK_bRafINH_km);  // modifiers: bRafMutated
    IKKComplex_pERK_bRafINH_Kcat = 0.1; IKKComplex_pERK_bRafINH_km = 0.1;
  NIK_pERK_bRafINH: NIK_bRafINH_Active => pERK; Sphere_thyroid_cancer_cell*HMM_Modified_Inverted(bRafMutated, NIK_pERK_bRafINH_Kcat, NIK_bRafINH_Active, NIK_pERK_bRafINH_km);  // modifiers: bRafMutated
    NIK_pERK_bRafINH_Kcat = 0.1; NIK_pERK_bRafINH_km = 0.1;
  TABComplex_pERK_bRafINH: TAB1_TAB2_TAB3_TAK1_bRafINH_Active => pERK; Sphere_thyroid_cancer_cell*HMM_Modified_Inverted(bRafMutated, TABComplex_pERK_bRafINH_Kcat, TAB1_TAB2_TAB3_TAK1_bRafINH_Active, TABComplex_pERK_bRafINH_km);  // modifiers: bRafMutated
    TABComplex_pERK_bRafINH_Kcat = 0.1; TABComplex_pERK_bRafINH_km = 0.1;
  EGF_Binding_Unbinding__forward: $EGF + free_EGFR => pEGFR; Sphere_thyroid_cancer_cell*EGF_Binding_Unbinding__forward_k1*EGF*free_EGFR; EGF_Binding_Unbinding__forward is "EGF_Binding_Unbinding (forward)";
    EGF_Binding_Unbinding__forward_k1 = 0.1;
  EGF_Binding_Unbinding__backward: pEGFR => $EGF + free_EGFR; Sphere_thyroid_cancer_cell*EGF_Binding_Unbinding__backward_k1*pEGFR; EGF_Binding_Unbinding__backward is "EGF_Binding_Unbinding (backward)";
    EGF_Binding_Unbinding__backward_k1 = 0.1;
  FGF_Binding_Unbinding__forward: $FGF + freeFGFR => pFGFR; Sphere_thyroid_cancer_cell*FGF_Binding_Unbinding__forward_k1*FGF*freeFGFR; FGF_Binding_Unbinding__forward is "FGF_Binding_Unbinding (forward)";
    FGF_Binding_Unbinding__forward_k1 = 0.1;
  FGF_Binding_Unbinding__backward: pFGFR => $FGF + freeFGFR; Sphere_thyroid_cancer_cell*FGF_Binding_Unbinding__backward_k1*pFGFR; FGF_Binding_Unbinding__backward is "FGF_Binding_Unbinding (backward)";
    FGF_Binding_Unbinding__backward_k1 = 0.1;
  TNF_Binding_Unbinding_TNFR1__forward: $TNF + freeTNFR1 => pTNFR1; Sphere_thyroid_cancer_cell*TNF_Binding_Unbinding_TNFR1__forward_k1*TNF*freeTNFR1; TNF_Binding_Unbinding_TNFR1__forward is "TNF_Binding_Unbinding_TNFR1 (forward)";
    TNF_Binding_Unbinding_TNFR1__forward_k1 = 0.1;
  TNF_Binding_Unbinding_TNFR1__backward: pTNFR1 => $TNF + freeTNFR1; Sphere_thyroid_cancer_cell*TNF_Binding_Unbinding_TNFR1__backward_k1*pTNFR1; TNF_Binding_Unbinding_TNFR1__backward is "TNF_Binding_Unbinding_TNFR1 (backward)";
    TNF_Binding_Unbinding_TNFR1__backward_k1 = 0.1;
  TNF_Binding_Unbinding_TNFR2__forward: $TNF + freeTNFR2 => pTNFR2; Sphere_thyroid_cancer_cell*TNF_Binding_Unbinding_TNFR2__forward_k1*TNF*freeTNFR2; TNF_Binding_Unbinding_TNFR2__forward is "TNF_Binding_Unbinding_TNFR2 (forward)";
    TNF_Binding_Unbinding_TNFR2__forward_k1 = 0.1;
  TNF_Binding_Unbinding_TNFR2__backward: pTNFR2 => $TNF + freeTNFR2; Sphere_thyroid_cancer_cell*TNF_Binding_Unbinding_TNFR2__backward_k1*pTNFR2; TNF_Binding_Unbinding_TNFR2__backward is "TNF_Binding_Unbinding_TNFR2 (backward)";
    TNF_Binding_Unbinding_TNFR2__backward_k1 = 0.1;
  MAP3K8_NF_kB_Deactivation_MAP3K8_inhibitor: Tpl2_NF_kB_Inactive + MAP3K8_inhibitor => MAP3K8_NF_kB_inhibited; Sphere_thyroid_cancer_cell*MAP3K8_NF_kB_Deactivation_MAP3K8_inhibitor_k1*Tpl2_NF_kB_Inactive*MAP3K8_inhibitor; MAP3K8_NF_kB_Deactivation_MAP3K8_inhibitor is "MAP3K8:NF-kB_Deactivation_MAP3K8_inhibitor";
    MAP3K8_NF_kB_Deactivation_MAP3K8_inhibitor_k1 = 0.015;

  // Unit definitions:
  unit volume = 1e-3 litre;
  unit substance = 1e-9 mole;
end
