// SBML level 2 version 4
// dcterms:bibliographicCitation: The PI3K and MAPK/p38 pathways control stress granuleassembly in a hierarchical manner model 3 urn:miriam:pubmed:30923191

function Function_for_reaction2_0(X1_0, X1_1, Y1, default)
  (X1_0*Y1 - X1_1)/default;
end

function Function_for_reaction3_0(X11_1, X11_3, X1_1, X2_0, X2_2, a1_X2_0, b_X2_2, default)
  (X2_2*b_X2_2 - X1_1*X2_0 - X2_0*a1_X2_0*(X11_1 + X11_3))/default;
end

function Function_for_reaction1_0(X1_0, X1_1, Y1, default)
  (X1_1 - X1_0*Y1)/default;
end

function Function_for_reaction6_0(X2_1, X4_0, X4_1, Y3, Y4, a_X4_0, b_X4_1, default, k_stress_1)
  (X4_1*b_X4_1 + X4_0*(X2_1*a_X4_0 + Y3*k_stress_1)*(Y4 - 1))/default;
end

function Function_for_reaction5_0(X11_1, X11_3, X2_0, X2_1, X2_2, a1_X2_0, b_X2_2, default)
  (X2_1*(X11_1 + X11_3) - X2_2*b_X2_2 + X2_0*a1_X2_0*(X11_1 + X11_3))/default;
end

function Function_for_reaction10_0(X4_1, X5_1, X8_0, X8_1, X8_2, Y3, Y5, a1_X8_0, a2_X8_0, b_X8_1, b_X8_2, default, k_stress_2)
  (X8_1*b_X8_1 + X8_2*b_X8_2 + X8_0*(0.83*Y5 - 1)*(X4_1*a2_X8_0 + Y3*k_stress_2) + X5_1*X8_0*a1_X8_0*(0.83*Y5 - 1))/default;
end

function Function_for_reaction9_0(X4_1, X5_0, X5_1, a_X5_0, b_X5_1, default)
  (X4_1*X5_0*a_X5_0 - X5_1*b_X5_1)/default;
end

function Function_for_reaction7_0(X2_1, X4_0, X4_1, Y3, Y4, a_X4_0, b_X4_1, default, k_stress_1)
  (-X4_1*b_X4_1 - X4_0*(X2_1*a_X4_0 + Y3*k_stress_1)*(Y4 - 1))/default;
end

function Function_for_reaction4_0(X11_1, X11_3, X1_1, X2_0, X2_1, default)
  (X1_1*X2_0 - X2_1*(X11_1 + X11_3))/default;
end

function Function_for_reaction8_0(X4_1, X5_0, X5_1, a_X5_0, b_X5_1, default)
  (X5_1*b_X5_1 - X4_1*X5_0*a_X5_0)/default;
end

function Function_for_reaction13_0(X4_1, X5_1, X8_1, X8_2, X8_3, Y5, a1_X8_0, a2_X8_0, b_X8_1, b_X8_2, default)
  (-X8_3*b_X8_1 - X8_3*b_X8_2 - 2*X4_1*X8_1*a1_X8_0*(0.83*Y5 - 1) - 2*X5_1*X8_2*a2_X8_0*(0.83*Y5 - 1))/default;
end

function Function_for_reaction11_0(X4_1, X5_1, X8_0, X8_1, X8_3, Y5, a1_X8_0, b_X8_1, b_X8_2, default)
  (X8_3*b_X8_2 - X8_1*b_X8_1 + 2*X4_1*X8_1*a1_X8_0*(0.83*Y5 - 1) - X5_1*X8_0*a1_X8_0*(0.83*Y5 - 1))/default;
end

function Function_for_reaction12_0(X4_1, X5_1, X8_0, X8_2, X8_3, Y3, Y5, a2_X8_0, b_X8_1, b_X8_2, default, k_stress_2)
  (X8_3*b_X8_1 - X8_2*b_X8_2 - X8_0*(0.83*Y5 - 1)*(X4_1*a2_X8_0 + Y3*k_stress_2) + 2*X5_1*X8_2*a2_X8_0*(0.83*Y5 - 1))/default;
end

function Function_for_reaction14_0(X8_1, X8_3, X9_0, X9_2, a2_X9_0, b_X9_2, default)
  (X9_2*b_X9_2 - X9_0*a2_X9_0*(X8_1 + X8_3))/default;
end

function Function_for_reaction15_0(X8_1, X8_3, X9_0, X9_2, a2_X9_0, b_X9_2, default)
  (X9_0*a2_X9_0*(X8_1 + X8_3) - X9_2*b_X9_2)/default;
end

function Function_for_reaction21_1_0(X10_0, X10_1, X10_2, X10_3, X11_0, X11_1, X11_3, X5_0, X9_0, X9_2, Y2, a1_X11_0, a_X6_Y2, b_X11_1, b_X11_2, default)
  (X11_3*b_X11_2 - X11_1*b_X11_1 + X11_0*(Y2*a_X6_Y2 + a1_X11_0*(X10_0/(X10_0 + X10_1 + X10_2 + X10_3) - 1)*(X9_0/(X9_0 + X9_2) - 1)) - 2*X11_1*X5_0*a1_X11_0)/default;
end

function Function_for_reaction16_1_0(X10_0, X10_1, X10_2, X10_3, X8_1, X8_3, X9_0, X9_2, Y2, a1_X10_0, a2_X10_0, a_X6_Y2, b_X10_1, b_X10_2, default)
  (X10_1*b_X10_1 + X10_2*b_X10_2 - X10_0*(Y2*a_X6_Y2 + a1_X10_0*(X10_0/(X10_0 + X10_1 + X10_2 + X10_3) - 1)*(X9_0/(X9_0 + X9_2) - 1)) - X10_0*a2_X10_0*(X8_1 + X8_3))/default;
end

function Function_for_reaction17_1_0(X10_0, X10_1, X10_2, X10_3, X8_1, X8_3, X9_0, X9_2, Y2, a1_X10_0, a_X10_1, a_X6_Y2, b_X10_1, b_X10_2, default)
  (X10_3*b_X10_2 - X10_1*b_X10_1 + X10_0*(Y2*a_X6_Y2 + a1_X10_0*(X10_0/(X10_0 + X10_1 + X10_2 + X10_3) - 1)*(X9_0/(X9_0 + X9_2) - 1)) - X10_1*a_X10_1*(X8_1 + X8_3))/default;
end

function Function_for_reaction22_1_0(X10_0, X10_1, X10_2, X10_3, X11_0, X11_2, X11_3, X5_0, X9_0, X9_2, Y2, a2_X11_0, a_X6_Y2, b_X11_1, b_X11_2, default)
  (X11_3*b_X11_1 - X11_2*b_X11_2 - X11_2*(Y2*a_X6_Y2 + 2*a2_X11_0*(X10_0/(X10_0 + X10_1 + X10_2 + X10_3) - 1)*(X9_0/(X9_0 + X9_2) - 1)) + X11_0*X5_0*a2_X11_0)/default;
end

function Function_for_reaction23_1_0(X10_0, X10_1, X10_2, X10_3, X11_1, X11_2, X11_3, X5_0, X9_0, X9_2, Y2, a1_X11_0, a2_X11_0, a_X6_Y2, b_X11_1, b_X11_2, default)
  (X11_2*(Y2*a_X6_Y2 + 2*a2_X11_0*(X10_0/(X10_0 + X10_1 + X10_2 + X10_3) - 1)*(X9_0/(X9_0 + X9_2) - 1)) - X11_3*b_X11_2 - X11_3*b_X11_1 + 2*X11_1*X5_0*a1_X11_0)/default;
end

function Function_for_reaction24_1_0(X10_0, X10_1, X10_2, X10_3, X12_0, X12_1, X9_0, X9_2, Y2, a_X12_0, a_X6_Y2, b_X12_1, default)
  (X12_1*b_X12_1 - X12_0*(Y2*a_X6_Y2 + a_X12_0*(X10_0/(X10_0 + X10_1 + X10_2 + X10_3) - 1)*(X9_0/(X9_0 + X9_2) - 1)))/default;
end

function Function_for_reaction18_1_0(X10_0, X10_1, X10_2, X10_3, X8_1, X8_3, X9_0, X9_2, Y2, a2_X10_0, a_X10_2, a_X6_Y2, b_X10_1, b_X10_2, default)
  (X10_3*b_X10_1 - X10_2*b_X10_2 - X10_2*(Y2*a_X6_Y2 + a_X10_2*(X10_0/(X10_0 + X10_1 + X10_2 + X10_3) - 1)*(X9_0/(X9_0 + X9_2) - 1)) + X10_0*a2_X10_0*(X8_1 + X8_3))/default;
end

function Function_for_reaction25_1_0(X10_0, X10_1, X10_2, X10_3, X12_0, X12_1, X9_0, X9_2, Y2, a_X12_0, a_X6_Y2, b_X12_1, default)
  (X12_0*(Y2*a_X6_Y2 + a_X12_0*(X10_0/(X10_0 + X10_1 + X10_2 + X10_3) - 1)*(X9_0/(X9_0 + X9_2) - 1)) - X12_1*b_X12_1)/default;
end

function Function_for_reaction19_1_0(X10_0, X10_1, X10_2, X10_3, X8_1, X8_3, X9_0, X9_2, Y2, a_X10_1, a_X10_2, a_X6_Y2, b_X10_1, b_X10_2, default)
  (X10_2*(Y2*a_X6_Y2 + a_X10_2*(X10_0/(X10_0 + X10_1 + X10_2 + X10_3) - 1)*(X9_0/(X9_0 + X9_2) - 1)) - X10_3*b_X10_2 - X10_3*b_X10_1 + X10_1*a_X10_1*(X8_1 + X8_3))/default;
end

function Function_for_reaction20_1_0(X10_0, X10_1, X10_2, X10_3, X11_0, X11_1, X11_2, X5_0, X9_0, X9_2, Y2, a1_X11_0, a2_X11_0, a_X6_Y2, b_X11_1, b_X11_2, default)
  (X11_1*b_X11_1 + X11_2*b_X11_2 - X11_0*(Y2*a_X6_Y2 + a1_X11_0*(X10_0/(X10_0 + X10_1 + X10_2 + X10_3) - 1)*(X9_0/(X9_0 + X9_2) - 1)) - X11_0*X5_0*a2_X11_0)/default;
end

model HeberleRazquinNavas2019_The_PI3K_and_MAPK_p38_pathways_control_stress_granuleassembly_in_a_hierarchical_manner_model_3()
  // All cells and organisms exhibit stress-coping mechanisms toensure survival. Cytoplasmic protein-RNA assemblies termedstress granules are increasingly recognized to promote cellularsurvival under stress. Thus, they might represent tumor vul-nerabilities that are currently poorly explored. The translation-inhibitory eIF2αkinases are established as main drivers ofstress granule assembly. Using a systems approach, we identifythe translation enhancers PI3K and MAPK/p38 as pro-stress-granule-kinases. They act through the metabolic master regu-lator mammalian target of rapamycin complex 1 (mTORC1) topromote stress granule assembly. When highly active, PI3K is themain driver of stress granules; however, the impact of p38becomes apparent as PI3K activity declines. PI3K and p38 thusact in a hierarchical manner to drive mTORC1 activity and stressgranule assembly. Of note, this signaling hierarchy is also presentin human breast cancer tissue. Importantly, only the recognition ofthe PI3K-p38 hierarchy under stress enabled the discovery of p38’srole in stress granule formation. In summary, we assign a new pro-survival function to the key oncogenic kinases PI3K and p38, as theyhierarchically promote stress granule formation
  // isDescribedBy pubmed:30923191
  // hasProperty mamo:MAMO_0000046
  // hasTaxon taxonomy:9606
  // biomodels.db:MODEL2001030001 biomodels.db:BIOMD0000000907

  // Compartments:
  compartment default = 1;

  // Species:
  species X1_0 in default = 1;
  species X1_1 in default = 0;
  species X2_0 in default = init_X2_0_MCF7_Wm;
  species X2_1 in default = 0;
  species X2_2 in default = init_X2_2_MCF7_Wm;
  species X4_0 in default = 1;
  species X4_1 in default = 0;
  species X5_0 in default = init_X5_0_MCF7_Wm;
  species X5_1 in default = 0;
  species X8_0 in default = init_X8_0_MCF7_Wm;
  species X8_1 in default = init_X8_1_MCF7_Ars*init_X8_1_MCF7_WmFr;
  species X8_2 in default = init_X8_2_MCF7_Ars*init_X8_2_MCF7_WmFr;
  species X8_3 in default = 0;
  species X9_0 in default = init_X9_0_MCF7_Wm;
  species X9_2 in default = init_X9_2_MCF7_Wm;
  species X10_0 in default = init_X10_0_MCF7_Wm;
  species X10_1 in default = init_X10_1_MCF7_Wm;
  species X10_2 in default = init_X10_2_MCF7_Wm;
  species X10_3 in default = 0;
  species X11_0 in default = init_X11_0_MCF7_Wm;
  species X11_1 in default = init_X11_1_MCF7_Wm;
  species X11_2 in default = init_X11_2_MCF7_Wm;
  species X11_3 in default = 0;
  species X12_0 in default = init_X12_0_MCF7_Wm;
  species X12_1 in default = init_X12_1_MCF7_Wm;
  species $Akt_pT308_obs in default;
  species $Akt_pS473_obs in default;
  species $TSC1_TSC2_pT1462_obs in default;
  species $PRAS40_pT246_obs in default;
  species $PRAS40_pS183_obs in default;
  species $fourEBP1_pT37_46_obs in default;
  species $p70_S6K_pT389_obs in default;
  species $p70_S6K_pT229_obs in default;
  species $IRS1_pS636_639_obs in default; IRS1_pS636_639_obs is "IRS1_pS636-639_obs";

  // Parameters:
  a1_X10_0 = 1.048805e-5;
  a1_X11_0 = 0.1067112;
  a1_X2_0 = 0.001497654;
  a1_X8_0 = 0.5840379;
  a2_X10_0 = 0.1967979;
  a2_X11_0 = 1e-5;
  a2_X8_0 = 0.2107525;
  a2_X9_0 = 0.021622;
  a_X10_1 = 1e-5;
  a_X10_2 = 10;
  a_X12_0 = 0.1983396;
  a_X4_0 = 0.0001110953;
  a_X5_0 = 10;
  a_X6_Y2 = 1.000001e-5;
  b_X10_1 = 0.002637379;
  b_X10_2 = 0.0119596;
  b_X11_1 = 0.1828042;
  b_X11_2 = 0.2248584;
  b_X12_1 = 0.01021345;
  b_X2_2 = 0.1062147;
  b_X4_1 = 1.083581e-5;
  b_X5_1 = 0.07783312;
  b_X8_1 = 0.04629092;
  b_X8_2 = 0.01003761;
  b_X9_2 = 0.03695592;
  init_X10_0_MCF7_Wm = 0.004299162;
  init_X10_1_MCF7_Wm = 0.1362096;
  init_X10_2_MCF7_Wm = 0.001384212;
  init_X11_0_MCF7_Wm = 0.1333718;
  init_X11_1_MCF7_Wm = 0.001289234;
  init_X11_2_MCF7_Wm = 0.002739444;
  init_X12_0_MCF7_Wm = 3.41855;
  init_X12_1_MCF7_Wm = 0.4076253;
  init_X2_0_MCF7_Wm = 10;
  init_X2_2_MCF7_Wm = 0.0002224721;
  init_X5_0_MCF7_Wm = 10;
  init_X8_0_MCF7_Wm = 1.00695e-5;
  init_X8_1_MCF7_Ars = 0.1562637;
  init_X8_1_MCF7_WmFr = 1;
  init_X8_2_MCF7_Ars = 0.05834242;
  init_X8_2_MCF7_WmFr = 0.01800032;
  init_X9_0_MCF7_Wm = 2.67747;
  init_X9_2_MCF7_Wm = 0.01199871;
  k_stress_1 = 10;
  k_stress_2 = 0.01;
  Y1 = 0;
  Y2 = 1;
  Y3 = 1;
  Y4 = 1;
  Y5 = 0;
  scale_Akt_pT308 = 1.546259;
  scale_Akt_pT473 = 11.92611;
  scale_TSC1_TSC2_pT1462 = 2.713493;
  scale_PRAS40_pT246 = 10.1154;
  scale_PRAS40_pS183 = 3.984289;
  scale_fourEBP1_pT37_46 = 0.9966859;
  scale_p70_S6K_pT389 = 86.06022;
  scale_p70_S6K_pT229 = 74.74023;
  scale_IRS1_pS636_639 = 997.4211; scale_IRS1_pS636_639 is "scale_IRS1_pS636-639";
  Initial_for_scale_Akt_pT308 = scale_Akt_pT308;
  Initial_for_scale_Akt_pT473 = scale_Akt_pT473;
  Initial_for_scale_IRS1_pS636_639 = scale_IRS1_pS636_639; Initial_for_scale_IRS1_pS636_639 is "Initial for scale_IRS1_pS636-639";
  Initial_for_scale_PRAS40_pS183 = scale_PRAS40_pS183;
  Initial_for_scale_PRAS40_pT246 = scale_PRAS40_pT246;
  ModelValue_111 = scale_TSC1_TSC2_pT1462; ModelValue_111 is "Initial for scale_TSC1_TSC2_pT1462";
  ModelValue_114 = scale_fourEBP1_pT37_46; ModelValue_114 is "Initial for scale_fourEBP1_pT37_46";
  Initial_for_scale_p70_S6K_pT229 = scale_p70_S6K_pT229;
  Initial_for_scale_p70_S6K_pT389 = scale_p70_S6K_pT389;

  // Assignment rules:
  TSC1_TSC2_pT1462_obs := ModelValue_111*X9_2;
  Akt_pS473_obs := Initial_for_scale_Akt_pT473*X8_2 + Initial_for_scale_Akt_pT473*X8_3;
  Akt_pT308_obs := Initial_for_scale_Akt_pT308*X8_1 + Initial_for_scale_Akt_pT308*X8_3;
  IRS1_pS636_639_obs := Initial_for_scale_IRS1_pS636_639*X2_2;
  p70_S6K_pT229_obs := Initial_for_scale_p70_S6K_pT229*X11_2 + Initial_for_scale_p70_S6K_pT229*X11_3;
  p70_S6K_pT389_obs := Initial_for_scale_p70_S6K_pT389*X11_1 + Initial_for_scale_p70_S6K_pT389*X11_3;
  fourEBP1_pT37_46_obs := ModelValue_114*X12_1;
  PRAS40_pT246_obs := Initial_for_scale_PRAS40_pT246*X10_2 + Initial_for_scale_PRAS40_pT246*X10_3;
  PRAS40_pS183_obs := Initial_for_scale_PRAS40_pS183*X10_1 + Initial_for_scale_PRAS40_pS183*X10_3;

  // Reactions:
  reaction1: => X1_0; default*Function_for_reaction1_0(X1_0, X1_1, Y1, default);  // modifiers: X1_1
  reaction2: => X1_1; default*Function_for_reaction2_0(X1_0, X1_1, Y1, default);  // modifiers: X1_0
  reaction3: => X2_0; default*Function_for_reaction3_0(X11_1, X11_3, X1_1, X2_0, X2_2, a1_X2_0, b_X2_2, default);  // modifiers: X11_1, X11_3, X1_1, X2_2
  reaction4: => X2_1; default*Function_for_reaction4_0(X11_1, X11_3, X1_1, X2_0, X2_1, default);  // modifiers: X11_1, X11_3, X1_1, X2_0
  reaction5: => X2_2; default*Function_for_reaction5_0(X11_1, X11_3, X2_0, X2_1, X2_2, a1_X2_0, b_X2_2, default);  // modifiers: X11_1, X11_3, X2_0, X2_1
  reaction6: => X4_0; default*Function_for_reaction6_0(X2_1, X4_0, X4_1, Y3, Y4, a_X4_0, b_X4_1, default, k_stress_1);  // modifiers: X2_1, X4_1
  reaction7: => X4_1; default*Function_for_reaction7_0(X2_1, X4_0, X4_1, Y3, Y4, a_X4_0, b_X4_1, default, k_stress_1);  // modifiers: X2_1, X4_0
  reaction8: => X5_0; default*Function_for_reaction8_0(X4_1, X5_0, X5_1, a_X5_0, b_X5_1, default);  // modifiers: X4_1, X5_1
  reaction9: => X5_1; default*Function_for_reaction9_0(X4_1, X5_0, X5_1, a_X5_0, b_X5_1, default);  // modifiers: X4_1, X5_0
  reaction10: => X8_0; default*Function_for_reaction10_0(X4_1, X5_1, X8_0, X8_1, X8_2, Y3, Y5, a1_X8_0, a2_X8_0, b_X8_1, b_X8_2, default, k_stress_2);  // modifiers: X4_1, X5_1, X8_1, X8_2
  reaction11: => X8_1; default*Function_for_reaction11_0(X4_1, X5_1, X8_0, X8_1, X8_3, Y5, a1_X8_0, b_X8_1, b_X8_2, default);  // modifiers: X4_1, X5_1, X8_0, X8_3
  reaction12: => X8_2; default*Function_for_reaction12_0(X4_1, X5_1, X8_0, X8_2, X8_3, Y3, Y5, a2_X8_0, b_X8_1, b_X8_2, default, k_stress_2);  // modifiers: X4_1, X5_1, X8_0, X8_3
  reaction13: => X8_3; default*Function_for_reaction13_0(X4_1, X5_1, X8_1, X8_2, X8_3, Y5, a1_X8_0, a2_X8_0, b_X8_1, b_X8_2, default);  // modifiers: X4_1, X5_1, X8_1, X8_2
  reaction14: => X9_0; default*Function_for_reaction14_0(X8_1, X8_3, X9_0, X9_2, a2_X9_0, b_X9_2, default);  // modifiers: X8_1, X8_3, X9_2
  reaction15: => X9_2; default*Function_for_reaction15_0(X8_1, X8_3, X9_0, X9_2, a2_X9_0, b_X9_2, default);  // modifiers: X8_1, X8_3, X9_0
  reaction16: => X10_0; default*Function_for_reaction16_1_0(X10_0, X10_1, X10_2, X10_3, X8_1, X8_3, X9_0, X9_2, Y2, a1_X10_0, a2_X10_0, a_X6_Y2, b_X10_1, b_X10_2, default);  // modifiers: X10_1, X10_2, X10_3, X8_1, X8_3, X9_0, X9_2
  reaction17: => X10_1; default*Function_for_reaction17_1_0(X10_0, X10_1, X10_2, X10_3, X8_1, X8_3, X9_0, X9_2, Y2, a1_X10_0, a_X10_1, a_X6_Y2, b_X10_1, b_X10_2, default);  // modifiers: X10_0, X10_2, X10_3, X8_1, X8_3, X9_0, X9_2
  reaction18: => X10_2; default*Function_for_reaction18_1_0(X10_0, X10_1, X10_2, X10_3, X8_1, X8_3, X9_0, X9_2, Y2, a2_X10_0, a_X10_2, a_X6_Y2, b_X10_1, b_X10_2, default);  // modifiers: X10_0, X10_1, X10_3, X8_1, X8_3, X9_0, X9_2
  reaction19: => X10_3; default*Function_for_reaction19_1_0(X10_0, X10_1, X10_2, X10_3, X8_1, X8_3, X9_0, X9_2, Y2, a_X10_1, a_X10_2, a_X6_Y2, b_X10_1, b_X10_2, default);  // modifiers: X10_0, X10_1, X10_2, X8_1, X8_3, X9_0, X9_2
  reaction20: => X11_0; default*Function_for_reaction20_1_0(X10_0, X10_1, X10_2, X10_3, X11_0, X11_1, X11_2, X5_0, X9_0, X9_2, Y2, a1_X11_0, a2_X11_0, a_X6_Y2, b_X11_1, b_X11_2, default);  // modifiers: X10_0, X10_1, X10_2, X10_3, X11_1, X11_2, X5_0, X9_0, X9_2
  reaction21: => X11_1; default*Function_for_reaction21_1_0(X10_0, X10_1, X10_2, X10_3, X11_0, X11_1, X11_3, X5_0, X9_0, X9_2, Y2, a1_X11_0, a_X6_Y2, b_X11_1, b_X11_2, default);  // modifiers: X10_0, X10_1, X10_2, X10_3, X11_0, X11_3, X5_0, X9_0, X9_2
  reaction22: => X11_2; default*Function_for_reaction22_1_0(X10_0, X10_1, X10_2, X10_3, X11_0, X11_2, X11_3, X5_0, X9_0, X9_2, Y2, a2_X11_0, a_X6_Y2, b_X11_1, b_X11_2, default);  // modifiers: X10_0, X10_1, X10_2, X10_3, X11_0, X11_3, X5_0, X9_0, X9_2
  reaction23: => X11_3; default*Function_for_reaction23_1_0(X10_0, X10_1, X10_2, X10_3, X11_1, X11_2, X11_3, X5_0, X9_0, X9_2, Y2, a1_X11_0, a2_X11_0, a_X6_Y2, b_X11_1, b_X11_2, default);  // modifiers: X10_0, X10_1, X10_2, X10_3, X11_1, X11_2, X5_0, X9_0, X9_2
  reaction24: => X12_0; default*Function_for_reaction24_1_0(X10_0, X10_1, X10_2, X10_3, X12_0, X12_1, X9_0, X9_2, Y2, a_X12_0, a_X6_Y2, b_X12_1, default);  // modifiers: X10_0, X10_1, X10_2, X10_3, X12_1, X9_0, X9_2
  reaction25: => X12_1; default*Function_for_reaction25_1_0(X10_0, X10_1, X10_2, X10_3, X12_0, X12_1, X9_0, X9_2, Y2, a_X12_0, a_X6_Y2, b_X12_1, default);  // modifiers: X10_0, X10_1, X10_2, X10_3, X12_0, X9_0, X9_2
end
