// SBML level 2 version 4
// dcterms:bibliographicCitation: urn:miriam:pubmed:18293044

function human_birth_rate(Psi_h, N_h)
  Psi_h*N_h;
end

function Mosquito_birth_rate(Psi_v, N_v)
  Psi_v*N_v;
end

function Constant_flux__irreversible(v)
  v;
end
Constant_flux__irreversible is "Constant flux (irreversible)";

model Chitnis2008___Mathematical_model_of_malaria_transmission()
  // Chitnis2008 - Mathematical model of malaria transmission
  // isDescribedBy pubmed:18293044
  // hasPart efo:0001068
  // isVersionOf ncit:C17214
  // hasTaxon taxonomy:9606
  // hasProperty ncit:C34797 ncit:C71292 mamo:MAMO_0000046
  // biomodels.db:MODEL1805220002 biomodels.db:BIOMD0000000949

  // Compartments:
  compartment Human = 1;  // hasProperty taxonomy:9606; hasProperty ncit:C48694
  compartment Mosquito = 1;  // hasProperty ncit:C14198

  // Species:
  species Susceptible_Human in Human = piecewise(600, Baseline_dummy_variable == 0, 500);  // hasProperty omit:0005461
  species Exposed_Human in Human = piecewise(20, Baseline_dummy_variable == 0, 10);  // hasProperty ncit:C156623; hasProperty taxonomy:9606
  species Infected_Human in Human = piecewise(3, Baseline_dummy_variable == 0, 30);  // hasProperty ncit:C128320; hasProperty taxonomy:9606
  species Recovered in Human = 0;  // hasProperty ncit:C25746
  species Susceptible_Mosquito in Mosquito = piecewise(2400, Baseline_dummy_variable == 0, 4000);  // hasProperty omit:0005461
  species Exposed_Mosquito in Mosquito = piecewise(30, Baseline_dummy_variable == 0, 100);  // hasProperty ncit:C17214; hasProperty ncim:C123547
  species Infected_Mosquito in Mosquito = piecewise(5, Baseline_dummy_variable == 0, 50);  // hasProperty ncit:C128320; hasProperty ncit:C123547

  // Parameters:
  // Low == 0, High==1
  Baseline_dummy_variable = 0;

  // Assignment rules:
  Capital_lambda_h := piecewise(0.041, Baseline_dummy_variable == 0, 0.033);
  Psi_h := piecewise(5.5e-5, Baseline_dummy_variable == 0, 0.00011);
  Psi_v := piecewise(0.13, Baseline_dummy_variable == 0, 0.13);
  sigma_v := piecewise(0.33, Baseline_dummy_variable == 0, 0.5);
  sigma_h := piecewise(4.3, Baseline_dummy_variable == 0, 19);
  Beta_hv := piecewise(0.022, Baseline_dummy_variable == 0, 0.022);
  Beta_vh := piecewise(0.24, Baseline_dummy_variable == 0, 0.48);
  Beta_tilde_vh := piecewise(0.024, Baseline_dummy_variable == 0, 0.048);
  v_h := piecewise(0.1, Baseline_dummy_variable == 0, 0.1);
  v_v := piecewise(0.083, Baseline_dummy_variable == 0, 0.091);
  gamma_h := piecewise(0.0035, Baseline_dummy_variable == 0, 0.0035);
  delta_h := piecewise(1.8e-5, Baseline_dummy_variable == 0, 9e-5);
  rho_h := piecewise(0.0027, Baseline_dummy_variable == 0, 0.00055);
  u_1h := piecewise(8.8e-6, Baseline_dummy_variable == 0, 1.6e-5);
  u_2h := piecewise(2e-7, Baseline_dummy_variable == 0, 3e-7);
  u_1v := piecewise(0.033, Baseline_dummy_variable == 0, 0.033);
  u_2v := piecewise(4e-5, Baseline_dummy_variable == 0, 2e-5);
  N_h := Susceptible_Human + Exposed_Human + Infected_Human + Recovered;
  N_v := Susceptible_Mosquito + Exposed_Mosquito + Infected_Mosquito;
  f_h := u_1h + u_2h*N_h;
  f_v := u_1v + u_2v*N_v;
  lambda_h := sigma_v*N_v*sigma_h/(sigma_v*N_v + sigma_h*N_h)*Beta_hv*(Infected_Mosquito/N_v);
  lambda_v := sigma_v*sigma_h*N_h/(sigma_v*N_v + sigma_h*N_h)*(Beta_vh*(Infected_Human/N_h) + Beta_tilde_vh*(Recovered/N_h));

  // Reactions:
  Human_Immigration: => Susceptible_Human; Human*Constant_flux__irreversible(Capital_lambda_h);  // hasProperty ncit:C85498
  Human_Birth: => Susceptible_Human; Human*human_birth_rate(Psi_h, N_h);  // hasProperty ncit:C25155
  Human_Loss_of_Immunity: Recovered => Susceptible_Human; Human*rho_h*Recovered;  // hasProperty ncit:C25559; hasProperty ncit:C16710
  Human_Infection: Susceptible_Human => Exposed_Human; Human*lambda_h*Susceptible_Human;  // hasProperty ncit:C128320
  Human_Susceptible_natural_death: Susceptible_Human => ; Human*f_h*Susceptible_Human;  // hasPart omit:0017353
  Human_disease_progression: Exposed_Human => Infected_Human; Human*v_h*Exposed_Human;  // hasProperty omit:0018647
  Human_Exposed_natural_death: Exposed_Human => ; Human*f_h*Exposed_Human;  // hasProperty omit:0017353
  Human_Recovery: Infected_Human => Recovered; Human*gamma_h*Infected_Human;  // hasProperty ncit:C25746
  Human_disease_induced_death: Infected_Human => ; Human*delta_h*Infected_Human; Human_disease_induced_death is "Human disease-induced death";  // hasProperty omit:0017353
  Human_Infectious_natural_death: Infected_Human => ; Human*f_h*Infected_Human;  // hasProperty omit:0017353
  Human_Recovered_natural_death: Recovered => ; Human*f_h*Recovered;  // hasProperty omit:0017353
  Mosquito_birth: => Susceptible_Mosquito; Mosquito*Mosquito_birth_rate(Psi_v, N_v);  // hasProperty ncit:C25155
  Mosquito_infection: Susceptible_Mosquito => Exposed_Mosquito; Mosquito*lambda_v*Susceptible_Mosquito;  // hasProperty ncit:C128320
  Mosquito_Susceptible_death: Susceptible_Mosquito => ; Mosquito*f_v*Susceptible_Mosquito;  // hasProperty omit:0017353
  Mosquito_disease_progression: Exposed_Mosquito => Infected_Mosquito; Mosquito*v_v*Exposed_Mosquito;  // hasProperty ncit:C17747
  Mosquito_Exposed_death: Exposed_Mosquito => ; Mosquito*f_v*Exposed_Mosquito;  // hasProperty omit:0017353
  Mosquito_Infected_death: Infected_Mosquito => ; Mosquito*f_v*Infected_Mosquito;  // hasProperty omit:0017353

  // Unit definitions:
  unit volume = 1e-3 litre;
  unit substance = 1e-3 mole;
end
