// SBML level 3 version 1
// dcterms:bibliographicCitation: urn:miriam:pubmed:29856829

function Rate_Law_for_reaction_CycDT_decay(kdcycd, CycDT)
  kdcycd*CycDT;
end

function Rate_Law_for_reaction_E2FT_decay(kde2f, kde2fa, CycA, E2FT)
  (kde2f + kde2fa*CycA)*E2FT;
end

function Rate_Law_for_reaction_Comp2_decay(kdise2f, comp2, kdprbp, JdpRb, kprbp, CycE, CycA, JpRbp, kde2f, kde2fa)
  kdise2f*comp2 + kdprbp*(comp2/(JdpRb + comp2)) + kprbp*(CycE + CycA)*(comp2/(JpRbp + comp2)) + (kde2f + kde2fa*CycA)*comp2;
end

function Rate_Law_for_reaction_CycET_decay(kdcyce, kdcycea, CycA, CycET)
  (kdcyce + kdcycea*CycA)*CycET;
end

function Rate_Law_for_reaction_CycAT_decay(kdcyca, kdcycac, Cdh1, CycAT)
  (kdcyca + kdcycac*Cdh1)*CycAT;
end

function Rate_Law_for_reaction_for_Myc_production(ksm, S)
  ksm*S;
end

function Rate_Law_for_reaction_for_CycET_production(kscyceb, kscycem, Myc, kscyce, E2F, khcyce)
  kscyceb + kscycem*Myc + kscyce*(E2F/(khcyce + E2F));
end

function Rate_Law_for_reaction_for_CycDT_production(kscycdm, Myc, kscycds, S)
  kscycdm*Myc + kscycds*S;
end

function Rate_Law_for_reaction_for_CycAT_production(kscyca, E2F, khcyca)
  kscyca*(E2F/(khcyca + E2F));
end

function Rate_Law_for_reaction_for_Myc_decay(kdm, myc)
  kdm*myc;
end

function Rate_Law_for_reaction_for_E2FT_production(kse2fb, kse2fm, Myc, kse2f, E2F, khe2f)
  kse2fb + kse2fm*Myc + kse2f*(E2F/(khe2f + E2F));
end

function Rate_Law_for_reaction_Comp1_production(kase2f, E2F, Rb, kdprbp, comp2, JdpRb)
  kase2f*E2F*Rb + kdprbp*(comp2/(JdpRb + comp2));
end

function Rate_Law_for_reaction_Comp1_decay(kdise2f, comp1, kprb, CycD, JpRb, kpprb, CycE, CycA, JpRbp, kde2f, kde2fa)
  kdise2f*comp1 + kprb*CycD*(comp1/(JpRb + comp1)) + kpprb*(CycE + CycA)*(comp1/(JpRbp + comp1)) + (kde2f + kde2fa*CycA)*comp1;
end

function Rate_Law_for_reaction_for_Comp2_production(kase2f, E2F, Rbp, kprb, CycD, comp1, JpRb)
  kase2f*E2F*Rbp + kprb*CycD*(comp1/(JpRb + comp1));
end

function Rate_Law_for_reaction_for_CkiT_production(kscki)
  kscki;
end

function Rate_Law_for_reaction_for_EmiC_decay(kdiscdh1, kdemi, kdemi1c, Cdh1, EmiC)
  (kdiscdh1 + kdemi + kdemi1c*Cdh1)*EmiC;
end

function Rate_Law_for_reaction_for_UbI_decay(kdubl, kdublc, Cdh1, Ubl)
  (kdubl + kdublc*Cdh1)*Ubl;
end

function Rate_Law_for_reaction_for_CycACki_production(kascki, CycA, CkiT, CycECki, CycDCki, CycACki)
  kascki*CycA*(CkiT - CycECki - CycDCki - CycACki);
end

function Rate_Law_for_reaction_for_Rbpp_production(kprbp, CycE, CycA, Rbp, Jprbp, Comp2, kpprb, Rb, Jpprb, Comp1)
  kprbp*(CycE + CycA)*(Rbp/(Jprbp + Rbp)) + kprbp*(CycE + CycA)*(Comp2/(Jprbp + Comp2)) + kpprb*(CycE + CycA)*(Rb/(Jpprb + Rb)) + kpprb*(CycE + CycA)*(Comp1/(Jpprb + Comp1));
end

function Rate_Law_for_reaction_for_Rbpp_decay(kdprbpp, Rbpp, Jdprb)
  kdprbpp*(Rbpp/(Jdprb + Rbpp));
end

function Rate_Law_for_reaction_for_CycACki_decay(kdiscki, kdcyca, kdcycac, Cdh1, kdcki, kdckic, CycE, CycA, UbI, CycACki)
  (kdiscki + kdcyca + kdcycac*Cdh1 + kdcki + kdckic*(CycE + CycA)*UbI)*CycACki;
end

function Rate_Law_for_reaction_for_Cdh1dp_production(kacdh1, Cdh1T, Cdh1dp, Jdpcdh1)
  kacdh1*((Cdh1T - Cdh1dp)/(Jdpcdh1 + (Cdh1T - Cdh1dp)));
end

function Rate_Law_for_reaction_for_Cdh1dp_decay(kicdh1e, CycE, kicdh1a, CycA, Cdh1dp, Jpcdh1)
  (kicdh1e*CycE + kicdh1a*CycA)*(Cdh1dp/(Jpcdh1 + Cdh1dp));
end

function Rate_Law_for_reaction_for_Emi1T_production(ksemi1, E2F, khemi1)
  ksemi1*(E2F/(khemi1 + E2F));
end

function Rate_Law_for_reactionfor_Rbp_production(kprb, CycD, Rb, JpRb, kdise2f, comp2, kde2f, kde2fa, CycA)
  kprb*CycD*(Rb/(JpRb + Rb)) + kdise2f*comp2 + (kde2f + kde2fa*CycA)*comp2;
end

function Rate_Law_for_reaction_for_Rbp_decay(kase2f, E2F, Rbp, kdprbp, JpRbp, kprbp, CycE, CycA, JpRb)
  kase2f*E2F*Rbp + kdprbp*(Rbp/(JpRb + Rbp)) + kprbp*(CycE + CycA)*(Rbp/(JpRbp + Rbp));
end

function Rate_Law_for_reaction_for_CycECki_decay(kdiscki, kdcyce, kcdycea, CycA, kdcki, kdckic, CycE, UbI, CycECki)
  (kdiscki + kdcyce + kcdycea*CycA + kdcki + kdckic*(CycE + CycA)*UbI)*CycECki;
end

function Rate_Law_for_reaction_for_Emi1T_decay(kdemi1, kdemi1c, Cdh1, Emi1T)
  (kdemi1 + kdemi1c*Cdh1)*Emi1T;
end

function Rate_Law_for_reaction_for_EmiC_production(Cdh1T, EmiC, kascdh1, Emi1T)
  kascdh1*(Cdh1T - EmiC)*(Emi1T - EmiC);
end

function Rate_Law_for_reaction_for_CycECki_production(kascki, CycD, CkiT, CycECki, CycDCki, CycACki)
  kascki*CycD*(CkiT - CycECki - CycDCki - CycACki);
end

function Rate_Law_for_reaction_for_CkiT_decay(kdcki, kdckic, CycE, CycA, Ubl, CkiT)
  (kdcki + kdckic*(CycE + CycA)*Ubl)*CkiT;
end

function Rate_Law_for_reaction_for_CycDCki_production(kascki, CycD, CkiT, CycECki, CycDCki, CycACki)
  kascki*CycD*(CkiT - CycECki - CycDCki - CycACki);
end

function Rate_Law_for_reaction_for_Cdh1_production(kacdh1, Cdh1T, EmiC, Cdh1, Jdpcdh1, Cdh1dp, kdiscdh1, kdemi, kdemi1c)
  kacdh1*((Cdh1T - EmiC - Cdh1)/(Jdpcdh1 + (Cdh1T - Cdh1dp))) + (kdiscdh1 + kdemi + kdemi1c*Cdh1)*(Cdh1dp - Cdh1);
end

function Rate_Law_for_reaction_for_UbI_production(ksubl)
  ksubl;
end

function Rate_Law_for_reaction_for_CycDCki_decay(kdiscki, kdcycd, kdcki, kdckic, CycE, CycA, UbI, CycDCki)
  (kdiscki + kdcycd + kdcki + kdckic*(CycE + CycA)*UbI)*CycDCki;
end

function Rate_Law_for_reaction_for_Cdh1_decay(kicdh1e, CycE, kicdh1a, CycA, Cdh1, Jpcdh1, Cdh1dp, kascdh1, Emi1T, EmiC)
  (kicdh1e*CycE + kicdh1a*CycA)*(Cdh1/(Jpcdh1 + Cdh1dp)) + kascdh1*Cdh1*(Emi1T - EmiC);
end

model Pandey2018_reversible_transition_between_quiescence_and_proliferation()
  // Pandey2018-reversible transition between quiescence and proliferation
  // Cells switch between quiescence and proliferation states for maintaining tissue homeostasis and regeneration. At the restriction point (R-point), cells become irreversibly committed to the completion of the cell cycle independent of mitogen. The mechanism involving hyper-phosphorylation of retinoblastoma (Rb) and activation of transcription factor E2F is linked to the R-point passage. However, stress stimuli trigger exit from the cell cycle back to the mitogen-sensitive quiescent state after Rb hyper-phosphorylation but only until APC/CCdh1 inactivation. In this study, we developed a mathematical model to investigate the reversible transition between quiescence and proliferation in mammalian cells with respect to mitogen and stress signals. The model integrates the current mechanistic knowledge and accounts for the recent experimental observations with cells exiting quiescence and proliferating cells. We show that Cyclin E:Cdk2 couples Rb-E2F and APC/CCdh1 bistable switches and temporally segregates the R-point and the G1/S transition. A redox-dependent mutual antagonism between APC/CCdh1 and its inhibitor Emi1 makes the inactivation of APC/CCdh1 bistable. We show that the levels of Cdk inhibitor (CKI) and mitogen control the reversible transition between quiescence and proliferation. Further, we propose that shifting of the mitogen-induced transcriptional program to G2-phase in proliferating cells might result in an intermediate Cdk2 activity at the mitotic exit and in the immediate inactivation of APC/CCdh1. Our study builds a coherent framework and generates hypotheses that can be further explored by experiments.
  // hasTaxon taxonomy:9606
  // isDescribedBy pubmed:29856829
  // hasProperty GO:0007049 GO:0044838 mamo:MAMO_0000046
  // biomodels.db:MODEL2006220001 biomodels.db:BIOMD0000000954
  // model units - substance: substance, time: time, volume: volume, area: area, length: length, extent: substance

  // Compartments:
  compartment compartment = 1 volume;

  // Species:
  species Myc in compartment = 0;  // hasProperty uniprot:P01106
  species CycDT in compartment = 0;  // hasProperty uniprot:P24385; hasProperty ncit:C25304
  species CycET in compartment = 0.119;  // hasProperty ncit:C25304; hasProperty uniprot:P24864
  species CycAT in compartment = 0;  // hasProperty ncit:C25304; hasProperty uniprot:P20248
  species E2FT in compartment = 0.106;  // hasProperty ncit:C25304; hasProperty PR:000050007
  species Comp1 in compartment = 0.105;  // hasProperty GO:0035189
  species Comp2 in compartment = 0;  // hasProperty PATO:0002220; hasProperty GO:0035189
  species Rbp in compartment = 0;  // hasProperty ncit:C44044; hasProperty uniprot:P06400; hasProperty PATO:0002262
  species CkiT in compartment = 0.2;  // hasProperty ncit:C2185; hasProperty ncit:C25304
  species CycECki in compartment = 0.115;  // hasProperty ncit:C2185; hasProperty uniprot:P24864
  species CycDCki in compartment = 0;  // hasProperty uniprot:P24385; hasProperty ncit:C2185
  species CycACki in compartment = 0;  // hasProperty ncit:C2185; hasProperty uniprot:P20248
  species Cdh1dp in compartment = 1;  // hasProperty ncit:C25304; hasProperty PATO:0002263; hasProperty uniprot:Q9UM11
  species Emi1T in compartment = 0.002;  // hasProperty ncit:C25304; hasProperty uniprot:Q9UKT4
  species EmiC in compartment = 0.002;  // hasProperty ncit:C47881; hasProperty uniprot:Q9UKT4; hasProperty uniprot:Q9UM11; hasProperty PATO:0002220
  species Cdh1 in compartment = 0.998;  // hasProperty omit:0006811; hasProperty uniprot:Q9UM11; hasProperty PATO:0002263
  species UbI in compartment = 0.02;  // hasProperty ncit:C16796; hasProperty ncit:C17227
  species $E2F in compartment;  // hasProperty PR:000050007
  species $Rb in compartment;  // hasProperty uniprot:P06400
  species Rbpp in compartment = 0.001;  // hasProperty ncit:C17648; hasProperty PATO:0002262; hasProperty uniprot:P06400
  species $CycE in compartment;  // hasProperty uniprot:P24864
  species $CycD in compartment;  // hasProperty uniprot:P24385
  species $CycA in compartment;  // hasProperty uniprot:P20248
  species $Cdh1p in compartment;  // hasProperty uniprot:Q9UM11; hasProperty PATO:0002220; hasProperty omit:0006811
  species $Cdh1T in compartment = 1;  // hasProperty ncit:C25304; hasProperty uniprot:Q9UM11

  // Parameters:
  S = 1;
  Ksm = 0.1;
  Kdm = 0.1;
  Kscycdm = 0.004;
  Kscycds = 0.004;
  Kdcycd = 0.008;
  Kscyceb = 0.0001;
  Kscycem = 0;
  Kscyce = 0.004;
  Kdcyce = 0.001;
  Kdcycea = 0.01;
  Khcyce = 0.25;
  Kscyca = 0.008;
  Kdcyca = 0.004;
  Kdcycac = 0.5;
  Khcyca = 0.1;
  Kse2fm = 0;
  Kse2f = 0.004;
  Kde2f = 0.003;
  Kde2fa = 0.01;
  Khe2f = 0.25;
  RbT = 1;
  Kase2f = 100;
  Kdise2f = 1;
  Kprb = 5;
  Kdprbp = 1;
  Kppeb = 0.5;
  Kdprbpp = 0.1;
  Kprbp = 2;
  JpRb = 0.01;
  JpRbp = 0.05;
  JdpRb = 0.05;
  JppRb = 0.5;
  Kscki = 0.04;
  Kdcki = 0.2;
  Kascki = 100;
  Kdiscki = 0.1;
  Ksub1 = 0.004;
  Kdub1 = 0.002;
  Kdub1c = 0.2;
  Ksemi1 = 0.45;
  Kdemi1 = 0.2;
  Kdemi1c = 2;
  Khemi1 = 0.1;
  Kascdh1 = 100;
  Kdiscdh1 = 0.1;
  Kacdh1 = 0.1;
  Kicdh1e = 0.14;
  Kicdh1a = 0.2;
  JdpCdh1 = 0.02;
  JpCdh1 = 0.25;
  Kse2fb = 0.0003;
  Kdckic = 1;

  // Assignment rules:
  Rb := RbT - Rbp - Rbpp - Comp1 - Comp2;
  CycA := CycAT - CycACki;
  CycE := CycET - CycECki;
  CycD := CycDT - CycDCki;
  Cdh1p := Cdh1T - Cdh1 - EmiC;
  E2F := E2FT - Comp1 - Comp2;

  // Reactions:
  reaction_for_Myc_production: => Myc; compartment*Rate_Law_for_reaction_for_Myc_production(Ksm, S);
  reaction_for_Myc_decay: Myc => ; compartment*Rate_Law_for_reaction_for_Myc_decay(Kdm, Myc);  // hasProperty ncit:C75947
  reaction_for_CycDT_production: => CycDT; compartment*Rate_Law_for_reaction_for_CycDT_production(Kscycdm, Myc, Kscycds, S);  // modifiers: Myc
  reaction_CycDT_decay: CycDT => ; compartment*Rate_Law_for_reaction_CycDT_decay(Kdcycd, CycDT);  // hasProperty ncit:C75947
  reaction_for_CycET_production: => CycET; compartment*Rate_Law_for_reaction_for_CycET_production(Kscyceb, Kscycem, Myc, Kscyce, E2F, Khcyce);  // modifiers: Myc, E2F
  reaction_CycET_decay: CycET => ; compartment*Rate_Law_for_reaction_CycET_decay(Kdcyce, Kdcycea, CycA, CycET);  // modifiers: CycA; hasProperty ncit:C75947
  reaction_for_CycAT_production: => CycAT; compartment*Rate_Law_for_reaction_for_CycAT_production(Kscyca, E2F, Khcyca);  // modifiers: E2F
  reaction_CycAT_decay: CycAT => ; compartment*Rate_Law_for_reaction_CycAT_decay(Kdcyca, Kdcycac, Cdh1, CycAT);  // modifiers: Cdh1; hasProperty ncit:C75947
  reaction_for_E2FT_production: => E2FT; compartment*Rate_Law_for_reaction_for_E2FT_production(Kse2fb, Kse2fm, Myc, Kse2f, E2F, Khe2f);  // modifiers: Myc, E2F
  reaction_E2FT_decay: E2FT => ; compartment*Rate_Law_for_reaction_E2FT_decay(Kde2f, Kde2fa, CycA, E2FT);  // modifiers: CycA; hasProperty ncit:C75947
  reaction_Comp1_production: => Comp1; compartment*Rate_Law_for_reaction_Comp1_production(Kase2f, E2F, Rb, Kdprbp, Comp2, JdpRb);  // modifiers: E2F, Rb, Comp2
  reaction_Comp1_decay: Comp1 => ; compartment*Rate_Law_for_reaction_Comp1_decay(Kdise2f, Comp1, Kprb, CycD, JpRb, Kppeb, CycE, CycA, JppRb, Kde2f, Kde2fa);  // modifiers: CycD, CycE, CycA; hasProperty ncit:C75947
  reaction_for_Comp2_production: => Comp2; compartment*Rate_Law_for_reaction_for_Comp2_production(Kase2f, E2F, Rbp, Kprb, CycD, Comp1, JpRb);  // modifiers: E2F, Rbp, CycD, Comp1
  reaction_Comp2_decay: Comp2 => ; compartment*Rate_Law_for_reaction_Comp2_decay(Kdise2f, Comp2, Kdprbp, JdpRb, Kprbp, CycE, CycA, JpRbp, Kde2f, Kde2fa);  // modifiers: CycE, CycA; hasProperty ncit:C75947
  reactionfor_Rbp_production: => Rbp; compartment*Rate_Law_for_reactionfor_Rbp_production(Kprb, CycD, Rb, JpRb, Kdise2f, Comp2, Kde2f, Kde2fa, CycA);  // modifiers: CycD, Rb, Comp2, CycA
  reaction_for_Rbp_decay: Rbp => ; compartment*Rate_Law_for_reaction_for_Rbp_decay(Kase2f, E2F, Rbp, Kdprbp, JpRbp, Kprbp, CycE, CycA, JpRb);  // modifiers: E2F, CycE, CycA; hasProperty ncit:C75947
  reaction_for_CkiT_production: => CkiT; compartment*Rate_Law_for_reaction_for_CkiT_production(Kscki);
  reaction_for_CkiT_decay: CkiT => ; compartment*Rate_Law_for_reaction_for_CkiT_decay(Kdcki, Kdckic, CycE, CycA, UbI, CkiT);  // modifiers: CycE, CycA, UbI; hasProperty ncit:C75947
  reaction_for_CycECki_production: => CycECki; compartment*Rate_Law_for_reaction_for_CycECki_production(Kascki, CycE, CkiT, CycECki, CycDCki, CycACki);  // modifiers: CycE, CkiT, CycDCki, CycACki
  reaction_for_CycECki_decay: CycECki => ; compartment*Rate_Law_for_reaction_for_CycECki_decay(Kdiscki, Kdcyce, Kdcycea, CycA, Kdcki, Kdckic, CycE, UbI, CycECki);  // modifiers: CycA, CycE, UbI; hasProperty ncit:C75947
  reaction_for_CycDCki_production: => CycDCki; compartment*Rate_Law_for_reaction_for_CycDCki_production(Kascki, CycD, CkiT, CycECki, CycDCki, CycACki);  // modifiers: CycD, CkiT, CycECki, CycACki
  reaction_for_CycDCki_decay: CycDCki => ; compartment*Rate_Law_for_reaction_for_CycDCki_decay(Kdiscki, Kdcycd, Kdcki, Kdckic, CycE, CycA, UbI, CycDCki);  // modifiers: CycE, CycA, UbI; hasProperty ncit:C75947
  reaction_for_CycACki_production: => CycACki; compartment*Rate_Law_for_reaction_for_CycACki_production(Kascki, CycA, CkiT, CycECki, CycDCki, CycACki);  // modifiers: CycA, CkiT, CycECki, CycDCki
  reaction_for_CycACki_decay: CycACki => ; compartment*Rate_Law_for_reaction_for_CycACki_decay(Kdiscki, Kdcyca, Kdcycac, Cdh1, Kdcki, Kdckic, CycE, CycA, UbI, CycACki);  // modifiers: Cdh1, CycE, CycA, UbI; hasProperty ncit:C75947
  reaction_for_Cdh1dp_production: => Cdh1dp; compartment*Rate_Law_for_reaction_for_Cdh1dp_production(Kacdh1, Cdh1T, Cdh1dp, JdpCdh1);  // modifiers: Cdh1T
  reaction_for_Cdh1dp_decay: Cdh1dp => ; compartment*Rate_Law_for_reaction_for_Cdh1dp_decay(Kicdh1e, CycE, Kicdh1a, CycA, Cdh1dp, JpCdh1);  // modifiers: CycE, CycA; hasProperty ncit:C75947
  reaction_for_Emi1T_production: => Emi1T; compartment*Rate_Law_for_reaction_for_Emi1T_production(Ksemi1, E2F, Khemi1);  // modifiers: E2F
  reaction_for_Emi1T_decay: Emi1T => ; compartment*Rate_Law_for_reaction_for_Emi1T_decay(Kdemi1, Kdemi1c, Cdh1, Emi1T);  // modifiers: Cdh1; hasProperty ncit:C75947
  reaction_for_EmiC_production: => EmiC; compartment*Rate_Law_for_reaction_for_EmiC_production(Cdh1T, EmiC, Kascdh1, Emi1T);  // modifiers: Cdh1T, Emi1T
  reaction_for_EmiC_decay: EmiC => ; compartment*Rate_Law_for_reaction_for_EmiC_decay(Kdiscdh1, Kdemi1, Kdemi1c, Cdh1, EmiC);  // modifiers: Cdh1; hasProperty ncit:C75947
  reaction_for_Cdh1_production: => Cdh1; compartment*Rate_Law_for_reaction_for_Cdh1_production(Kacdh1, Cdh1T, EmiC, Cdh1, JdpCdh1, Cdh1dp, Kdiscdh1, Kdemi1, Kdemi1c);  // modifiers: Cdh1T, EmiC, Cdh1dp
  reaction_for_Cdh1_decay: Cdh1 => ; compartment*Rate_Law_for_reaction_for_Cdh1_decay(Kicdh1e, CycE, Kicdh1a, CycA, Cdh1, JpCdh1, Cdh1dp, Kascdh1, Emi1T, EmiC);  // modifiers: CycE, CycA, Cdh1dp, Emi1T, EmiC; hasProperty ncit:C75947
  reaction_for_UbI_production: => UbI; compartment*Rate_Law_for_reaction_for_UbI_production(Ksub1);
  reaction_for_UbI_decay: UbI => ; compartment*Rate_Law_for_reaction_for_UbI_decay(Kdub1, Kdub1c, Cdh1, UbI);  // modifiers: Cdh1; hasProperty ncit:C75947
  reaction_for_Rbpp_production: => Rbpp; compartment*Rate_Law_for_reaction_for_Rbpp_production(Kprbp, CycE, CycA, Rbp, JpRbp, Comp2, Kppeb, Rb, JppRb, Comp1);  // modifiers: CycE, CycA, Rbp, Comp2, Rb, Comp1
  reaction_for_Rbpp_decay: Rbpp => ; compartment*Rate_Law_for_reaction_for_Rbpp_decay(Kdprbpp, Rbpp, JdpRb);  // hasProperty ncit:C75947

  // Unit definitions:
  unit length = metre;
  unit area = metre^2;
  unit volume = 1e-3 litre;
  unit time = second;
  unit substance = 1e-3 mole;
end
