// SBML level 2 version 4
// dcterms:bibliographicCitation: urn:miriam:pubmed:32696599

function Constant_flux__irreversible(v)
  v;
end
Constant_flux__irreversible is "Constant flux (irreversible)";

function Occupy_GAS_binding_site_0(genOccGASbsBySTAT1dimn, pSTAT1dimn)
  genOccGASbsBySTAT1dimn*pSTAT1dimn;
end

function OccGAS_ISREbs_formation_by_heterodimer_0(genOccGAS_ISREbsBySTAT1STAT2n, pSTAT1pSTAT2n)
  genOccGAS_ISREbsBySTAT1STAT2n*pSTAT1pSTAT2n;
end

function Receptor_degradation_by_SOCS1_1(Rec, SOCS1, degRecBySOCS)
  degRecBySOCS*Rec*SOCS1;
end

function Active_receptor_complex_formation_1(BindIFN, IFN, Rec, SOCS1, SOCS3, USP18, kinhBySOCS, kinhByUSP18)
  BindIFN*IFN*Rec/(1 + kinhBySOCS*SOCS1)/(1 + kinhByUSP18*USP18)/SOCS3;
end

function Active_receptor_complex_degradation_by_SOCS1_1(SOCS1, aRecIFN, degaRecIFNBySOCS)
  aRecIFN*degaRecIFNBySOCS*SOCS1;
end

function Active_receptor_complex_degradation_by_USP18_1(USP18, aRecIFN, degByUSP18)
  aRecIFN*degByUSP18*USP18;
end

function Active_receptor_complex_degradation_by_USP18_and_SOCS1__synergy__1(SOCS1, USP18, aRecIFN, degBySOCSandUSP18)
  aRecIFN*degBySOCSandUSP18*SOCS1*USP18;
end
Active_receptor_complex_degradation_by_USP18_and_SOCS1__synergy__1 is "Active receptor complex degradation by USP18 and SOCS1 (synergy)_1";

function Heterodimer_complex_formation_1(ComplFormSTAT1STAT2c, STAT1c, STAT2c, aRecIFN)
  ComplFormSTAT1STAT2c*aRecIFN*STAT1c*STAT2c;
end

function Homodimer_complex_formation_1(ComplFormSTAT1dimc, STAT1c, aRecIFN)
  ComplFormSTAT1dimc*aRecIFN*STAT1c*STAT1c;
end

function OccGAS_ISREbs_formation_by_ISGF3_1(ISGF3n, genOccGAS_ISREbsByISGF3n)
  genOccGAS_ISREbsByISGF3n*ISGF3n;
end

function SOCS3_synthesis_1(SOCS3mRNA, synthSOCS3)
  synthSOCS3*SOCS3mRNA;
end

function STAT1mRNA_production_by_ISRE_1(OccGAS_ISREbs, kmSTAT1, synthSTAT1mRNA)
  synthSTAT1mRNA*OccGAS_ISREbs/(kmSTAT1 + OccGAS_ISREbs);
end

function STAT2mRNA_production_by_ISRE_1(OccGAS_ISREbs, synthSTAT2mRNA)
  synthSTAT2mRNA*OccGAS_ISREbs;
end

function IRF9mRNA_production_by_ISRE_1(OccGAS_ISREbs, kmIRF9, synthIRF9mRNA)
  synthIRF9mRNA*OccGAS_ISREbs/(kmIRF9 + OccGAS_ISREbs);
end

function IRF2mRNA_production_by_ISRE_1(OccGAS_ISREbs, synthIRF2mRNA)
  synthIRF2mRNA*OccGAS_ISREbs;
end

function USP18mRNA_production_by_ISRE_1(OccGAS_ISREbs, synthUSP18mRNA)
  synthUSP18mRNA*OccGAS_ISREbs;
end

function SOCS1mRNA_production_by_ISRE_1(OccGAS_ISREbs, synthSOCS1mRNA)
  synthSOCS1mRNA*OccGAS_ISREbs;
end

function SOCS1mRNA_decay_1(IRF2, SOCS1mRNA, hlSOCS1mRNA)
  hlSOCS1mRNA*SOCS1mRNA*(1 + IRF2);
end

function SOCS3mRNA_production_by_ISRE_1(OccGASbs, synthSOCS3mRNA)
  synthSOCS3mRNA*OccGASbs;
end

function Linear_chain_for_time_delay_in_STAT1_translation_1(STAT1mRNA, kmsynthSTAT1, synthSTAT1)
  synthSTAT1*STAT1mRNA/(kmsynthSTAT1 + STAT1mRNA);
end

function Linear_chain_for_time_delay_in_STAT2_translation_1(STAT2mRNA, synthSTAT2)
  synthSTAT2*STAT2mRNA;
end

function Linear_chain_for_time_delay_in_IRF9_translation_1(IRF9mRNA, synthIRF9)
  synthIRF9*IRF9mRNA;
end

function Linear_chain_for_time_delay_in_USP18_translation_1(USP18mRNA, synthUSP18)
  synthUSP18*USP18mRNA;
end

function Linear_chain_for_time_delay_in_SOCS1_translation_1(SOCS1mRNA, synthSOCS1)
  synthSOCS1*SOCS1mRNA;
end

model Kok2020___IFNalpha_induced_signaling_in_Huh7_5_cells()
  // Kok2020 - IFNalpha-induced signaling in Huh7.5 cells
  // The proposed ODE model describes dynamics of IFNalpha-induced signaling in Huh7.5 cells for a time scale up to 32 hours after stimulation with IFNalpha. The model consists of an IFN receptor model, formation/degradation and cytoplasmic/nuclear shuttling of STAT1-homodimers, STAT1-STAT2-heterodimers and STAT1-STAT2-IRF9 (ISGF3) complexes. On top, formation of feedback proteins STAT1, STAT2, IRF9, USP18, SOCS1, SOCS3 and IRF2 and corresponding influences on IFNalpha signaling dynamics was incorporated. The model was calibrated by dose response and time course measurements over 32 hours as well as time courses for USP18 inhibition and overexpression experiments. As a special focus, the model is able to describe dose-dependent sensitization and desensitization of IFNalpha signaling in form of double treatment experiments at 0h and 24h.
  // isDescribedBy pubmed:32696599
  // biomodels.db:MODEL2005110001
  // occursIn BTO:0004126
  // hasProperty GO:0060338 taxonomy:9606 mamo:MAMO_0000046
  // biomodels.db:MODEL2005110001 biomodels.db:BIOMD0000000959
  // hasProperty mamo:MAMO_0000046

  // Compartments:
  compartment compartment = 1; compartment is "cell";  // efo:0005704

  // Species:
  species Rec in compartment = 1989;  // uniprot:P17181
  species SOCS1 in compartment = 0.8286;  // uniprot:O15524
  species IFN in compartment = 50000; IFN is "IFNa";  // uniprot:P01562
  species aRecIFN in compartment = 0; aRecIFN is "aRecIFNa";  // hasPart uniprot:P17181; hasPart uniprot:P01562; hasProperty GO:0043235
  species USP18 in compartment = 1746;  // uniprot:Q9UMW8
  species STAT1c in compartment = 486300;  // uniprot:P42224; hasProperty ncit:C13226
  species STAT2c in compartment = 30390;  // uniprot:P52630; hasProperty ncit:C13226
  species pSTAT1pSTAT2c in compartment = 0;  // hasPart uniprot:P42224; hasPart uniprot:P52630; hasProperty PATO:0002220; hasProperty ncit:C13226
  species pSTAT1pSTAT2n in compartment = 0;  // hasPart uniprot:P42224; hasPart uniprot:P52630; hasProperty PATO:0002220; hasProperty ncit:C13361
  species STAT1n in compartment = 48630;  // uniprot:P42224; hasProperty ncit:C13361
  species STAT2n in compartment = 3039;  // uniprot:P52630; hasProperty ncit:C13361
  species ISGF3c in compartment = 0;  // hasPart uniprot:Q00978; hasPart uniprot:P52630; hasPart uniprot:P42224; hasProperty ncit:C13226
  species ISGF3n in compartment = 0;  // hasPart uniprot:Q00978; hasPart uniprot:P42224; hasPart uniprot:P52630; hasProperty ncit:C13361
  species IRF9n in compartment = 140;  // uniprot:Q00978; hasProperty ncit:C13361
  species pSTAT1dimc in compartment = 0;  // isVersionOf uniprot:P42224; hasProperty PATO:0002220; hasProperty ncit:C13226
  species pSTAT1dimn in compartment = 0;  // isVersionOf uniprot:P42224; hasProperty PATO:0002220; hasProperty ncit:C13361
  species OccGAS_ISREbs in compartment = 0;  // hasProperty OBI:0000794; hasProperty OMIT:0020133
  species OccGASbs in compartment = 0;  // hasProperty OBI:0000794
  species IRF9c in compartment = 1400;  // uniprot:Q00978; hasProperty ncit:C13226
  species SOCS3 in compartment = 1.081;  // uniprot:O14543
  species STAT1mRNA in compartment = 1.012;  // ncit:C813; isVersionOf uniprot:P42224
  species STAT2mRNA in compartment = 0.8458;  // ncit:C813; isVersionOf uniprot:P52630
  species IRF9mRNA in compartment = 0.8606;  // ncit:C813; isVersionOf uniprot:Q00978
  species IRF2mRNA in compartment = 0.9258;  // ncit:C813; isVersionOf uniprot:P14316
  species IRF2 in compartment = 1.781;  // uniprot:P14316
  species USP18mRNA in compartment = 0.7077;  // ncit:C813; isVersionOf uniprot:Q9UMW8
  species SOCS1mRNA in compartment = 0.8286;  // ncit:C813; isVersionOf uniprot:O15524
  species SOCS3mRNA in compartment = 1.081;  // ncit:C813; isVersionOf uniprot:O14543
  species STAT1_LC_1 in compartment = 460600;  // isInstanceOf uniprot:P42224 ncit:C80450; isVersionOf uniprot:P42224
  species STAT1_LC_2 in compartment = 460600;  // isInstanceOf uniprot:P42224 ncit:C80450; isPropertyOf uniprot:P42224
  species STAT1_LC_3 in compartment = 460600;  // isInstanceOf uniprot:P42224 ncit:C80450; isVersionOf uniprot:P42224
  species STAT2_LC_1 in compartment = 2520;  // isInstanceOf uniprot:P52630 ncit:C80450; isVersionOf uniprot:P52630
  species STAT2_LC_2 in compartment = 2520;  // isInstanceOf uniprot:P52630 ncit:C80450; isVersionOf uniprot:P52630
  species STAT2_LC_3 in compartment = 2520;  // isInstanceOf uniprot:P52630 ncit:C80450; isVersionOf uniprot:P52630
  species STAT2_LC_4 in compartment = 2520;  // isInstanceOf uniprot:P52630 ncit:C80450; isVersionOf uniprot:P52630
  species STAT2_LC_5 in compartment = 2520;  // isInstanceOf uniprot:P52630 ncit:C80450; isVersionOf uniprot:P52630
  species IRF9_LC_1 in compartment = 249.7;  // isInstanceOf uniprot:Q00978 ncit:C80450; isVersionOf uniprot:Q00978
  species IRF9_LC_2 in compartment = 249.7;  // isInstanceOf uniprot:Q00978 ncit:C80450; isVersionOf uniprot:Q00978
  species USP18_LC_1 in compartment = 1745;  // isInstanceOf uniprot:Q9UMW8 ncit:C80450; isVersionOf uniprot:Q9UMW8
  species USP18_LC_2 in compartment = 1745;  // isInstanceOf uniprot:Q9UMW8 ncit:C80450; isVersionOf uniprot:Q9UMW8
  species SOCS1_LC_1 in compartment = 0.8286;  // isInstanceOf uniprot:O15524 ncit:C80450; isVersionOf uniprot:O15524

  // Assignment rules:
  IRF2_mRNA_log10 := log10(IRF2mRNA);
  IRF9_mRNA_log10 := log10(IRF9mRNA);
  STAT1mRNA_log10 := log10(STAT1mRNA);
  STAT2mRNA_log10 := log10(STAT2mRNA);
  USP18mRNA_log10 := log10(USP18mRNA);
  SOCS1mRNA_log10 := log10(SOCS1mRNA);
  SOCS3mRNA_log10 := log10(SOCS3mRNA);

  // Reactions:
  Receptor_production: => Rec; compartment*Constant_flux__irreversible(Receptor_production_v);
    Receptor_production_v = 16.98;
  Receptor_degradation_basal: Rec => ; compartment*Receptor_degradation_basal_k1*Rec;  // isVersionOf GO:0032801
    Receptor_degradation_basal_k1 = 2.06e-5;
  Receptor_degradation_by_SOCS1: Rec => ; compartment*Receptor_degradation_by_SOCS1_1(Rec, SOCS1, degRecBySOCS);  // modifiers: SOCS1; isVersionOf GO:0032801
    degRecBySOCS = 0.01028;
  Active_receptor_complex_formation: IFN + Rec => aRecIFN; compartment*Active_receptor_complex_formation_1(BindIFN, IFN, Rec, SOCS1, SOCS3, USP18, kinhBySOCS, kinhByUSP18);  // modifiers: SOCS1, USP18, SOCS3; hasProperty GO:0043235
    BindIFN = 0.0593; kinhBySOCS = 889.4; kinhByUSP18 = 0.0001364;
  Active_receptor_complex_degradation_basal: aRecIFN => ; compartment*Active_receptor_complex_degradation_basal_k1*aRecIFN;
    Active_receptor_complex_degradation_basal_k1 = 19840;
  Active_receptor_complex_degradation_by_SOCS1: aRecIFN => ; compartment*Active_receptor_complex_degradation_by_SOCS1_1(SOCS1, aRecIFN, degaRecIFNBySOCS);  // modifiers: SOCS1
    degaRecIFNBySOCS = 0.8837;
  Active_receptor_complex_degradation_by_USP18: aRecIFN => ; compartment*Active_receptor_complex_degradation_by_USP18_1(USP18, aRecIFN, degByUSP18);  // modifiers: USP18
    degByUSP18 = 0.01644;
  Active_receptor_complex_degradation_by_USP18_and_SOCS1__synergy: aRecIFN => ; compartment*Active_receptor_complex_degradation_by_USP18_and_SOCS1__synergy__1(SOCS1, USP18, aRecIFN, degBySOCSandUSP18); Active_receptor_complex_degradation_by_USP18_and_SOCS1__synergy is "Active receptor complex degradation by USP18 and SOCS1 (synergy)";  // modifiers: SOCS1, USP18
    degBySOCSandUSP18 = 27.82;
  USP18_degradation: USP18 => ; compartment*USP18_degradation_k1*USP18;
    USP18_degradation_k1 = 0.6719;
  Heterodimer_complex_formation: STAT1c + STAT2c => pSTAT1pSTAT2c; compartment*Heterodimer_complex_formation_1(ComplFormSTAT1STAT2c, STAT1c, STAT2c, aRecIFN);  // modifiers: aRecIFN
    ComplFormSTAT1STAT2c = 0.001112;
  Heterodimer_translocation_to_nucleus: pSTAT1pSTAT2c => pSTAT1pSTAT2n; compartment*Heterodimer_translocation_to_nucleus_k1*pSTAT1pSTAT2c;  // isVersionOf ncit:C28506
    Heterodimer_translocation_to_nucleus_k1 = 0.1855;
  Heterodimer_decay: pSTAT1pSTAT2n => STAT1n + STAT2n; compartment*Heterodimer_decay_k1*pSTAT1pSTAT2n;  // isVersionOf ncit:C75947
    Heterodimer_decay_k1 = 1.187;
  ISGF3_complex_formation: pSTAT1pSTAT2c + IRF9c => ISGF3c; compartment*ISGF3_complex_formation_k1*pSTAT1pSTAT2c*IRF9c;
    ISGF3_complex_formation_k1 = 0.008975;
  ISGF3_translocation_to_nucleus: ISGF3c => ISGF3n; compartment*ISGF3_translocation_to_nucleus_k1*ISGF3c;  // isVersionOf ncit:C28506
    ISGF3_translocation_to_nucleus_k1 = 0.8636;
  ISGF3_decay: ISGF3n => STAT1n + STAT2n + IRF9n; compartment*ISGF3_decay_k1*ISGF3n;  // isVersionOf ncit:C75947
    ISGF3_decay_k1 = 3.407;
  Homodimer_complex_formation: 2 STAT1c => pSTAT1dimc; compartment*Homodimer_complex_formation_1(ComplFormSTAT1dimc, STAT1c, aRecIFN);  // modifiers: aRecIFN
    ComplFormSTAT1dimc = 7.12e-6;
  Homodimer_translocation_to_nucleus: pSTAT1dimc => pSTAT1dimn; compartment*Homodimer_translocation_to_nucleus_k1*pSTAT1dimc;  // isVersionOf ncit:C28506
    Homodimer_translocation_to_nucleus_k1 = 4.296;
  Homodimer_decay: pSTAT1dimn => 2 STAT1n; compartment*Homodimer_decay_k1*pSTAT1dimn;  // isVersionOf ncit:C75947
    Homodimer_decay_k1 = 10.53;
  OccGAS_ISREbs_formation_by_ISGF3: => OccGAS_ISREbs; compartment*OccGAS_ISREbs_formation_by_ISGF3_1(ISGF3n, genOccGAS_ISREbsByISGF3n);  // modifiers: ISGF3n; isVersionOf GO:0001046
    genOccGAS_ISREbsByISGF3n = 0.0003583;
  OccGAS_ISREbs_formation_by_heterodimer: => OccGAS_ISREbs; compartment*OccGAS_ISREbs_formation_by_heterodimer_0(genOccGAS_ISREbsBySTAT1STAT2n, pSTAT1pSTAT2n);  // modifiers: pSTAT1pSTAT2n; isVersionOf GO:0001046
    genOccGAS_ISREbsBySTAT1STAT2n = 0.0002972;
  OccGAS_ISREbs_decay: OccGAS_ISREbs => ; compartment*OccGAS_ISREbs_decay_k1*OccGAS_ISREbs;  // isVersionOf ncit:C75947
    OccGAS_ISREbs_decay_k1 = 0.5519;
  Occupy_GAS_binding_site: => OccGASbs; compartment*Occupy_GAS_binding_site_0(genOccGASbsBySTAT1dimn, pSTAT1dimn);  // modifiers: pSTAT1dimn; isVersionOf GO:0001047
    genOccGASbsBySTAT1dimn = 1395;
  OccGASbs_0: OccGASbs => ; compartment*OccGASbs_0_k1*OccGASbs;  // hasProperty GO:0001046
    OccGASbs_0_k1 = 1395;
  STAT1_degradation: STAT1c => ; compartment*STAT1_degradation_k1*STAT1c;
    STAT1_degradation_k1 = 0.4996;
  STAT1_translocation_to_cytoplasm: STAT1n => STAT1c; compartment*STAT1_translocation_to_cytoplasm_k1*STAT1n;
    STAT1_translocation_to_cytoplasm_k1 = 0.9702;
  STAT1_translocation_to_nucleus: STAT1c => STAT1n; compartment*STAT1_translocation_to_nucleus_k1*STAT1c;  // isVersionOf ncit:C28506
    STAT1_translocation_to_nucleus_k1 = 0.09702;
  STAT2_degradation: STAT2c => ; compartment*STAT2_degradation_k1*STAT2c;
    STAT2_degradation_k1 = 0.1468;
  STAT2_translocation_to_cytoplasm: STAT2n => STAT2c; compartment*STAT2_translocation_to_cytoplasm_k1*STAT2n;
    STAT2_translocation_to_cytoplasm_k1 = 1.81;
  STAT2_translocation_to_nucleus: STAT2c => STAT2n; compartment*STAT2_translocation_to_nucleus_k1*STAT2c;  // isVersionOf ncit:C28506
    STAT2_translocation_to_nucleus_k1 = 0.181;
  IRF9_translocation_to_cytoplasm: IRF9n => IRF9c; compartment*IRF9_translocation_to_cytoplasm_k1*IRF9n;
    IRF9_translocation_to_cytoplasm_k1 = 2981;
  IRF9_translocation_to_nucleus: IRF9c => IRF9n; compartment*IRF9_translocation_to_nucleus_k1*IRF9c;  // isVersionOf ncit:C28506
    IRF9_translocation_to_nucleus_k1 = 298.1;
  IRF9_degradation: IRF9c => ; compartment*IRF9_degradation_k1*IRF9c;
    IRF9_degradation_k1 = 0.2028;
  SOCS1_degradation: SOCS1 => ; compartment*SOCS1_degradation_k1*SOCS1;
    SOCS1_degradation_k1 = 0.9029;
  SOCS3_synthesis: => SOCS3; compartment*SOCS3_synthesis_1(SOCS3mRNA, synthSOCS3);  // modifiers: SOCS3mRNA; isVersionOf ncit:C18103
    synthSOCS3 = 1958;
  SOCS3_degradation: SOCS3 => ; compartment*SOCS3_degradation_k1*SOCS3;
    SOCS3_degradation_k1 = 1958;
  STAT1_mRNA_basal_production: => STAT1mRNA; compartment*Constant_flux__irreversible(STAT1_mRNA_basal_production_v);
    STAT1_mRNA_basal_production_v = 0.2395;
  STAT1mRNA_production_by_ISRE: => STAT1mRNA; compartment*STAT1mRNA_production_by_ISRE_1(OccGAS_ISREbs, kmSTAT1, synthSTAT1mRNA);  // modifiers: OccGAS_ISREbs
    kmSTAT1 = 0.9761; synthSTAT1mRNA = 4.375;
  STAT1mRNA_decay: STAT1mRNA => ; compartment*STAT1mRNA_decay_k1*STAT1mRNA;  // isVersionOf ncit:C75947
    STAT1mRNA_decay_k1 = 0.2367;
  STAT2mRNA_basal_production: => STAT2mRNA; compartment*Constant_flux__irreversible(STAT2mRNA_basal_production_v);
    STAT2mRNA_basal_production_v = 0.2069;
  STAT2mRNA_production_by_ISRE: => STAT2mRNA; compartment*STAT2mRNA_production_by_ISRE_1(OccGAS_ISREbs, synthSTAT2mRNA);  // modifiers: OccGAS_ISREbs
    synthSTAT2mRNA = 1.561;
  STAT2mRNA_decay: STAT2mRNA => ; compartment*STAT2mRNA_decay_k1*STAT2mRNA;  // isVersionOf ncit:C75947
    STAT2mRNA_decay_k1 = 0.2446;
  IRF9mRNA_basal_production: => IRF9mRNA; compartment*Constant_flux__irreversible(IRF9mRNA_basal_production_v);
    IRF9mRNA_basal_production_v = 0.3605;
  IRF9mRNA_production_by_ISRE: => IRF9mRNA; compartment*IRF9mRNA_production_by_ISRE_1(OccGAS_ISREbs, kmIRF9, synthIRF9mRNA);  // modifiers: OccGAS_ISREbs
    kmIRF9 = 0.121; synthIRF9mRNA = 18.62;
  IRF9mRNA_decay: IRF9mRNA => ; compartment*IRF9mRNA_decay_k1*IRF9mRNA;  // isVersionOf ncit:C75947
    IRF9mRNA_decay_k1 = 0.4189;
  IRF2mRNA_basal_production: => IRF2mRNA; compartment*Constant_flux__irreversible(IRF2mRNA_basal_production_v);
    IRF2mRNA_basal_production_v = 0.9833;
  IRF2mRNA_production_by_ISRE: => IRF2mRNA; compartment*IRF2mRNA_production_by_ISRE_1(OccGAS_ISREbs, synthIRF2mRNA);  // modifiers: OccGAS_ISREbs
    synthIRF2mRNA = 0.6775;
  IRF2_translation_and_mRNA_decay: IRF2mRNA => IRF2; compartment*IRF2_translation_and_mRNA_decay_k1*IRF2mRNA;  // isVersionOf ncit:C75947
    IRF2_translation_and_mRNA_decay_k1 = 1.062;
  USP18mRNA_basal_production: => USP18mRNA; compartment*Constant_flux__irreversible(USP18mRNA_basal_production_v);
    USP18mRNA_basal_production_v = 0.06442;
  USP18mRNA_production_by_ISRE: => USP18mRNA; compartment*USP18mRNA_production_by_ISRE_1(OccGAS_ISREbs, synthUSP18mRNA);  // modifiers: OccGAS_ISREbs
    synthUSP18mRNA = 2.784;
  USP18mRNA_decay: USP18mRNA => ; compartment*USP18mRNA_decay_k1*USP18mRNA;  // isVersionOf ncit:C75947
    USP18mRNA_decay_k1 = 0.09103;
  SOCS1mRNA_basal_production: => SOCS1mRNA; compartment*Constant_flux__irreversible(SOCS1mRNA_basal_production_v);
    SOCS1mRNA_basal_production_v = 1.301;
  SOCS1mRNA_production_by_ISRE: => SOCS1mRNA; compartment*SOCS1mRNA_production_by_ISRE_1(OccGAS_ISREbs, synthSOCS1mRNA);  // modifiers: OccGAS_ISREbs
    synthSOCS1mRNA = 8.848;
  SOCS1mRNA_decay: SOCS1mRNA => ; compartment*SOCS1mRNA_decay_1(IRF2, SOCS1mRNA, hlSOCS1mRNA);  // modifiers: IRF2; isVersionOf ncit:C75947
    hlSOCS1mRNA = 0.5644;
  SOCS3mRNA_basal_production: => SOCS3mRNA; compartment*Constant_flux__irreversible(SOCS3mRNA_basal_production_v);
    SOCS3mRNA_basal_production_v = 1.257;
  SOCS3mRNA_production_by_ISRE: => SOCS3mRNA; compartment*SOCS3mRNA_production_by_ISRE_1(OccGASbs, synthSOCS3mRNA);  // modifiers: OccGASbs
    synthSOCS3mRNA = 0.01205;
  SOCS3mRNA_decay: SOCS3mRNA => ; compartment*SOCS3mRNA_decay_k1*SOCS3mRNA;  // isVersionOf ncit:C75947
    SOCS3mRNA_decay_k1 = 1.163;
  IRF2_degradation: IRF2 => ; compartment*IRF2_degradation_k1*IRF2;
    IRF2_degradation_k1 = 0.552;
  Linear_chain_for_time_delay_in_STAT1_translation: => STAT1_LC_1; compartment*Linear_chain_for_time_delay_in_STAT1_translation_1(STAT1mRNA, kmsynthSTAT1, synthSTAT1);  // modifiers: STAT1mRNA
    kmsynthSTAT1 = 5.373; synthSTAT1 = 1533000;
  STAT1_chain_step_1: STAT1_LC_1 => STAT1_LC_2; compartment*STAT1_chain_step_1_k1*STAT1_LC_1;  // isVersionOf omit:0011435
    STAT1_chain_step_1_k1 = 0.5275;
  STAT1_chain_step_2: STAT1_LC_2 => STAT1_LC_3; compartment*STAT1_chain_step_2_k1*STAT1_LC_2;  // isVersionOf omit:0011435
    STAT1_chain_step_2_k1 = 0.5275;
  STAT1_chain_step3: STAT1_LC_3 => STAT1c; compartment*STAT1_chain_step3_k1*STAT1_LC_3;  // isVersionOf omit:0011435
    STAT1_chain_step3_k1 = 0.5275;
  Linear_chain_for_time_delay_in_STAT2_translation: => STAT2_LC_1; compartment*Linear_chain_for_time_delay_in_STAT2_translation_1(STAT2mRNA, synthSTAT2);  // modifiers: STAT2mRNA
    synthSTAT2 = 5274;
  STAT2_chain_step_1: STAT2_LC_1 => STAT2_LC_2; compartment*STAT2_chain_step_1_k1*STAT2_LC_1;  // isVersionOf omit:0011435
    STAT2_chain_step_1_k1 = 1.77;
  STAT2_chain_step_2: STAT2_LC_2 => STAT2_LC_3; compartment*STAT2_chain_step_2_k1*STAT2_LC_2;  // isVersionOf omit:0011435
    STAT2_chain_step_2_k1 = 1.77;
  STAT2_chain_step_3: STAT2_LC_3 => STAT2_LC_4; compartment*STAT2_chain_step_3_k1*STAT2_LC_3;  // isVersionOf omit:0011435
    STAT2_chain_step_3_k1 = 1.77;
  STAT2_chain_step_4: STAT2_LC_4 => STAT2_LC_5; compartment*STAT2_chain_step_4_k1*STAT2_LC_4;  // isVersionOf omit:0011435
    STAT2_chain_step_4_k1 = 1.77;
  STAT2_chain_step_5: STAT2_LC_5 => STAT2c; compartment*STAT2_chain_step_5_k1*STAT2_LC_5;  // isVersionOf omit:0011435
    STAT2_chain_step_5_k1 = 1.77;
  Linear_chain_for_time_delay_in_IRF9_translation: => IRF9_LC_1; compartment*Linear_chain_for_time_delay_in_IRF9_translation_1(IRF9mRNA, synthIRF9);  // modifiers: IRF9mRNA
    synthIRF9 = 329.9;
  IRF9_chain_step_1: IRF9_LC_1 => IRF9_LC_2; compartment*IRF9_chain_step_1_k1*IRF9_LC_1;  // isVersionOf omit:0011435
    IRF9_chain_step_1_k1 = 1.137;
  IRF9_chain_step_2: IRF9_LC_2 => IRF9c; compartment*IRF9_chain_step_2_k1*IRF9_LC_2;  // isVersionOf omit:0011435
    IRF9_chain_step_2_k1 = 1.137;
  Linear_chain_for_time_delay_in_USP18_translation: => USP18_LC_1; compartment*Linear_chain_for_time_delay_in_USP18_translation_1(USP18mRNA, synthUSP18);  // modifiers: USP18mRNA
    synthUSP18 = 1658;
  USP18_chain_step_1: USP18_LC_1 => USP18_LC_2; compartment*USP18_chain_step_1_k1*USP18_LC_1;  // isVersionOf omit:0011435
    USP18_chain_step_1_k1 = 0.6722;
  USP18_chain_step_2: USP18_LC_2 => USP18; compartment*USP18_chain_step_2_k1*USP18_LC_2;  // isVersionOf omit:0011435
    USP18_chain_step_2_k1 = 0.6722;
  Linear_chain_for_time_delay_in_SOCS1_translation: => SOCS1_LC_1; compartment*Linear_chain_for_time_delay_in_SOCS1_translation_1(SOCS1mRNA, synthSOCS1);  // modifiers: SOCS1mRNA
    synthSOCS1 = 0.9029;
  SOCS1_chain_step_1: SOCS1_LC_1 => SOCS1; compartment*SOCS1_chain_step_1_k1*SOCS1_LC_1;  // hasProperty omit:0011435
    SOCS1_chain_step_1_k1 = 0.9029;

  // Unit definitions:
  unit length = metre;
  unit area = metre^2;
  unit volume = litre;
  unit time = 3600 second;
  unit substance = 1e-9 mole;
end
