// SBML level 2 version 4
// dcterms:bibliographicCitation: urn:miriam:pubmed:32219006

function Rate_Law_for_R1(alpha, S, U, N)
  alpha*S*U/N;
end

model Zhao2020___SUQC_model_of_COVID_19_transmission_dynamics_in_Wuhan__Hubei__and_China()
  // Zhao2020 - SUQC model of COVID-19 transmission dynamics in Wuhan, Hubei, and China
  // Background - The coronavirus disease 2019 (COVID-19) is rapidly spreading in China and more than 30 countries over last two months. COVID-19 has multiple characteristics distinct from other infectious diseases, including high infectivity during incubation, time delay between real dynamics and daily observed number of confirmed cases, and the intervention effects of implemented quarantine and control measures. Methods - We develop a Susceptible, Un-quanrantined infected, Quarantined infected, Confirmed infected (SUQC) model to characterize the dynamics of COVID-19 and explicitly parameterize the intervention effects of control measures, which is more suitable for analysis than other existing epidemic models. Results - The SUQC model is applied to the daily released data of the confirmed infections to analyze the outbreak of COVID-19 in Wuhan, Hubei (excluding Wuhan), China (excluding Hubei) and four first-tier cities of China. We found that, before January 30, 2020, all these regions except Beijing had a reproductive number R &amp;gt; 1, and after January 30, all regions had a reproductive number R lesser than 1, indicating that the quarantine and control measures are effective in preventing the spread of COVID-19. The confirmation rate of Wuhan estimated by our model is 0.0643, substantially lower than that of Hubei excluding Wuhan (0.1914), and that of China excluding Hubei (0.2189), but it jumps to 0.3229 after February 12 when clinical evidence was adopted in new diagnosis guidelines. The number of unquarantined infected cases in Wuhan on February 12, 2020 is estimated to be 3,509 and declines to 334 on February 21, 2020. After fitting the model with data as of February 21, 2020, we predict that the end time of COVID-19 in Wuhan and Hubei is around late March, around mid March for China excluding Hubei, and before early March 2020 for the four tier-one cities. A total of 80,511 individuals are estimated to be infected in China, among which 49,510 are from Wuhan, 17,679 from Hubei (excluding Wuhan), and the rest 13,322 from other regions of China (excluding Hubei). Note that the estimates are from a deterministic ODE model and should be interpreted with some uncertainty. Conclusions - We suggest that rigorous quarantine and control measures should be kept before early March in Beijing, Shanghai, Guangzhou and Shenzhen, and before late March in Hubei. The model can also be useful to predict the trend of epidemic and provide quantitative guide for other countries at high risk of outbreak, such as South Korea, Japan, Italy and Iran.
  // isDescribedBy pubmed:32219006
  // isVersionOf DOID:0080600
  // hasTaxon taxonomy:9606 taxonomy:2697049
  // hasProperty mamo:MAMO_0000028
  // biomodels.db:MODEL2008260001 biomodels.db:BIOMD0000000962

  // Compartments:
  compartment China = 1;  // isVersionOf ncit:C25632; isVersionOf ncit:C16428

  // Species:
  species Susceptible in China = Total_Pop;  // isVersionOf ido:0000514; isVersionOf ncit:C171133
  // Wuhan - initial values
  // Stage I - 258
  // Stage II - 15270
  // Stage III - 4000
  // Hubei - initial values
  // Stage I - 270
  // Stage II - 5700
  // China - initial values
  // Stage I - 291 (Set model initial time to -30. Keep it at 0 for everything else)
  // Stage II - 2800
  species Unquarantined_Infected in China = 258;  // isVersionOf ncit:C171133; isVersionOf ido:0000511
  // Wuhan - initial values
  // Stage I - 0
  // Stage II - 0
  // Stage III - 5000
  // Hubei - initial values
  // Stage I - 0
  // Stage II - 1500
  // China - initial values
  // Stage I - 0 (Set model initial time to -30 for Stage I alone. Keep it at 0 for everything else)
  // Stage II - 2000
  species Quarantined_Infected in China = 0;  // isVersionOf ido:0000511; isVersionOf ncit:C171133; isVersionOf ncit:C25549
  // Wuhan - initial values
  // Stage I - 258
  // Stage II - 2000
  // Stage III - 36000
  // Hubei - initial values
  // Stage I - 0
  // Stage II - 1600
  // China - initial values
  // Stage I - 0 (Set model initial time to -30. Keep it at 0 for everything else)
  // Stage II - 4000
  species Confirmed_Infected in China = 0;  // isVersionOf ncit:C72159; isVersionOf ido:0000511; isVersionOf ncit:C25297; isVersionOf ncit:C171133
  species $Cumulative_Infected in China;  // isVersionOf ncit:C171133; isVersionOf ido:0000511

  // Parameters:
  Trigger_Stage_I = 1 unit_0;
  Trigger_Stage_II = 0 unit_0;
  Trigger_Stage_III = 0 unit_0;
  Trigger_Wuhan = 1 unit_0;
  Trigger_Hubei = 0 unit_0;
  Trigger_China = 0 unit_0;
  sigma = 0;
  Total_Pop_Wuhan = 9010000;
  Total_Pop_Hubei = 48000000;
  Total_Pop_China = 1335000000;
  R_Stage_I_Wuhan = 4.7092;
  gamma_1_Stage_I_Wuhan = 0.063;
  gamma_2_Stage_I_Wuhan = 0.05;
  R_Stage_II_Wuhan = 0.7575;
  gamma_1_Stage_II_Wuhan = 0.3917;
  gamma_2_Stage_II_Wuhan = 0.0643;
  R_Stage_III_Wuhan = 0.4797;
  gamma_1_Stage_III_Wuhan = 0.6185;
  gamma_2_Stage_III_Wuhan = 0.322;
  R_Stage_I_Hubei = 5.934;
  gamma_1_Stage_I_Hubei = 0.05;
  gamma_2_Stage_I_Hubei = 0.05;
  R_Stage_II_Hubei = 0.6079;
  gamma_1_Stage_II_Hubei = 0.488;
  gamma_2_Stage_II_Hubei = 0.1914;
  R_Stage_I_China = 1.5283;
  gamma_1_Stage_I_China = 0.1941;
  gamma_2_Stage_I_China = 0.05;
  R_Stage_II_China = 0.5753;
  gamma_1_Stage_II_China = 0.5157;
  gamma_2_Stage_II_China = 0.2189;
  Initial_for_R = R;
  Initial_for_R_Stage_III_Wuhan = R_Stage_III_Wuhan;
  Initial_for_R_Stage_II_China = R_Stage_II_China;
  Initial_for_R_Stage_II_Hubei = R_Stage_II_Hubei;
  Initial_for_R_Stage_II_Wuhan = R_Stage_II_Wuhan;
  Initial_for_R_Stage_I_China = R_Stage_I_China;
  Initial_for_R_Stage_I_Hubei = R_Stage_I_Hubei;
  Initial_for_R_Stage_I_Wuhan = R_Stage_I_Wuhan;
  Initial_for_Total_Pop_China = Total_Pop_China;
  Initial_for_Total_Pop_Hubei = Total_Pop_Hubei;
  Initial_for_Total_Pop_Wuhan = Total_Pop_Wuhan;
  Initial_for_Trigger_China = Trigger_China;
  Initial_for_Trigger_Hubei = Trigger_Hubei;
  Initial_for_Trigger_Stage_III = Trigger_Stage_III;
  Initial_for_Trigger_Stage_II = Trigger_Stage_II;
  Initial_for_Trigger_Stage_I = Trigger_Stage_I;
  Initial_for_Trigger_Wuhan = Trigger_Wuhan;
  Initial_for_gamma_1 = gamma_1;
  ModelValue_23 = gamma_1_Stage_III_Wuhan; ModelValue_23 is "Initial for gamma_1_Stage_III_Wuhan";
  ModelValue_35 = gamma_1_Stage_II_China; ModelValue_35 is "Initial for gamma_1_Stage_II_China";
  ModelValue_29 = gamma_1_Stage_II_Hubei; ModelValue_29 is "Initial for gamma_1_Stage_II_Hubei";
  ModelValue_20 = gamma_1_Stage_II_Wuhan; ModelValue_20 is "Initial for gamma_1_Stage_II_Wuhan";
  ModelValue_32 = gamma_1_Stage_I_China; ModelValue_32 is "Initial for gamma_1_Stage_I_China";
  ModelValue_26 = gamma_1_Stage_I_Hubei; ModelValue_26 is "Initial for gamma_1_Stage_I_Hubei";
  ModelValue_17 = gamma_1_Stage_I_Wuhan; ModelValue_17 is "Initial for gamma_1_Stage_I_Wuhan";
  Initial_for_gamma_2 = gamma_2;
  ModelValue_24 = gamma_2_Stage_III_Wuhan; ModelValue_24 is "Initial for gamma_2_Stage_III_Wuhan";
  ModelValue_36 = gamma_2_Stage_II_China; ModelValue_36 is "Initial for gamma_2_Stage_II_China";
  ModelValue_30 = gamma_2_Stage_II_Hubei; ModelValue_30 is "Initial for gamma_2_Stage_II_Hubei";
  ModelValue_21 = gamma_2_Stage_II_Wuhan; ModelValue_21 is "Initial for gamma_2_Stage_II_Wuhan";
  ModelValue_33 = gamma_2_Stage_I_China; ModelValue_33 is "Initial for gamma_2_Stage_I_China";
  ModelValue_27 = gamma_2_Stage_I_Hubei; ModelValue_27 is "Initial for gamma_2_Stage_I_Hubei";
  ModelValue_18 = gamma_2_Stage_I_Wuhan; ModelValue_18 is "Initial for gamma_2_Stage_I_Wuhan";
  Initial_for_sigma = sigma;

  // Assignment rules:
  gamma_1 := Initial_for_Trigger_Wuhan*(Initial_for_Trigger_Stage_I*ModelValue_17 + Initial_for_Trigger_Stage_II*ModelValue_20 + Initial_for_Trigger_Stage_III*ModelValue_23) + Initial_for_Trigger_Hubei*(Initial_for_Trigger_Stage_I*ModelValue_26 + Initial_for_Trigger_Stage_II*ModelValue_29) + Initial_for_Trigger_China*(Initial_for_Trigger_Stage_I*ModelValue_32 + Initial_for_Trigger_Stage_II*ModelValue_35);
  Total_Pop := Initial_for_Trigger_Wuhan*Initial_for_Total_Pop_Wuhan + Initial_for_Trigger_Hubei*Initial_for_Total_Pop_Hubei + Initial_for_Trigger_China*Initial_for_Total_Pop_China;
  R := Initial_for_Trigger_Wuhan*(Initial_for_Trigger_Stage_I*Initial_for_R_Stage_I_Wuhan + Initial_for_Trigger_Stage_II*Initial_for_R_Stage_II_Wuhan + Initial_for_Trigger_Stage_III*Initial_for_R_Stage_III_Wuhan) + Initial_for_Trigger_Hubei*(Initial_for_Trigger_Stage_I*Initial_for_R_Stage_I_Hubei + Initial_for_Trigger_Stage_II*Initial_for_R_Stage_II_Hubei) + Initial_for_Trigger_China*(Initial_for_Trigger_Stage_I*Initial_for_R_Stage_I_China + Initial_for_Trigger_Stage_II*Initial_for_R_Stage_II_China);
  alpha := Initial_for_R*Initial_for_gamma_1;
  gamma_2 := Initial_for_Trigger_Wuhan*(Initial_for_Trigger_Stage_I*ModelValue_18 + Initial_for_Trigger_Stage_II*ModelValue_21 + Initial_for_Trigger_Stage_III*ModelValue_24) + Initial_for_Trigger_Hubei*(Initial_for_Trigger_Stage_I*ModelValue_27 + Initial_for_Trigger_Stage_II*ModelValue_30) + Initial_for_Trigger_China*(Initial_for_Trigger_Stage_I*ModelValue_33 + Initial_for_Trigger_Stage_II*ModelValue_36);
  beta := Initial_for_gamma_2 + (1 - Initial_for_gamma_2)*Initial_for_sigma;
  Cumulative_Infected := Confirmed_Infected + Quarantined_Infected + Unquarantined_Infected;

  // Reactions:
  Susceptible_to_Unquarantined: Susceptible => Unquarantined_Infected; China*Rate_Law_for_R1(alpha, Susceptible, Unquarantined_Infected, Total_Pop);  // isVersionOf ncit:C171133; isVersionOf ncit:C128320
  Unquarantined_to_Quarantined: Unquarantined_Infected => Quarantined_Infected; China*gamma_1*Unquarantined_Infected;  // isVersionOf ncit:C171133; isVersionOf ncit:C25458
  Quarantined_to_Confirmed: Quarantined_Infected => Confirmed_Infected; China*beta*Quarantined_Infected;  // isVersionOf ncit:C25458; isVersionOf ncit:C171133

  // Unit definitions:
  unit length = metre;
  unit area = metre^2;
  unit volume = 1e-3 litre;
  unit time = 86400 second;
  unit substance = item;
  unit unit_0 = dimensionless^0; unit_0 is "dimensionless";
end
