// SBML level 3 version 1
// dcterms:bibliographicCitation: urn:miriam:pubmed:32046137

function Rate_Law_for_reaction_4(sigma, rho, E)
  sigma*(1 - rho)*E;
end

function Rate_Law_for_reaction(beta, c, S, I, theta, A, q)
  beta*c*(1 - q)*S*(I + theta*A);
end

function Rate_Law_for_reaction_1(c, q, beta, S, I, theta, A)
  c*q*(1 - beta)*S*(I + theta*A);
end

function Rate_Law_for_reaction_11(beta, c, q, S, I, theta, A)
  beta*c*q*S*(I + theta*A);
end

function Rate_Law_for_reaction_3(sigma, rho, E)
  sigma*rho*E;
end

model Tang2020___Estimation_of_transmission_risk_of_COVID_19_and_impact_of_public_health_interventions()
  // Tang2020 - Estimation of transmission risk of COVID-19 and impact of public health interventions
  // Since the emergence of the first cases in Wuhan, China, the novel coronavirus (2019-nCoV) infection has been quickly spreading out to other provinces and neighboring countries. Estimation of the basic reproduction number by means of mathematical modeling can be helpful for determining the potential and severity of an outbreak and providing critical information for identifying the type of disease interventions and intensity. A deterministic compartmental model was devised based on the clinical progression of the disease, epidemiological status of the individuals, and intervention measures. The estimations based on likelihood and model analysis show that the control reproduction number may be as high as 6.47 (95% CI 5.71–7.23). Sensitivity analyses show that interventions, such as intensive contact tracing followed by quarantine and isolation, can effectively reduce the control reproduction number and transmission risk, with the effect of travel restriction adopted by Wuhan on 2019-nCoV infection in Beijing being almost equivalent to increasing quarantine by a 100 thousand baseline value. It is essential to assess how the expensive, resource-intensive measures implemented by the Chinese authorities can contribute to the prevention and control of the 2019-nCoV infection, and how long they should be maintained. Under the most restrictive measures, the outbreak is expected to peak within two weeks (since 23 January 2020) with a significant low peak value. With travel restriction (no imported exposed individuals to Beijing), the number of infected individuals in seven days will decrease by 91.14% in Beijing, compared with the scenario of no travel restriction.
  // DOID:0080600
  // hasTaxon taxonomy:9606
  // hasTaxon taxonomy:2697049
  // isDescribedBy pubmed:32046137
  // hasProperty mamo:MAMO_0000028
  // biomodels.db:MODEL2011020001 biomodels.db:BIOMD0000000971
  // model units - substance: substance, time: time, volume: volume, area: area, length: length, extent: substance

  // Compartments:
  compartment Wuhan = 1 volume;  // ncit:C25632; isPartOf ncit:C16428

  // Species:
  species Susceptible in Wuhan = 11081000;  // ido:0000514; isVersionOf ncit:C171133
  species Exposed in Wuhan = 105.1;  // ido:0000514; isVersionOf ncit:C171133; hasProperty ido:0000597
  species Infected in Wuhan = 27.679;  // ido:0000511; isVersionOf ncit:C171133
  species Asymptomatic in Wuhan = 53.539;  // ido:0000569; ido:0000511; isVersionOf ncit:C171133
  species Susceptible_quarantined in Wuhan = 739;  // ncit:C71902; ido:0000514; isVersionOf ncit:C171133
  species Exposed_quarantined in Wuhan = 1.1642;  // ncit:C71902; ido:0000514; isVersionOf ncit:C171133; hasProperty ido:0000597
  species Hospitalised in Wuhan = 1;  // isVersionOf ido:0000511; isVersionOf ncit:C171133; hasProperty ncit:C25179
  species Recovered in Wuhan = 2;  // hasProperty ido:0000621

  // Parameters:
  c = 14.781;
  beta = 2.1011e-8;
  q = 1.8887e-7;
  sigma = 0.142857;
  lambda = 0.0714285;
  rho = 0.86834;
  delta_I = 0.13266;
  delta_q = 0.1259;
  gamma_I = 0.33029;
  gamma_A = 0.13978;
  gamma_H = 0.11624;
  alpha = 1.7826e-5;
  theta = 1;
  c_lockdown = 14.781;
  q_lockdown = 1.8887e-7;
  var Infected_0;

  // Assignment rules:
  Infected_0 := Infected + Asymptomatic;

  // Reactions:
  Susceptible_to_Exposed: Susceptible => Exposed; Wuhan*Rate_Law_for_reaction(beta, c, Susceptible, Infected, theta, Asymptomatic, q);  // modifiers: Infected, Asymptomatic; ido:0000597; isVersionOf ncit:C171133
  Susceptible_to_Susceptible_quarantined: Susceptible => Susceptible_quarantined; Wuhan*Rate_Law_for_reaction_1(c, q, beta, Susceptible, Infected, theta, Asymptomatic);  // modifiers: Infected, Asymptomatic; ncit:C71902; isVersionOf ncit:C171133
  Quarantined_to_Susceptible: Susceptible_quarantined => Susceptible; Wuhan*lambda*Susceptible_quarantined;
  Exposed_to_Infected: Exposed => Infected; Wuhan*Rate_Law_for_reaction_3(sigma, rho, Exposed);  // ncit:C171133
  Exposed_to_Asymptomatic: Exposed => Asymptomatic; Wuhan*Rate_Law_for_reaction_4(sigma, rho, Exposed);  // ncit:C168121; ncit:C171133
  Infected_to_Hospitalised: Infected => Hospitalised; Wuhan*delta_I*Infected;  // ncit:C25179; isVersionOf ncit:C171133
  Infected_to_Recovered: Infected => Recovered; Wuhan*gamma_I*Infected;  // ncit:C25746
  Asymptomatic_to_Recovered: Asymptomatic => Recovered; Wuhan*gamma_A*Asymptomatic;  // ncit:C25746
  Hospitalised_to_Recovered: Hospitalised => Recovered; Wuhan*gamma_H*Hospitalised;  // ncit:C25746
  Infected_to_Deceased: Infected => ; Wuhan*alpha*Infected;  // ncit:C28554; isVersionOf ncit:C171133
  Hospitalised_to_Deceased: Hospitalised => ; Wuhan*alpha*Hospitalised;  // ncit:C28554; isVersionOf ncit:C171133
  Susceptible_to_Exposed_quarantined: Susceptible => Exposed_quarantined; Wuhan*Rate_Law_for_reaction_11(beta, c, q, Susceptible, Infected, theta, Asymptomatic);  // modifiers: Infected, Asymptomatic; ncit:C71902; ido:0000597; isVersionOf ncit:C171133
  Exposed_quarantined_to_Hospitalised: Exposed_quarantined => Hospitalised; Wuhan*delta_q*Exposed_quarantined;  // ncit:C25179; isVersionOf ncit:C171133

  // Events:
  Lockdown: at (time > 9), persistent=false: c = c_lockdown, q = q_lockdown;

  // Unit definitions:
  unit length = metre;
  unit area = metre^2;
  unit volume = 1e-3 litre;
  unit time = 86400 second;
  unit substance = item;
end
