// SBML level 3 version 1
// dcterms:bibliographicCitation: urn:miriam:pubmed:32141624

function Rate_Law_for_reaction(beta, S, I, N)
  beta*S*I/N;
end

model Fang2020___SEIR_model_of_COVID_19_transmission_considering_government_interventions_in_Wuhan()
  // Fang2020 - SEIR model of COVID-19 transmission considering government interventions in Wuhan
  // Using the parameterized susceptible‐exposed‐infectious‐recovered model, we simulated the spread dynamics of coronavirus disease 2019 (COVID‐19) outbreak and impact of different control measures, conducted the sensitivity analysis to identify the key factor, plotted the trend curve of effective reproductive number (R), and performed data fitting after the simulation. By simulation and data fitting, the model showed the peak existing confirmed cases of 59 769 arriving on 15 February 2020, with the coefficient of determination close to 1 and the fitting bias 3.02%, suggesting high precision of the datafitting results. More rigorous government control policies were associated with a slower increase in the infected population. Isolation and protective procedures would be less effective as more cases accrue, so the optimization of the treatment plan and the development of specific drugs would be of more importance. There was an upward trend of R in the beginning, followed by a downward trend, a temporary rebound, and another continuous decline. The feature of high infectiousness for severe acute respiratory syndrome coronavirus 2(SARS‐CoV‐2) led to an upward trend, and government measures contributed to the temporary rebound and declines. The declines of R could be exploited as strong evidence for the effectiveness of the interventions. Evidence from the fourphase stringent measures showed that it was significant to ensure early detection, early isolation, early treatment, adequate medical supplies, patients’ being admitted to designated hospitals, and comprehensive therapeutic strategy. Collaborative efforts are required to combat the novel coronavirus, focusing on both persistent strict domestic interventions and vigilance against exogenous imported cases.
  // isDescribedBy pubmed:32141624
  // DOID:0080600
  // hasTaxon taxonomy:2697049 taxonomy:9606
  // hasProperty mamo:MAMO_0000028
  // biomodels.db:MODEL2101190001 biomodels.db:BIOMD0000000984
  // model units - substance: substance, time: time, volume: volume, area: area, length: length, extent: substance

  // Compartments:
  compartment Wuhan = 1 volume;  // isPartOf ncit:C16428

  // Species:
  species Susceptible in Wuhan = Total_population - Exposed - Infected - Recovered;  // ido:0000514
  species Exposed in Wuhan = 0;  // ido:0000514; hasProperty ido:0000597
  species Infected in Wuhan = 1;  // ido:0000511; ncit:C171133
  species Recovered in Wuhan = 0;  // ido:0000621
  species Total_population in Wuhan = 10000000;

  // Parameters:
  beta_o = 0.1;
  k = 10;
  gamma = 0.097561;
  omega = 0.142857;

  // Assignment rules:
  beta := k*beta_o;

  // Reactions:
  Susceptible_to_Exposed: Susceptible => Exposed; Wuhan*Rate_Law_for_reaction(beta, Susceptible, Infected, Total_population);  // modifiers: Infected, Total_population; ido:0000597
  Exposed_to_Infected: Exposed => Infected; Wuhan*omega*Exposed;  // ncit:C128320; ncit:C171133
  Infected_to_Recovered: Infected => Recovered; Wuhan*gamma*Infected;  // ncit:C25746

  // Unit definitions:
  unit length = metre;
  unit area = metre^2;
  unit volume = 1e-3 litre;
  unit time = 86400 second;
  unit substance = item;
end
