// SBML level 2 version 4
// dcterms:bibliographicCitation: urn:miriam:doi:10.1007/BF00713556

function Constant_flux__irreversible(v)
  v;
end
Constant_flux__irreversible is "Constant flux (irreversible)";

function Rate_Law_for_reaction_4(trigger_v, flux)
  trigger_v*flux;
end

model Aubry1995___Multi_compartment_model_of_fluid_phase_endocytosis_kinetics_in_Dictyostelium_discoideum()
  // Aubry1995 - Multi-compartment model of fluid-phase endocytosis kinetics in Dictyostelium discoideum
  // Fluid-phase endoeytosis (pinocytosis) kinetics were studied in Dictyostelium discoideum amoebae from the axenic strain Ax-2 that exhibits high rates of fluid-phase endoeytosis when cultured in liquid nutrient media. Fluorescein-labelled dextran (FITC-dextran) was used as a marker in continuous uptake- and in pulse-chase exocytosis experiments. In the latter case, efflux of the marker was monitored on cells loaded for short periods of time and resuspended in marker-free medium. A multicompartmental model was developed which describes satisfactorily fluid-phase endocytosis kinetics. In particular, it accounts correctly for the extended latency period before exocytosis in pulse-chase experiments and it suggests the existence of some sorts of maturation stages in the pathway.
  // isDescribedBy doi:10.1007/BF00713556
  // GO:0006897
  // CHEBI:37926 CHEBI:52083
  // hasTaxon taxonomy:366501
  // hasProperty mamo:MAMO_0000046
  // biomodels.db:MODEL2102090001 biomodels.db:BIOMD0000000986

  // Compartments:
  compartment Dictyostelium_discoideum_AX2 = 1;  // hasTaxon taxonomy:366501

  // Species:
  species $FITC_Dextran_single_compartment_model in Dictyostelium_discoideum_AX2;  // hasPart CHEBI:52071; hasPart CHEBI:37926
  species $Pyranine_single_compartment_model in Dictyostelium_discoideum_AX2;  // CHEBI:52083
  species FITC_Dextran_three_compartment_model_compartment_1 in Dictyostelium_discoideum_AX2 = 0;  // hasPart CHEBI:37926; hasPart CHEBI:52071
  species FITC_Dextran_three_compartment_model_compartment_2 in Dictyostelium_discoideum_AX2 = 0;  // hasPart CHEBI:37926; hasPart CHEBI:52071
  species FITC_Dextran_three_compartment_model_compartment_3 in Dictyostelium_discoideum_AX2 = 0;  // hasPart CHEBI:52071; hasPart CHEBI:37926
  species Pyranine_three_compartment_model_compartment_1 in Dictyostelium_discoideum_AX2 = 0;  // CHEBI:52083
  species Pyranine_three_compartment_model_compartment_2 in Dictyostelium_discoideum_AX2 = 0;  // CHEBI:52083
  species Pyranine_three_compartment_model_compartment_3 in Dictyostelium_discoideum_AX2 = 0;  // CHEBI:52083

  // Parameters:
  FITC_Dextran_max_uptake_rate = 585;
  lambda_single_compartment_model_FITC_Dextran = 0.016;
  Pyranine_max_uptake_rate = 578;
  lambda_single_compartment_model_Pyranine = 0.01;
  Pyranine_addition_trigger = 0;
  FITC_Dextran_influx_rate = 6.7;
  lambda_compartment_1 = 0.037;
  lambda_compartment_2 = 0.037;
  lambda_compartment_3 = 0.035;
  Pyranine_influx_rate = 5.3;

  // Assignment rules:
  FITC_Dextran_single_compartment_model := FITC_Dextran_max_uptake_rate*(1 - exp(-lambda_single_compartment_model_FITC_Dextran*time));
  Pyranine_single_compartment_model := Pyranine_addition_trigger*Pyranine_max_uptake_rate*(1 - exp(-lambda_single_compartment_model_Pyranine*(time - 90)));
  Total_FITC_Dextran := FITC_Dextran_three_compartment_model_compartment_1 + FITC_Dextran_three_compartment_model_compartment_2 + FITC_Dextran_three_compartment_model_compartment_3;
  Total_Pyranine := Pyranine_three_compartment_model_compartment_1 + Pyranine_three_compartment_model_compartment_2 + Pyranine_three_compartment_model_compartment_3;

  // Reactions:
  FITC_Dextran_influx_rate_0: => FITC_Dextran_three_compartment_model_compartment_1; Dictyostelium_discoideum_AX2*Constant_flux__irreversible(FITC_Dextran_influx_rate);  // GO:0098657
  FITC_Dextran_transfer_between_endo_lysosomal_compartments_1_and_2: FITC_Dextran_three_compartment_model_compartment_1 => FITC_Dextran_three_compartment_model_compartment_2; Dictyostelium_discoideum_AX2*lambda_compartment_1*FITC_Dextran_three_compartment_model_compartment_1;  // GO:0098927
  FITC_Dextran_transfer_between_endo_lysosomal_compartments_2_and_3: FITC_Dextran_three_compartment_model_compartment_2 => FITC_Dextran_three_compartment_model_compartment_3; Dictyostelium_discoideum_AX2*lambda_compartment_2*FITC_Dextran_three_compartment_model_compartment_2;  // GO:0098927
  FITC_Dextran_efflux_rate: FITC_Dextran_three_compartment_model_compartment_3 => ; Dictyostelium_discoideum_AX2*lambda_compartment_3*FITC_Dextran_three_compartment_model_compartment_3;  // GO:0140352
  Pyranine_influx_rate_0: => Pyranine_three_compartment_model_compartment_1; Dictyostelium_discoideum_AX2*Rate_Law_for_reaction_4(Pyranine_addition_trigger, Pyranine_influx_rate);  // GO:0098657
  Pyranine_transfer_between_endo_lysosomal_compartments_1_and_2: Pyranine_three_compartment_model_compartment_1 => Pyranine_three_compartment_model_compartment_2; Dictyostelium_discoideum_AX2*lambda_compartment_1*Pyranine_three_compartment_model_compartment_1;  // GO:0098927
  Pyranine_transfer_between_endo_lysosomal_compartments_2_and_3: Pyranine_three_compartment_model_compartment_2 => Pyranine_three_compartment_model_compartment_3; Dictyostelium_discoideum_AX2*lambda_compartment_2*Pyranine_three_compartment_model_compartment_2;  // GO:0098927
  Pyranine_efflux_rate: Pyranine_three_compartment_model_compartment_3 => ; Dictyostelium_discoideum_AX2*lambda_compartment_3*Pyranine_three_compartment_model_compartment_3;  // GO:0140352

  // Events:
  Addition_of_Pyranine: at (time > 90): Pyranine_addition_trigger = 1;

  // Unit definitions:
  unit length = metre;
  unit area = metre^2;
  unit volume = 1e-3 litre;
  unit time = 60 second;
  unit substance = item;
end
