// SBML level 2 version 4
// dcterms:bibliographicCitation: urn:miriam:doi:10.1007/BF00713556

function Constant_flux__irreversible(v)
  v;
end
Constant_flux__irreversible is "Constant flux (irreversible)";

model Aubry1995___Nine_compartment_model_of_fluid_phase_endocytosis_kinetics_in_Dictyostelium_discoideum()
  // Aubry1995 - Nine-compartment model of fluid-phase endocytosis kinetics in Dictyostelium discoideum
  // Fluid-phase endoeytosis (pinocytosis) kinetics were studied in Dictyostelium discoideum amoebae from the axenic strain Ax-2 that exhibits high rates of fluid-phase endoeytosis when cultured in liquid nutrient media. Fluorescein-labelled dextran (FITC-dextran) was used as a marker in continuous uptake- and in pulse-chase exocytosis experiments. In the latter case, efflux of the marker was monitored on cells loaded for short periods of time and resuspended in marker-free medium. A multicompartmental model was developed which describes satisfactorily fluid-phase endocytosis kinetics. In particular, it accounts correctly for the extended latency period before exocytosis in pulse-chase experiments and it suggests the existence of some sorts of maturation stages in the pathway.
  // isDescribedBy doi:10.1007/BF00713556
  // CHEBI:52083 CHEBI:37926
  // GO:0006897
  // hasTaxon taxonomy:366501
  // hasProperty mamo:MAMO_0000046
  // biomodels.db:MODEL2102100001 biomodels.db:BIOMD0000000987

  // Compartments:
  compartment Dictyostelium_discoideum_AX2 = 1;  // hasTaxon taxonomy:366501

  // Species:
  species FITC_Dextran_three_compartment_model_compartment_1 in Dictyostelium_discoideum_AX2 = 0; FITC_Dextran_three_compartment_model_compartment_1 is "FITC_Dextran_nine_compartment_model_compartment_1";  // hasPart CHEBI:37926; hasPart CHEBI:52071
  species FITC_Dextran_three_compartment_model_compartment_2 in Dictyostelium_discoideum_AX2 = 0; FITC_Dextran_three_compartment_model_compartment_2 is "FITC_Dextran_nine_compartment_model_compartment_2";  // hasPart CHEBI:52071; hasPart CHEBI:37926
  species FITC_Dextran_three_compartment_model_compartment_3 in Dictyostelium_discoideum_AX2 = 0; FITC_Dextran_three_compartment_model_compartment_3 is "FITC_Dextran_nine_compartment_model_compartment_3";  // hasPart CHEBI:52071; hasPart CHEBI:37926
  species FITC_Dextran_nine_compartment_model_compartment_4 in Dictyostelium_discoideum_AX2 = 0;  // hasPart CHEBI:37926; hasPart CHEBI:52071
  species FITC_Dextran_nine_compartment_model_compartment_5 in Dictyostelium_discoideum_AX2 = 0;  // hasPart CHEBI:52071; hasPart CHEBI:37926
  species FITC_Dextran_nine_compartment_model_compartment_6 in Dictyostelium_discoideum_AX2 = 0;  // hasPart CHEBI:37926; hasPart CHEBI:52071
  species FITC_Dextran_nine_compartment_model_compartment_7 in Dictyostelium_discoideum_AX2 = 0;  // hasPart CHEBI:37926; hasPart CHEBI:52071
  species FITC_Dextran_nine_compartment_model_compartment_8 in Dictyostelium_discoideum_AX2 = 0;  // hasPart CHEBI:52071; hasPart CHEBI:37926
  species FITC_Dextran_nine_compartment_model_compartment_9 in Dictyostelium_discoideum_AX2 = 0;  // hasPart CHEBI:37926; hasPart CHEBI:52071

  // Parameters:
  lambda_compartment_1 = 0.09;
  lambda_compartment_2 = 0.127;
  lambda_compartment_3 = 0.099;
  lambda_compartment_4 = 0.09;
  lambda_compartment_5 = 0.093;
  lambda_compartment_6 = 0.098;
  lambda_compartment_7 = 0.098;
  lambda_compartment_8 = 0.111;
  lambda_compartment_9 = 0.096;
  mu = 6.8;

  // Assignment rules:
  Total_FITC_Dextran := FITC_Dextran_three_compartment_model_compartment_1 + FITC_Dextran_three_compartment_model_compartment_2 + FITC_Dextran_three_compartment_model_compartment_3 + FITC_Dextran_nine_compartment_model_compartment_4 + FITC_Dextran_nine_compartment_model_compartment_5 + FITC_Dextran_nine_compartment_model_compartment_6 + FITC_Dextran_nine_compartment_model_compartment_7 + FITC_Dextran_nine_compartment_model_compartment_8 + FITC_Dextran_nine_compartment_model_compartment_9;

  // Reactions:
  FITC_Dextran_transfer_between_endo_lysosomal_compartments_1_and_2: FITC_Dextran_three_compartment_model_compartment_1 => FITC_Dextran_three_compartment_model_compartment_2; Dictyostelium_discoideum_AX2*lambda_compartment_1*FITC_Dextran_three_compartment_model_compartment_1;  // GO:0098927
  FITC_Dextran_transfer_between_endo_lysosomal_compartments_2_and_3: FITC_Dextran_three_compartment_model_compartment_2 => FITC_Dextran_three_compartment_model_compartment_3; Dictyostelium_discoideum_AX2*lambda_compartment_2*FITC_Dextran_three_compartment_model_compartment_2;  // GO:0098927
  FITC_Dextran_efflux_rate: FITC_Dextran_nine_compartment_model_compartment_9 => ; Dictyostelium_discoideum_AX2*lambda_compartment_9*FITC_Dextran_nine_compartment_model_compartment_9;  // GO:0140352
  FITC_Dextran_transfer_between_endo_lysosomal_compartments_3_and_4: FITC_Dextran_three_compartment_model_compartment_3 => FITC_Dextran_nine_compartment_model_compartment_4; Dictyostelium_discoideum_AX2*lambda_compartment_3*FITC_Dextran_three_compartment_model_compartment_3;  // GO:0098927
  FITC_Dextran_transfer_between_endo_lysosomal_compartments_4_and_5: FITC_Dextran_nine_compartment_model_compartment_4 => FITC_Dextran_nine_compartment_model_compartment_5; Dictyostelium_discoideum_AX2*lambda_compartment_4*FITC_Dextran_nine_compartment_model_compartment_4;  // GO:0098927
  FITC_Dextran_transfer_between_endo_lysosomal_compartments_5_and_6: FITC_Dextran_nine_compartment_model_compartment_5 => FITC_Dextran_nine_compartment_model_compartment_6; Dictyostelium_discoideum_AX2*lambda_compartment_5*FITC_Dextran_nine_compartment_model_compartment_5;  // GO:0098927
  FITC_Dextran_transfer_between_endo_lysosomal_compartments_6_and_7: FITC_Dextran_nine_compartment_model_compartment_6 => FITC_Dextran_nine_compartment_model_compartment_7; Dictyostelium_discoideum_AX2*lambda_compartment_6*FITC_Dextran_nine_compartment_model_compartment_6;  // GO:0098927
  FITC_Dextran_transfer_between_endo_lysosomal_compartments_7_and_8: FITC_Dextran_nine_compartment_model_compartment_7 => FITC_Dextran_nine_compartment_model_compartment_8; Dictyostelium_discoideum_AX2*lambda_compartment_7*FITC_Dextran_nine_compartment_model_compartment_7;  // GO:0098927
  FITC_Dextran_influx_rate: => FITC_Dextran_three_compartment_model_compartment_1; Dictyostelium_discoideum_AX2*Constant_flux__irreversible(mu);  // GO:0098657
  FITC_Dextran_transfer_between_endo_lysosomal_compartments_8_and_9: FITC_Dextran_nine_compartment_model_compartment_8 => FITC_Dextran_nine_compartment_model_compartment_9; Dictyostelium_discoideum_AX2*lambda_compartment_8*FITC_Dextran_nine_compartment_model_compartment_8;  // GO:0098927

  // Unit definitions:
  unit length = metre;
  unit area = metre^2;
  unit volume = 1e-3 litre;
  unit time = 60 second;
  unit substance = item;
end
