// SBML level 2 version 4
// dcterms:bibliographicCitation: urn:miriam:pubmed:32532983

function population_growth(S, T, k)
  S*T*k;
end

model Westerhoff_Nat2020()
  // Westerhoff2020 - systems biology model of the coronavirus pandemic 2020
  // Using standard systems biology methodologies a 14-compartment dynamic model was developed for the Corona virus epidemic. The model predicts that: (i) it will be impossible to limit lockdown intensity such that sufficient herd immunity develops for this epidemic to die down, (ii) the death toll from the SARS-CoV-2 virus decreases very strongly with increasing intensity of the lockdown, but (iii) the duration of the epidemic increases at first with that intensity and then decreases again, such that (iv) it may be best to begin with selecting a lockdown intensity beyond the intensity that leads to the maximum duration, (v) an intermittent lockdown strategy should also work and might be more acceptable socially and economically, (vi) an initially intensive but adaptive lockdown strategy should be most efficient, both in terms of its low number of casualties and shorter duration, (vii) such an adaptive lockdown strategy offers the advantage of being robust to unexpected imports of the virus, e.g. due to international travel, (viii) the eradication strategy may still be superior as it leads to even fewer deaths and a shorter period of economic downturn, but should have the adaptive strategy as backup in case of unexpected infection imports, (ix) earlier detection of infections is the most effective way in which the epidemic can be controlled, whilst waiting for vaccines.
  // DOID:0080600
  // hasTaxon taxonomy:2697049
  // hasTaxon taxonomy:9606
  // isDescribedBy pubmed:32532983
  // hasProperty mamo:MAMO_0000028
  // biomodels.db:MODEL2102120001 biomodels.db:BIOMD0000000988

  // Compartments:
  compartment default = 1;  // ncit:C48156

  // Species:
  species infected_nontested_0 in default = 2;  // ido:0000511; ncit:C171133; hasProperty ncit:C101887
  species infected_tested_0 in default = 1;  // ido:0000511; ncit:C171133; hasProperty ncit:C47891
  species uninfected_nontested_0 in default = 630000;  // efo:0001460; hasProperty ncit:C101887
  species uninfected_tested_0 in default = 0;  // efo:0001460; hasProperty ncit:C47891
  species symptoms_tested_0 in default = 0;  // ido:0000511; ncit:C171133; hasProperty ncit:C47891; hasProperty ncit:C173069
  species symptoms_nontested_0 in default = 0;  // ido:0000511; ncit:C171133; hasProperty ncit:C101887; hasProperty ncit:C173069
  species recovered_tested_0 in default = 0;  // hasProperty ido:0000621; hasProperty ncit:C47891
  species recovered_nontested_0 in default = 0;  // hasProperty ncit:C101887; hasProperty ncit:C101887
  species $susceptible_0 in default = 1;  // ido:0000514
  species dead_corona_tested_0 in default = 0;  // ncit:C171133; ncit:C28554; hasProperty ncit:C47891
  species dead_corona_nontested_0 in default = 0;  // ncit:C171133; ncit:C28554; hasProperty ncit:C101887
  species dead_noncorona_0 in default = 0;  // ncit:C28554
  species $total_population_0 in default;
  species $registered_corona_0 in default;
  species $dead_corona_perc_0 in default;
  species $recovered_corona_perc_0 in default;
  species $dead_noncorona_perc_0 in default;
  species $frac_coronaDeadOfAllDead_0 in default;
  species $epidemic_extinguished_bool_0 in default;
  species $infected_tested_div10 in default;

  // Parameters:
  Testing_Randome = 0.0008; Testing_Randome is "test_random";
  var Total_Infection_coefficient; Total_Infection_coefficient is "infection_rate";
  Normal_death_rate_constant_0 = 3.29e-5; Normal_death_rate_constant_0 is "death_rate_natural";
  Corona_death_rate_constant = 0.002; Corona_death_rate_constant is "death_rate_corona";
  Birth_rate = 3.29e-5; Birth_rate is "birth_rate";
  Testing_for_Symptoms = 500; Testing_for_Symptoms is "test_symptoms";
  Corona_recover = 0.067; Corona_recover is "recovery_rate";
  Symptoms_appear = 0.30165; Symptoms_appear is "symptoms_rate";
  // Infection_from_non-tested_no-symptoms
  Infection_from_non_tested_no_symptoms_0 = 0.508; Infection_from_non_tested_no_symptoms_0 is "iota_ntns";
  // Infection_from_non-tested_symptoms
  Infection_from_non_tested_symptoms = 0.25; Infection_from_non_tested_symptoms is "iota_nts";
  // Infection_from_tested_no-symptoms
  Infection_from_tested_no_symptoms_0 = 0.025; Infection_from_tested_no_symptoms_0 is "iota_tns";
  // Infection_from_tested_symptoms
  Infection_from_tested_symptoms = 0.025; Infection_from_tested_symptoms is "iota_ts";
  var Social_Distance; Social_Distance is "social_distance";
  var Government_induced_isolation_factor_0; Government_induced_isolation_factor_0 is "lockdown_severity";
  Time_government_action_0 = 15; Time_government_action_0 is "t_government_action";
  lockdown_duration = 7 unit_0; lockdown_duration is "t_lockdown";
  lockdownPause_duration_0 = 7 unit_0; lockdownPause_duration_0 is "t_lockdown_pause";
  n_lockdowns has unit_1;
  n_pauses = 0 unit_1;
  intermittent_time has unit_0; intermittent_time is "t_intermittent";
  timeFraction_lockdown_0 = 0.55; timeFraction_lockdown_0 is "t_lockdown_effective";
  number_cutoff = 0 unit_1;
  symptomatic_numberTolerance_0 = 141; symptomatic_numberTolerance_0 is "symptoms_tolerance";
  // governmentResponseFactorToDiagnosedInfected in article
  governmentResponseFactorToDiagnosedInfected_0 = 0; governmentResponseFactorToDiagnosedInfected_0 is "bool_adaptive_lockdown";
  social_distancing_factor = 10;
  Social_Distance_base = 534700; Social_Distance_base is "social_distance_base";

  // Assignment rules:
  infected_tested_div10 := infected_tested_0*default/10;
  total_population_0 := infected_nontested_0 + infected_tested_0 + uninfected_nontested_0 + uninfected_tested_0 + recovered_nontested_0 + recovered_tested_0 + symptoms_nontested_0 + symptoms_tested_0;
  recovered_corona_perc_0 := (recovered_nontested_0 + recovered_tested_0)*100/total_population_0;
  registered_corona_0 := infected_tested_0 + symptoms_tested_0 + recovered_tested_0 + dead_corona_tested_0;
  dead_corona_perc_0 := (dead_corona_nontested_0 + dead_corona_tested_0)*100/total_population_0;
  dead_noncorona_perc_0 := dead_noncorona_0*100/total_population_0;
  frac_coronaDeadOfAllDead_0 := 100*dead_corona_perc_0/(dead_corona_perc_0 + dead_noncorona_perc_0);
  epidemic_extinguished_bool_0 := piecewise(1, infected_nontested_0 + infected_tested_0 + symptoms_nontested_0 + symptoms_tested_0 < number_cutoff, 0);
  n_lockdowns := piecewise(1, time - Time_government_action_0 > 0*lockdown_duration, 0) + piecewise(1, time - Time_government_action_0 > 1*lockdown_duration, 0) + piecewise(1, time - Time_government_action_0 > 2*lockdown_duration, 0) + piecewise(1, time - Time_government_action_0 > 3*lockdown_duration, 0) + piecewise(1, time - Time_government_action_0 > 4*lockdown_duration, 0) + piecewise(1, time - Time_government_action_0 > 5*lockdown_duration, 0) + piecewise(1, time - Time_government_action_0 > 6*lockdown_duration, 0) + piecewise(1, time - Time_government_action_0 > 7*lockdown_duration, 0) + piecewise(1, time - Time_government_action_0 > 8*lockdown_duration, 0) + piecewise(1, time - Time_government_action_0 > 9*lockdown_duration, 0) + piecewise(1, time - Time_government_action_0 > 10*lockdown_duration, 0) + piecewise(1, time - Time_government_action_0 > 11*lockdown_duration, 0) + piecewise(1, time - Time_government_action_0 > 12*lockdown_duration, 0) + piecewise(1, time - Time_government_action_0 > 13*lockdown_duration, 0) + piecewise(1, time - Time_government_action_0 > 14*lockdown_duration, 0) + piecewise(1, time - Time_government_action_0 > 15*lockdown_duration, 0) + piecewise(1, time - Time_government_action_0 > 16*lockdown_duration, 0) + piecewise(1, time - Time_government_action_0 > 17*lockdown_duration, 0) + piecewise(1, time - Time_government_action_0 > 18*lockdown_duration, 0) + piecewise(1, time - Time_government_action_0 > 19*lockdown_duration, 0) + piecewise(1, time - Time_government_action_0 > 20*lockdown_duration, 0) + piecewise(1, time - Time_government_action_0 > 21*lockdown_duration, 0) + piecewise(1, time - Time_government_action_0 > 22*lockdown_duration, 0) + piecewise(1, time - Time_government_action_0 > 23*lockdown_duration, 0) + piecewise(1, time - Time_government_action_0 > 24*lockdown_duration, 0) + piecewise(1, time - Time_government_action_0 > 25*lockdown_duration, 0) + piecewise(1, time - Time_government_action_0 > 26*lockdown_duration, 0) + piecewise(1, time - Time_government_action_0 > 27*lockdown_duration, 0) + piecewise(1, time - Time_government_action_0 > 28*lockdown_duration, 0) + piecewise(1, time - Time_government_action_0 > 29*lockdown_duration, 0) + piecewise(1, time - Time_government_action_0 > 30*lockdown_duration, 0) + piecewise(1, time - Time_government_action_0 > 31*lockdown_duration, 0) + piecewise(1, time - Time_government_action_0 > 32*lockdown_duration, 0) + piecewise(1, time - Time_government_action_0 > 33*lockdown_duration, 0) + piecewise(1, time - Time_government_action_0 > 34*lockdown_duration, 0) + piecewise(1, time - Time_government_action_0 > 35*lockdown_duration, 0) + piecewise(1, time - Time_government_action_0 > 36*lockdown_duration, 0) + piecewise(1, time - Time_government_action_0 > 37*lockdown_duration, 0) + piecewise(1, time - Time_government_action_0 > 38*lockdown_duration, 0) + piecewise(1, time - Time_government_action_0 > 39*lockdown_duration, 0) + piecewise(1, time - Time_government_action_0 > 40*lockdown_duration, 0) + piecewise(1, time - Time_government_action_0 > 41*lockdown_duration, 0) + piecewise(1, time - Time_government_action_0 > 42*lockdown_duration, 0) + piecewise(1, time - Time_government_action_0 > 43*lockdown_duration, 0) + piecewise(1, time - Time_government_action_0 > 44*lockdown_duration, 0) + piecewise(1, time - Time_government_action_0 > 45*lockdown_duration, 0) + piecewise(1, time - Time_government_action_0 > 46*lockdown_duration, 0) + piecewise(1, time - Time_government_action_0 > 47*lockdown_duration, 0) + piecewise(1, time - Time_government_action_0 > 48*lockdown_duration, 0) + piecewise(1, time - Time_government_action_0 > 49*lockdown_duration, 0) + piecewise(1, time - Time_government_action_0 > 50*lockdown_duration, 0) + piecewise(1, time - Time_government_action_0 > 51*lockdown_duration, 0);
  intermittent_time := time - n_lockdowns*lockdown_duration - n_pauses*lockdownPause_duration_0;
  Government_induced_isolation_factor_0 := social_distancing_factor*(1 + 2.5*symptoms_tested_0/symptomatic_numberTolerance_0*piecewise(0, time < Time_government_action_0, governmentResponseFactorToDiagnosedInfected_0));
  Social_Distance := piecewise(Social_Distance_base*Government_induced_isolation_factor_0, (time > Time_government_action_0) && (intermittent_time < Time_government_action_0 - lockdown_duration*(1 - timeFraction_lockdown_0)), Social_Distance_base);
  Total_Infection_coefficient := (infected_nontested_0*Infection_from_non_tested_no_symptoms_0 + symptoms_nontested_0*Infection_from_non_tested_symptoms + infected_tested_0*Infection_from_tested_no_symptoms_0 + symptoms_tested_0*Infection_from_tested_symptoms)*(1 - epidemic_extinguished_bool_0)/Social_Distance;

  // Reactions:
  // re1 in article
  infection_uninfected_nt: uninfected_nontested_0 => infected_nontested_0; default*Total_Infection_coefficient*uninfected_nontested_0;  // ncit:C171133; ncit:C128320; hasProperty ncit:C101887
  // re3 in article
  test_uninfected: uninfected_nontested_0 => uninfected_tested_0; default*Testing_Randome*uninfected_nontested_0;  // efo:0001460; ncit:C47891
  // re3 in article
  infection_uninfected_t: uninfected_tested_0 => infected_nontested_0; default*Total_Infection_coefficient*uninfected_tested_0;  // ncit:C171133; ncit:C128320; hasProperty ncit:C47891
  // re4 in article
  test_infected: infected_nontested_0 => infected_tested_0; default*Testing_Randome*infected_nontested_0;  // ncit:C47891; ncit:C128320
  // re5 in article
  symptoms_infected_nt: infected_nontested_0 => symptoms_nontested_0; default*Symptoms_appear*infected_nontested_0;  // ncit:C171133; ncit:C173069; hasProperty ncit:C101887
  // re6 in article
  symptoms_infected_t: infected_tested_0 => symptoms_tested_0; default*Symptoms_appear*infected_tested_0;  // ncit:C173069; ncit:C171133; hasProperty ncit:C47891
  // re7 in article
  test_symptoms: symptoms_nontested_0 => symptoms_tested_0; default*Testing_for_Symptoms*symptoms_nontested_0;  // ncit:C47891; ncit:C173069
  // re8 in article
  death_c_symptoms_t: symptoms_tested_0 => dead_corona_tested_0; default*Corona_death_rate_constant*symptoms_tested_0;  // ncit:C28554
  // re9 in article
  recovery_symptoms_t: symptoms_tested_0 => recovered_tested_0; default*Corona_recover*symptoms_tested_0;  // ncit:C25746; hasProperty ncit:C47891; hasProperty ncit:C173069
  // re10 in article
  recovery_symptoms_nt: symptoms_nontested_0 => recovered_nontested_0; default*Corona_recover*symptoms_nontested_0;  // ncit:C25746; hasProperty ncit:C101887; hasProperty ncit:C173069
  // re11 in article
  re11: $susceptible_0 => uninfected_nontested_0; default*population_growth(susceptible_0, total_population_0, Birth_rate); re11 is "population_growth";  // modifiers: total_population_0
  // re12 in article
  death_nc_uninfected_nt: uninfected_nontested_0 => dead_noncorona_0; default*Normal_death_rate_constant_0*uninfected_nontested_0;  // ncit:C28554
  // re13 in article
  death_recovered_t: recovered_tested_0 => dead_noncorona_0; default*Normal_death_rate_constant_0*recovered_tested_0;  // ncit:C28554
  // re14 in article
  death_nc_recovered_nt: recovered_nontested_0 => dead_noncorona_0; default*Normal_death_rate_constant_0*recovered_nontested_0;  // ncit:C28554
  // re15 in article
  death_c_infected_t: infected_tested_0 => dead_corona_tested_0; default*Corona_death_rate_constant*infected_tested_0;  // ncit:C28554
  // re16 in article
  death_c_infected_nt: infected_nontested_0 => dead_corona_nontested_0; default*Corona_death_rate_constant*infected_nontested_0;  // ncit:C28554
  // re17 in article
  death_nc_uninfected_t: uninfected_tested_0 => dead_noncorona_0; default*Normal_death_rate_constant_0*uninfected_tested_0;  // ncit:C28554
  // re18 in article
  death_c_symptoms_nt: symptoms_nontested_0 => dead_corona_nontested_0; default*Corona_death_rate_constant*symptoms_nontested_0;  // ncit:C28554

  // Unit definitions:
  unit length = metre;
  unit area = metre^2;
  unit volume = 1e-3 litre;
  unit time = 86400 second;
  unit substance = item;
  unit unit_0 = 86400 second; unit_0 is "d";
  unit unit_1 = dimensionless^0;
end
