// SBML level 2 version 4

function Constant_flux__irreversible(v)
  v;
end
Constant_flux__irreversible is "Constant flux (irreversible)";

model th17_core_network()
  // Intoslami2015 - Th17 core network model
  // Th17 core network
  // hasProperty mamo:MAMO_0000046

  // Compartments:
  compartment compartment = 1;

  // Species:
  species IL6ext in compartment = 1;
  species IL6int in compartment = 0;
  species STAT3mRNA in compartment = 0.4576;
  species STAT3prot_star in compartment = 0;
  species STAT3prot in compartment = 1;
  species TGFbext in compartment = 1;
  species TGFbint in compartment = 0;
  species RORgtmRNA in compartment = 0.0026;
  species FOXP3prot_star in compartment = 1;
  species FOXP3mRNA in compartment = 0.145;

  // Reactions:
  IL6_conversion: IL6ext => IL6int; compartment*IL6_conversion_k1*IL6ext;
    IL6_conversion_k1 = 0.0627;
  STAT3_basal_expression: => STAT3mRNA; compartment*Constant_flux__irreversible(STAT3_basal_expression_v);
    STAT3_basal_expression_v = 1.0222;
  STAT3_autoactivation: STAT3prot_star => STAT3mRNA + STAT3prot_star; compartment*STAT3_autoactivation_k1*STAT3prot_star;
    STAT3_autoactivation_k1 = 14.8148;
  STAT3_mRNA_degradation: STAT3mRNA => ; compartment*STAT3_mRNA_degradation_k1*STAT3mRNA;
    STAT3_mRNA_degradation_k1 = 2.2047;
  STAT3_translation: STAT3mRNA => STAT3mRNA + STAT3prot; compartment*STAT3_translation_k1*STAT3mRNA;
    STAT3_translation_k1 = 0.0846;
  STAT3_activation: STAT3prot + IL6int => STAT3prot_star + IL6int; compartment*STAT3_activation_k1*STAT3prot*IL6int;
    STAT3_activation_k1 = 16.3647;
  STAT3_protein_degradation: STAT3prot => ; compartment*STAT3_protein_degradation_k1*STAT3prot;
    STAT3_protein_degradation_k1 = 0.0221;
  STAT3_phosphoprotein_degradation: STAT3prot_star => ; compartment*STAT3_phosphoprotein_degradation_k1*STAT3prot_star;
    STAT3_phosphoprotein_degradation_k1 = 2.7893;
  TGFb_conversion: TGFbext => TGFbint; compartment*TGFb_conversion_k1*TGFbext;
    TGFb_conversion_k1 = 19.3743;
  RORgt_inhibition_by_FOXP3: RORgtmRNA + FOXP3prot_star => FOXP3prot_star; compartment*RORgt_inhibition_by_FOXP3_k1*RORgtmRNA*FOXP3prot_star;
    RORgt_inhibition_by_FOXP3_k1 = 773.7824;
  RORgt_degradation: RORgtmRNA => ; compartment*RORgt_degradation_k1*RORgtmRNA;
    RORgt_degradation_k1 = 0.0479;
  FOXP3_basal_expression: => FOXP3mRNA; compartment*Constant_flux__irreversible(FOXP3_basal_expression_v);
    FOXP3_basal_expression_v = 0;
  FOXP3_activation_by_TGFb: TGFbint => FOXP3mRNA + TGFbint; compartment*FOXP3_activation_by_TGFb_k1*TGFbint;
    FOXP3_activation_by_TGFb_k1 = 0.0734;
  FOXP3_inhibition_by_STAT3: FOXP3mRNA + STAT3prot_star => STAT3prot_star; compartment*FOXP3_inhibition_by_STAT3_k1*FOXP3mRNA*STAT3prot_star;
    FOXP3_inhibition_by_STAT3_k1 = 7.4237;
  FOXP3_mRNA_degradation: FOXP3mRNA => ; compartment*FOXP3_mRNA_degradation_k1*FOXP3mRNA;
    FOXP3_mRNA_degradation_k1 = 0.8092;
  FOXP3_translation_activation: FOXP3mRNA => FOXP3mRNA + FOXP3prot_star; compartment*FOXP3_translation_activation_k1*FOXP3mRNA; FOXP3_translation_activation is "FOXP3 translation/activation";
    FOXP3_translation_activation_k1 = 0.0053;
  FOXP3_protein_degradation: FOXP3prot_star => ; compartment*FOXP3_protein_degradation_k1*FOXP3prot_star;
    FOXP3_protein_degradation_k1 = 1.3205;
  RORgt_activation_by_TGFb_and_STAT3: TGFbint + STAT3prot_star => RORgtmRNA + TGFbint + STAT3prot_star; compartment*RORgt_activation_by_TGFb_and_STAT3_k1*TGFbint*STAT3prot_star;
    RORgt_activation_by_TGFb_and_STAT3_k1 = 4.967;

  // Unit definitions:
  unit volume = dimensionless;
  unit time = 3600 second;
  unit substance = dimensionless;
end
