// SBML level 2 version 4
// dcterms:bibliographicCitation: urn:miriam:pubmed:34309806

function Diffusion_to_RBC(k, x)
  k*x;
end

model Kurlovics2021___Metformin_partitioning_from_plasma_to_RBC___single_coefficient()
  // Kurlovics2021 - Metformin partitioning from plasma to RBC, single coefficient
  // This model is a supplementary material of a manuscript
  // "Diffusion driven metformin exchange transport rates between plasma and red blood cells"
  // by Janis Kurlovics, Darta Maija Zake, Linda Zaharenko, Kristaps Berzins, Janis Klovins, Egils Stalidzans
  // The setting of the model correspond to Fig.2 for the case with a single coefficient for experimental values of average concentration curve.
  // Parameter estimation can be executed using experimental data file "average_exp_data.txt".
  // A=B if metformin concentration is 0 at t=0.
  // isInstanceOf biomodels.db:MODEL2103170001 BTO:0000424 mamo:MAMO_0000046 CHEBI:6801 taxonomy:9606 GO:0015893
  // isEncodedBy biomodels.db:MODEL2103170001
  // occursIn BTO:0000424
  // hasTaxon taxonomy:9606
  // isDescribedBy GO:0015893 pubmed:34309806
  // hasProperty mamo:MAMO_0000046 CHEBI:6801 mamo:MAMO_0000046

  // Compartments:
  compartment RBC = 2198;  // BTO:0000424

  // Species:
  species Mrbc in RBC = 0;  // BTO:0000424

  // Parameters:
  A = 1382.061;
  d = -0.7830068;
  Kin = 0.04453126;
  c = -0.2156089;
  var Summary_flux_to_RBC;
  Initial_for_A = A;
  Initial_for_B = B;
  Initial_for_c = c;
  Initial_for_d = d;

  // Assignment rules:
  B := Initial_for_A;
  Mpl := Initial_for_A*exp(Initial_for_c*time) - Initial_for_B*exp(Initial_for_d*time);
  Summary_flux_to_RBC := Vin - Vout;

  // Reactions:
  Vout: Mrbc => ; RBC*Kin*Mrbc;  // isVersionOf GO:0015893
  Vin: => Mrbc; RBC*Diffusion_to_RBC(Kin, Mpl);  // isVersionOf GO:0015893

  // Unit definitions:
  unit length = metre;
  unit area = metre^2;
  unit volume = 1e-3 litre;
  unit time = 3600 second;
  unit substance = 1e-3 mole;
end
