// SBML level 2 version 4
// dcterms:bibliographicCitation: urn:miriam:pubmed:16581849

function Mass_Action_1(k1, S1)
  k1*S1;
end

function MichaelisMenten(M1, J1, k1, S1)
  k1*S1*M1/(J1 + S1);
end
MichaelisMenten is "Michaelis-Menten";

function Function_for_Synthesis_of_MPF(Vsb, cell)
  Vsb/cell;
end

function Function_for_Deg__of_MPF(CycB, Vdb, cell)
  Mass_Action_1(Vdb, CycB)/cell;
end
Function_for_Deg__of_MPF is "Function for Deg. of MPF";

function Function_for_activation_of_MPF_from_pB_by_Cdc25(V25, cell, pB)
  Mass_Action_1(V25, pB)/cell;
end

function Function_for_inactivation_of_MPFby_Wee1(CycB, Vwee, cell)
  Mass_Action_1(Vwee, CycB)/cell;
end

function Function_for_dissoc1(BCKI, cell, kdissb)
  Mass_Action_1(kdissb, BCKI)/cell;
end

function Function_for_deg__of_pB(Vdb, cell, pB)
  Mass_Action_1(Vdb, pB)/cell;
end
Function_for_deg__of_pB is "Function for deg. of pB";

function GK(A1, A2, A3, A4)
  2*A4*A1/(A2 - A1 + A3*A2 + A4*A1 + ((A2 - A1 + A3*A2 + A4*A1)^2 - 4*(A2 - A1)*A4*A1)^(1/2));
end

function Mass_Action_2(k1, S1, S2)
  k1*S1*S2;
end

function Function_for_assoc__of_pB_with_CKI(CKI, cell, kassb, pB)
  Mass_Action_2(kassb, pB, CKI)/cell;
end
Function_for_assoc__of_pB_with_CKI is "Function for assoc. of pB with CKI";

function Function_for_dissoc2(cell, kdissb, pBCKI)
  Mass_Action_1(kdissb, pBCKI)/cell;
end

function Function_for_Cdc25_action(V25, cell, pBCKI)
  Mass_Action_1(V25, pBCKI)/cell;
end

function Function_for_Wee1_action(BCKI, Vwee, cell)
  Mass_Action_1(Vwee, BCKI)/cell;
end

function Function_for_Deg__of_CycB_moeity__in_BCKI(BCKI, Vdb, cell)
  Mass_Action_1(Vdb, BCKI)/cell;
end
Function_for_Deg__of_CycB_moeity__in_BCKI is "Function for Deg. of CycB moeity in BCKI";

function Function_for_Deg__of_CKI_moeity_in_BCKI(BCKI, Vdi, cell)
  Mass_Action_1(Vdi, BCKI)/cell;
end
Function_for_Deg__of_CKI_moeity_in_BCKI is "Function for Deg. of CKI moeity in BCKI";

function Function_for_Deg__of_pB_moeity_in_pBCKI(Vdb, cell, pBCKI)
  Mass_Action_1(Vdb, pBCKI)/cell;
end
Function_for_Deg__of_pB_moeity_in_pBCKI is "Function for Deg. of pB moeity in pBCKI";

function Function_for_Deg__of_CKI_moeity_in_pBCKI(Vdi, cell, pBCKI)
  Mass_Action_1(Vdi, pBCKI)/cell;
end
Function_for_Deg__of_CKI_moeity_in_pBCKI is "Function for Deg. of CKI moeity in pBCKI";

function Function_for_Synthesis_of_CKI(Vsi, cell)
  Vsi/cell;
end

function Function_for_Deg__of_CKI(CKI, Vdi, cell)
  Mass_Action_1(Vdi, CKI)/cell;
end
Function_for_Deg__of_CKI is "Function for Deg. of CKI";

function Function_for_Assoc__of_CKI_with_CycA(CKI, CycA, cell, kassa)
  Mass_Action_2(kassa, CKI, CycA)/cell;
end
Function_for_Assoc__of_CKI_with_CycA is "Function for Assoc. of CKI with CycA";

function Function_for_dissoc3(TriA, cell, kdissa)
  Mass_Action_1(kdissa, TriA)/cell;
end

function Function_for_Deg__of_CKI_moeity_in_TriA(TriA, Vdi, cell)
  Mass_Action_1(Vdi, TriA)/cell;
end
Function_for_Deg__of_CKI_moeity_in_TriA is "Function for Deg. of CKI moeity in TriA";

function Function_for_Deg__of_CycA_moeity_in_TriA(TriA, Vda, cell)
  Mass_Action_1(Vda, TriA)/cell;
end
Function_for_Deg__of_CycA_moeity_in_TriA is "Function for Deg. of CycA moeity in TriA";

function Function_for_Assoc__of_CKI_with_CycE(CKI, CycE, cell, kasse)
  Mass_Action_2(kasse, CKI, CycE)/cell;
end
Function_for_Assoc__of_CKI_with_CycE is "Function for Assoc. of CKI with CycE";

function Function_for_dissoc4(TriE, cell, kdisse)
  Mass_Action_1(kdisse, TriE)/cell;
end

function Function_for_Deg__of_CKI_moeity_in_TriE(TriE, Vdi, cell)
  Mass_Action_1(Vdi, TriE)/cell;
end
Function_for_Deg__of_CKI_moeity_in_TriE is "Function for Deg. of CKI moeity in TriE";

function Function_for_Deg__of_CycE_moeity_in_TriE(TriE, Vde, cell)
  Mass_Action_1(Vde, TriE)/cell;
end
Function_for_Deg__of_CycE_moeity_in_TriE is "Function for Deg. of CycE moeity in TriE";

function Function_for_Synthesis_of_CycA_by_TFE(Vsa, cell)
  Vsa/cell;
end

function Function_for_Deg__of_CycA(CycA, Vda, cell)
  Mass_Action_1(Vda, CycA)/cell;
end
Function_for_Deg__of_CycA is "Function for Deg. of CycA";

function Function_for_Synthesis_of_CycE_by_TFE(Vse, cell)
  Vse/cell;
end

function Function_for_Deg__of_CycE(CycE, Vde, cell)
  Mass_Action_1(Vde, CycE)/cell;
end
Function_for_Deg__of_CycE is "Function for Deg. of CycE";

function Function_for_activation_of_APCP(APC, CycB, Jaie, cell, kaie)
  MichaelisMenten(CycB, Jaie, kaie, APC)/cell;
end

function Function_for_inactivation1(APCP, Jiie, cell, kiie)
  MichaelisMenten(1, Jiie, kiie, APCP)/cell;
end

function Function_for_Deg__of_Cdc20i(Cdc20i, cell, kd20)
  Mass_Action_1(kd20, Cdc20i)/cell;
end
Function_for_Deg__of_Cdc20i is "Function for Deg. of Cdc20i";

function Function_for_activation_of_Cdc20i(APCP, Cdc20i, Ja20, cell, ka20)
  MichaelisMenten(APCP, Ja20, ka20, Cdc20i)/cell;
end

function Function_for_inactivation2(Cdc20A, Ji20, cell, ki20)
  MichaelisMenten(1, Ji20, ki20, Cdc20A)/cell;
end

function Function_for_degradation(Cdc20A, cell, kd20)
  Mass_Action_1(kd20, Cdc20A)/cell;
end

function Function_for_activation_of_Cdh1(Cdh1i, Jah1, Vah1, cell)
  MichaelisMenten(Vah1, Jah1, 1, Cdh1i)/cell;
end

function Function_for_inactivation__of_Cdh1(Cdh1, Jih1, Vih1, cell)
  MichaelisMenten(Vih1, Jih1, 1, Cdh1)/cell;
end
Function_for_inactivation__of_Cdh1 is "Function for inactivation of Cdh1";

function Mass_Action_0(k1)
  k1;
end

function Function_for_Mass_accumulation(Mass, MaxMass, cell, mu)
  Mass_Action_0(mu*Mass*(1 - Mass/MaxMass))/cell;
end

function Function_for_assoc__of_MPF_with_CKI(CKI, CycB, cell, kassb)
  Mass_Action_2(kassb, CycB, CKI)/cell;
end
Function_for_assoc__of_MPF_with_CKI is "Function for assoc. of MPF with CKI";

function Function_for_Synthesis_of_Cdc20i(CycB, J20, cell, ks20a, ks20b, n20)
  Mass_Action_0(ks20a + ks20b*CycB^n20/(J20^n20 + CycB^n20))/cell;
end

model Csikasz_Nagy2006___Mammalian_Cell_Cycle_model()
  // Csikasz-Nagy2006 - Mammalian Cell Cycle model
  // This model originates from the Cell Cycle Database . It is described in:
  // Analysis of a generic model of eukaryotic cell-cycle regulation. Csikász-Nagy A , Battogtokh D , Chen KC , Novák B , Tyson JJ Biophys. J. [2006 Jun],90(12 ):4361-79
  // PMID: 16581849
  // Abstract:
  // We propose a protein interaction network for the regulation of DNA synthesis and mitosis that emphasizes the universality of the regulatory system among eukaryotic cells. The idiosyncrasies of cell cycle regulation in particular organisms can be attributed, we claim, to specific settings of rate constants in the dynamic network of chemical reactions. The values of these rate constants are determined ultimately by the genetic makeup of an organism. To support these claims, we convert the reaction mechanism into a set of governing kinetic equations and provide parameter values (specific to budding yeast, fission yeast, frog eggs, and mammalian cells) that account for many curious features of cell cycle regulation in these organisms. Using one-parameter bifurcation diagrams, we show how overall cell growth drives progression through the cell cycle, how cell-size homeostasis can be achieved by two different strategies, and how mutations remodel bifurcation diagrams and create unusual cell-division phenotypes. The relation between gene dosage and phenotype can be summarized compactly in two-parameter bifurcation diagrams. Our approach provides a theoretical framework in which to understand both the universality and particularity of cell cycle regulation, and to construct, in modular fashion, increasingly complex models of the networks controlling cell growth and division.
  // To the extent possible under law, all copyright and related or neighbouring rights to this encoded model have been dedicated to the public domain worldwide. Please refer to CC0 Public Domain Dedication for more information.
  // In summary, you are entitled to use this encoded model in absolutely any manner you deem suitable, verbatim, or with modification, alone or embedded it in a larger context, redistribute it, commercially or not, in a restricted way or not.
  // To cite BioModels Database, please use: Li C, Donizelli M, Rodriguez N, Dharuri H, Endler L, Chelliah V, Li L, He E, Henry A, Stefan MI, Snoep JL, Hucka M, Le Novère N, Laibe C (2010) BioModels Database: An enhanced, curated and annotated resource for published quantitative kinetic models. BMC Syst Biol., 4:92.
  // hasProperty mamo:MAMO_0000046
  // isDescribedBy pubmed:16581849
  // isVersionOf reactome:R-HSA-1640170
  // occursIn ncit:C12958
  // hasTaxon taxonomy:40674
  // hasProperty GO:0007049 mamo:MAMO_0000046

  // Compartments:
  compartment cell = 1;  // ncit:C12958

  // Species:
  species $APC in cell;  // isVersionOf uniprot:Q9H1A4
  species APCP in cell = 0.6716266; APCP is "APCp";  // isVersionOf uniprot:Q9H1A4; hasProperty PATO:0002220
  species BCKI in cell = 0;  // isVersionOf uniprot:Q22197
  species $Cdc14 in cell;  // isVersionOf uniprot:Q00684
  species Cdc20A in cell = 0.6605867;  // uniprot:Q12834; hasProperty NCIT:C45329
  species Cdc20i in cell = 0.01855353;  // uniprot:Q12834; hasProperty ncit:C45422
  species $Cdc20T in cell;
  species $Cdc25P in cell; Cdc25P is "Cdc25p";  // isVersionOf uniprot:P30304; hasProperty PATO:0002220
  species Cdh1 in cell = 0.9992357;  // isVersionOf uniprot:Q9UM11
  species $Cdh1i in cell;  // isVersionOf uniprot:Q9UM11; hasProperty ncit:C45422
  species CKI in cell = 0.2954077;  // isVersionOf uniprot:P46527
  species $CKIT in cell;  // isVersionOf uniprot:P46527
  species CycA in cell = 0.009940445;  // uniprot:P20248
  species $CycAT in cell;  // isVersionOf uniprot:P20248
  species CycB in cell = 0.1668414;  // uniprot:P14635
  species $CycBT in cell;  // isVersionOf uniprot:P14635
  species $CycD in cell;  // uniprot:P24385
  species CycE in cell = 0.07760513;  // uniprot:P24864
  species $CycET in cell;  // isVersionOf uniprot:P24864
  species Mass in cell = 1.174217;  // PATO:0045030
  species pB in cell = 0.009814871;  // uniprot:P06400
  species pBCKI in cell = 0;  // hasPart uniprot:P06400; hasPart uniprot:P46527
  species $preMPF in cell;  // hasProperty uniprot:Q8NHZ8
  species $TFB in cell;  // isHomologTo uniprot:Q5AFP3
  species $TFE in cell;  // isHomologTo uniprot:Q01094
  species $TFI in cell;  // isHomologTo uniprot:Q9UUB7
  species TriA in cell = 0.0171538;  // hasPart uniprot:P46527; hasPart uniprot:P20248
  species $TriB in cell;  // isVersionOf uniprot:P46527; isVersionOf uniprot:P06400
  species TriE in cell = 0.3117263;  // hasPart uniprot:P24864; hasPart uniprot:P46527
  species $Wee1 in cell;  // uniprot:P30291

  // Parameters:
  APCT = 1;
  Cdh1T = 1;
  CycD0 = 0.05;
  J20 = 1;
  Ja20 = 0.005;
  Ja25 = 0.1;
  Jafb = 0.1;
  Jafi = 88;
  Jah1 = 0.01;
  Jaie = 0.01;
  Jatf = 0.01;
  Jawee = 0.05;
  Ji20 = 0.005;
  Ji25 = 0.1;
  Jifb = 0.1;
  Jifi = 88;
  Jih1 = 0.01;
  Jiie = 0.01;
  Jitf = 0.01;
  Jiwee = 0.05;
  k14di = 0;
  k25b = 5;
  k25a = 0.01;
  ka20 = 0.5;
  ka25b = 1;
  ka25a = 0;
  kafb = 1;
  kafi = 88;
  kah1b = 3.5;
  kah1a = 0.18;
  kaie = 0.07;
  kassa = 25;
  kassb = 0;
  kasse = 50;
  katf = 0;
  katfa = 0.3;
  katfd = 3;
  katfe = 0.5;
  kaweeb = 0;
  kaweea = 0.3;
  kd20 = 0.15;
  kdab = 2;
  kdaa = 0.02;
  kdac = 0;
  kdb = 0.005;
  kdbc = 0.1;
  kdbh = 2;
  kde = 0.01;
  kdea = 0.5;
  kdeb = 0.5;
  kdee = 0.1;
  kdi = 0.8;
  kdia = 5;
  kdib = 5;
  kdid = 0;
  kdie = 5;
  kdissa = 1;
  kdissb = 0;
  kdisse = 1;
  KEZ = 0.2;
  ki20 = 0.25;
  ki25b = 0;
  ki25a = 0.3;
  kifb = 0.1;
  kifi = 88;
  kifib = 88;
  kih1 = 0;
  kih1a = 0.2;
  kih1b = 1;
  kih1d = 0;
  kih1e = 0.1;
  kiie = 0.18;
  kitf = 0.25;
  kitfa = 0.1;
  kitfb = 0.1;
  kiweeb = 1;
  kiweea = 0;
  ks20b = 0.15;
  ks20a = 0;
  ksab = 0.025;
  ksaa = 0;
  ksbb = 0.03;
  ksba = 0.01;
  kseb = 0.18;
  ksea = 0.01;
  ksib = 0;
  ksia = 1.8;
  kweeb = 0.2;
  kweea = 0.02;
  MaxMass = 10000;
  mu = 0.005;
  n20 = 1;

  // Assignment rules:
  APC := APCT - APCP;
  Cdc14 := Cdc20A;
  Cdc20T := Cdc20i + Cdc20A;
  Cdc25P := GK(ka25a + ka25b*CycB, ki25a + ki25b*Cdc14, Ja25, Ji25);
  Cdh1i := Cdh1T - Cdh1;
  CKIT := CKI + BCKI + pBCKI + TriA + TriE;
  TFB := GK(kafb*CycB, kifb, Jafb, Jifb);
  TFI := GK(kafi*Cdc14, kifi + kifib*CycB, Jafi, Jifi);
  TriB := BCKI + pBCKI;
  Wee1 := GK(kaweea + kaweeb*Cdc14, kiweea + kiweeb*CycB, Jawee, Jiwee);
  V25 := k25a + k25b*Cdc25P;
  Vah1 := kah1a + kah1b*Cdc14;
  Vda := kdaa + (kdab + kdac)*Cdc20A + kdac*Cdc20i;
  Vdb := kdb + kdbh*Cdh1 + kdbc*Cdc20A;
  Vde := kde + kdee*CycE + kdea*CycA + kdeb*CycB;
  Vitf := kitf + kitfa*CycA + kitfb*CycB;
  Vsb := (ksba + ksbb*TFB)*Mass;
  Vsi := ksia + ksib*TFI;
  Vwee := kweea + kweeb*Wee1;
  CycAT := CycA + TriA;
  CycBT := CycB + pB + BCKI + pBCKI;
  CycD := CycD0*Mass;
  Vatf := katf + katfa*CycA + katfe*CycE + katfd*CycD;
  TFE := GK(Vatf, Vitf, Jatf, Jitf);
  Vdi := (kdi + kdia*CycA + kdib*CycB + kdie*CycE + kdid*CycD)/(1 + k14di*Cdc14);
  Vih1 := kih1 + kih1a*CycA + kih1b*CycB + kih1e*CycE + kih1d*CycD;
  Vsa := (ksaa + ksab*TFE)*Mass;
  Vse := (ksea + kseb*TFE)*Mass;
  CycET := CycE + TriE;
  preMPF := pB + pBCKI;

  // Reactions:
  Mass_accumulation: => Mass; cell*Function_for_Mass_accumulation(Mass, MaxMass, cell, mu);  // isInstanceOf NCIT:C16402
  Synthesis_of_MPF: => CycB; cell*Function_for_Synthesis_of_MPF(Vsb, cell); Synthesis_of_MPF is "Synthesis of CycB";
  Deg_of_MPF: CycB => ; cell*Function_for_Deg__of_MPF(CycB, Vdb, cell); Deg_of_MPF is "Deg. of MPF";
  activation_of_MPF_from_pB_by_Cdc25: pB => CycB; cell*Function_for_activation_of_MPF_from_pB_by_Cdc25(V25, cell, pB);
  inactivation_of_MPFby_Wee1: CycB => pB; cell*Function_for_inactivation_of_MPFby_Wee1(CycB, Vwee, cell);
  assoc_of_MPF_with_CKI: CycB + CKI => BCKI; cell*Function_for_assoc__of_MPF_with_CKI(CKI, CycB, cell, kassb); assoc_of_MPF_with_CKI is "Assoc. of MPF with CKI";
  dissoc_1: BCKI => CycB + CKI; cell*Function_for_dissoc1(BCKI, cell, kdissb); dissoc_1 is "dissoc1 of BCKI";
  deg_of_pB: pB => ; cell*Function_for_deg__of_pB(Vdb, cell, pB); deg_of_pB is "Deg. of pB";
  assoc_of_pB_with_CKI: pB + CKI => pBCKI; cell*Function_for_assoc__of_pB_with_CKI(CKI, cell, kassb, pB); assoc_of_pB_with_CKI is "Assoc. of pB with CKI";
  dissoc_2: pBCKI => pB + CKI; cell*Function_for_dissoc2(cell, kdissb, pBCKI); dissoc_2 is "dissoc2 of pBCKI";
  Cdc25_action: pBCKI => BCKI; cell*Function_for_Cdc25_action(V25, cell, pBCKI);
  Wee1_action: BCKI => pBCKI; cell*Function_for_Wee1_action(BCKI, Vwee, cell); Wee1_action is "BCKI phosphophorylation by Wee1";
  Deg_of_CycB_moeity__in_BCKI: BCKI => CKI; cell*Function_for_Deg__of_CycB_moeity__in_BCKI(BCKI, Vdb, cell); Deg_of_CycB_moeity__in_BCKI is "Deg. of CycB moeity in BCKI";
  Deg_of_CKI_moeity_in_BCKI: BCKI => CycB; cell*Function_for_Deg__of_CKI_moeity_in_BCKI(BCKI, Vdi, cell); Deg_of_CKI_moeity_in_BCKI is "Deg. of CKI moeity in BCKI";
  Deg_of_pB_moeity_in_pBCKI: pBCKI => CKI; cell*Function_for_Deg__of_pB_moeity_in_pBCKI(Vdb, cell, pBCKI); Deg_of_pB_moeity_in_pBCKI is "Deg. of pB moeity in pBCKI";
  Deg_of_CKI_moeity_in_pBCKI: pBCKI => pB; cell*Function_for_Deg__of_CKI_moeity_in_pBCKI(Vdi, cell, pBCKI); Deg_of_CKI_moeity_in_pBCKI is "Deg. of CKI moeity in pBCKI";
  Synthesis_of_CKI: => CKI; cell*Function_for_Synthesis_of_CKI(Vsi, cell);
  Deg_of_CKI: CKI => ; cell*Function_for_Deg__of_CKI(CKI, Vdi, cell); Deg_of_CKI is "Deg. of CKI";
  Assoc_of_CKI_with_CycA: CKI + CycA => TriA; cell*Function_for_Assoc__of_CKI_with_CycA(CKI, CycA, cell, kassa); Assoc_of_CKI_with_CycA is "Assoc. of CKI with CycA";
  dissoc_3: TriA => CKI + CycA; cell*Function_for_dissoc3(TriA, cell, kdissa); dissoc_3 is "dissoc3 of TriA";
  Deg_of_CKI_moeity_in_TriA: TriA => CycA; cell*Function_for_Deg__of_CKI_moeity_in_TriA(TriA, Vdi, cell); Deg_of_CKI_moeity_in_TriA is "Deg. of CKI moeity in TriA";
  Deg_of_CycA_moeity_in_TriA: TriA => CKI; cell*Function_for_Deg__of_CycA_moeity_in_TriA(TriA, Vda, cell); Deg_of_CycA_moeity_in_TriA is "Deg. of CycA moeity in TriA";
  Assoc_of_CKI_with_CycE: CKI + CycE => TriE; cell*Function_for_Assoc__of_CKI_with_CycE(CKI, CycE, cell, kasse); Assoc_of_CKI_with_CycE is "Assoc. of CKI with CycE";
  dissoc_4: TriE => CKI + CycE; cell*Function_for_dissoc4(TriE, cell, kdisse); dissoc_4 is "dissoc4 of TriE";
  Deg_of_CKI_moeity_in_TriE: TriE => CycE; cell*Function_for_Deg__of_CKI_moeity_in_TriE(TriE, Vdi, cell); Deg_of_CKI_moeity_in_TriE is "Deg. of CKI moeity in TriE";
  Deg_of_CycE_moeity_in_TriE: TriE => CKI; cell*Function_for_Deg__of_CycE_moeity_in_TriE(TriE, Vde, cell); Deg_of_CycE_moeity_in_TriE is "Deg. of CycE moeity in TriE";
  Synthesis_of_CycA_by_TFE: => CycA; cell*Function_for_Synthesis_of_CycA_by_TFE(Vsa, cell);
  Deg_of_CycA: CycA => ; cell*Function_for_Deg__of_CycA(CycA, Vda, cell); Deg_of_CycA is "Deg. of CycA";
  Synthesis_of_CycE_by_TFE: => CycE; cell*Function_for_Synthesis_of_CycE_by_TFE(Vse, cell);
  Deg_of_CycE: CycE => ; cell*Function_for_Deg__of_CycE(CycE, Vde, cell); Deg_of_CycE is "Deg. of CycE";
  activation_of_APCP: $APC => APCP; cell*Function_for_activation_of_APCP(APC, CycB, Jaie, cell, kaie);  // modifiers: CycB
  inactivation_1: APCP => $APC; cell*Function_for_inactivation1(APCP, Jiie, cell, kiie); inactivation_1 is "inactivation of APCp";
  Synthesis_of_Cdc20i: => Cdc20i; cell*Function_for_Synthesis_of_Cdc20i(CycB, J20, cell, ks20a, ks20b, n20);  // modifiers: CycB
  Deg_of_Cdc20i: Cdc20i => ; cell*Function_for_Deg__of_Cdc20i(Cdc20i, cell, kd20); Deg_of_Cdc20i is "Deg. of Cdc20i";
  activation_of_Cdc20i: Cdc20i => Cdc20A; cell*Function_for_activation_of_Cdc20i(APCP, Cdc20i, Ja20, cell, ka20);  // modifiers: APCP
  inactivation_2: Cdc20A => Cdc20i; cell*Function_for_inactivation2(Cdc20A, Ji20, cell, ki20); inactivation_2 is "inactivation of Cdc20A";
  degradation: Cdc20A => ; cell*Function_for_degradation(Cdc20A, cell, kd20); degradation is "Deg.of CDC20A";
  activation_of_Cdh1: $Cdh1i => Cdh1; cell*Function_for_activation_of_Cdh1(Cdh1i, Jah1, Vah1, cell);
  inactivation__of_Cdh1: Cdh1 => $Cdh1i; cell*Function_for_inactivation__of_Cdh1(Cdh1, Jih1, Vih1, cell); inactivation__of_Cdh1 is "inactivation of Cdh1";

  // Events:
  Event: at (CycB - KEZ < 0): Mass = 0.5*Mass;

  // Unit definitions:
  unit length = metre;
  unit area = metre^2;
  unit volume = litre;
  unit time = second;
  unit substance = item;
end
